# OpenSim document version 40000
Model H3Gait2392:
  gravity: 0 -9.80665 0
  length_units: meters
  force_units: N
  credits:
    Delp S.L., Loan J.P., Hoy M.G., Zajac F.E., Topp E.L., Rosen J.M., Thelen D.G., Anderson F.C., Seth A. Notes: 3D, 23 DOF gait model created by D.G. Thelen, Univ. of Wisconsin-Madison, and Ajay Seth, Frank C. Anderson, and Scott L. Delp, Stanford University. Lower extremity joint defintions based on Delp et al. (1990). Low back joint and anthropometry based on Anderson and Pandy (1999, 2001). Planar knee model of Yamaguchi and Zajac (1989). Seth replaced tibia translation constraints with a CustomJoint for the knee and removed the patella to eliminate all kinematic constraints; insertions of the quadrucepts are handled with moving points in the tibia frame as defined by Delp 1990. License: Creative Commons (CCBY 3.0). You are free to distribute, remix, tweak, and build upon this work, even commercially, as long as you credit us for the original creation. http://creativecommons.org/licenses/by/3.0/ More Information: http://simtk-confluence.stanford.edu:8080/display/OpenSim/Gait+2392+and+2354+Models
  publications:
    Delp, S.L., Loan, J.P., Hoy, M.G., Zajac, F.E., Topp E.L., Rosen, J.M.: An interactive graphics-based model of the lower extremity to study orthopaedic surgical procedures, IEEE Transactions on Biomedical Engineering, vol. 37, pp. 757-767, 1990. Yamaguchi G.T., Zajac F.E.: A planar model of the knee joint to characterize the knee extensor mechanism." J . Biomecl7. vol. 21. pp. 1-10. 1989. Anderson F.C., Pandy M.G.: A dynamic optimization solution for vertical jumping in three dimensions. Computer Methods in Biomechanics and Biomedical Engineering 2:201-231, 1999. Anderson F.C., Pandy M.G.: Dynamic optimization of human walking. Journal of Biomechanical Engineering 123:381-390, 2001.
  Ground: meshes=treadmill.vtp
  BodySet:
    Body pelvis: mass=11.777 [kg] mass_center=(-0.0707 0 0) inertia=(0.1028 0.0871 0.0579 0 0 0)
        meshes=(sacrum.vtp pelvis.vtp l_pelvis.vtp)
    Body femur_r: mass=9.3014 mass_center=(0 -0.17 0) inertia=(0.1339 0.0351 0.1412 0 0 0) meshes=femur_r.vtp
    Body tibia_r: mass=3.7075 mass_center=(0 -0.1867 0) inertia=(0.0504 0.0051 0.0511 0 0 0)
        meshes=(tibia_r.vtp fibula.vtp)
    Body talus_r: mass=0.1 mass_center=(0 0 0) inertia=(0.001 0.001 0.001 0 0 0) meshes=talus.vtp
    Body calcn_r: mass=1.25 mass_center=(0.1 0.03 0) inertia=(0.0014 0.0039 0.0041 0 0 0) meshes=foot.vtp
    Body toes_r: mass=0.2166 mass_center=(0.0346 0.006 -0.0175) inertia=(0.0001 0.0002 0.0001 0 0 0) meshes=bofoot.vtp
    Body femur_l: mass=9.3014 mass_center=(0 -0.17 0) inertia=(0.1339 0.0351 0.1412 0 0 0) meshes=femur_l.vtp
    Body tibia_l: mass=3.7075 mass_center=(0 -0.1867 0) inertia=(0.0504 0.0051 0.0511 0 0 0)
        meshes=(tibia_l.vtp l_fibula.vtp)
    Body talus_l: mass=0.1 mass_center=(0 0 0) inertia=(0.001 0.001 0.001 0 0 0) meshes=l_talus.vtp
    Body calcn_l: mass=1.25 mass_center=(0.1 0.03 0) inertia=(0.0014 0.0039 0.0041 0 0 0) meshes=l_foot.vtp
    Body toes_l: mass=0.2166 mass_center=(0.0346 0.006 0.0175) inertia=(0.0001 0.0002 0.0001 0 0 0) meshes=l_bofoot.vtp
    Body torso: mass=34.2366 mass_center=(-0.03 0.32 0) inertia=(1.4745 0.7555 1.4314 0 0 0)
        meshes=(hat_spine.vtp hat_jaw.vtp hat_skull.vtp hat_ribs.vtp)
    Body H3_back: mass=7.591 mass_center=(-0.138 0.113453 0.016507)
        inertia=(0.2811895 0.3402015 0.1684602 -0.02367961 0.01913874 -0.00451547) meshes=H3_back_rotated.stl
    Body hip_motor_r: mass=0.452 mass_center=(1e-6 -0.0012139 0.02295)
        inertia=(0.001679082 0.00019465 0.000792906 -3.3e-7 7.7e-8 -9.0023e-5) meshes=right_hip_motor_rotated.stl
    Body H3_thigh_r: mass=0.089 mass_center=(0 0.000355 -2.5e-5) inertia=(0.000507212 5.727e-6 0.000512583 0 0 1.3e-8)
        meshes=right_intermediate_bar_rotated.stl
    Body H3_sup_thigh_girth_r: mass=0.196 mass_center=(-0.0015487 -3e-6 -0.056891)
        inertia=(0.000567839 0.001293191 0.000836715 8.52e-7 2.081e-5 3.1e-7)
        meshes=right_upper_femur_girth_rotated.stl
    Body H3_knee_shell_r: mass=0.861 mass_center=(0.001923 0.007976 0.044924)
        inertia=(0.001444962 0.001125414 0.00107658 -1.2202e-5 -8.4016e-5 0.000218819)
        meshes=right_knee_shell_rotated.stl
    Body H3_inf_thigh_girth_r: mass=0.117 mass_center=(-0.004386 1.4e-5 -0.05633)
        inertia=(0.000275993 0.000684354 0.000433433 1.28e-7 2.4785e-5 -2.7e-8)
        meshes=right_lower_femur_girth_rotated.stl
    Body knee_motor_r: mass=0.452 mass_center=(-0.000133 -0.012133 0.022949)
        inertia=(0.000679804 0.000193975 0.000792959 5.331e-6 1.013e-6 -9.0039e-5) meshes=right_knee_motor_rotated.stl
    Body H3_shank_r: mass=0.089 mass_center=(0 0.000355 -2.5e-5) inertia=(0.000507212 5.727e-6 0.000512583 0 0 1.3e-8)
        meshes=right_intermediate_bar_rotated.stl
    Body H3_ankle_shell_r: mass=0.888 mass_center=(-0.000935 0.008498 0.043919)
        inertia=(0.001460316 0.001196549 0.001111441 7.156e-6 -4.484e-6 0.000232528)
        meshes=right_ankle_shell_rotated.stl
    Body ankle_motor_r: mass=0.442 mass_center=(-3e-6 -0.006802 0.023402)
        inertia=(0.000353793 0.00019344 0.000472784 -6.3e-8 2e-8 -4.8275e-5) meshes=right_ankle_motor_rotated.stl
    Body H3_sup_shank_girth_r: mass=0.159 mass_center=(-0.013439 -9e-5 -0.045658)
        inertia=(0.000315556 0.000674596 0.000451329 -8.7e-8 5.589e-6 7.1e-7)
        meshes=right_upper_tibia_girth_rotated.stl
    Body H3_inf_shank_girth_r: mass=0.059 mass_center=(-0.024453 0 -0.035172)
        inertia=(5.2886e-5 0.000105092 6.4004e-5 0 1.3263e-5 0) meshes=right_lower_tibia_girth_rotated.stl
    Body H3_foot_r: mass=0.467 mass_center=(0.059668 -0.018026 -0.038454)
        inertia=(0.000336359 0.00299182 0.00270637 -1.6126e-5 -6.6052e-5 -1.6107e-5) meshes=right_foot_rotated.stl
    Body hip_motor_l: mass=0.452 mass_center=(4e-6 -0.0012135 -0.022949)
        inertia=(0.000679872 0.0001939 0.000792952 6e-8 -1.9e-8 9.0036e-5) meshes=left_hip_motor_rotated.stl
    Body H3_thigh_l: mass=0.089 mass_center=(0 0.000355 2.5e-5) inertia=(0.000507209 5.727e-6 0.00051258 0 0 -1.3e-8)
        meshes=left_intermediate_bar_rotated.stl
    Body H3_sup_thigh_girth_l: mass=0.196 mass_center=(-0.00158 -3e-6 0.058595)
        inertia=(0.000582806 0.001297883 0.000826067 8.18e-7 5.674e-6 -3.77e-7)
        meshes=left_upper_femur_girth_rotated.stl
    Body H3_knee_shell_l: mass=0.861 mass_center=(-0.005388 0.007999 -0.045008)
        inertia=(0.001447807 0.001127238 0.00107658 -6.101e-6 8.9783e-5 -0.000216188)
        meshes=left_knee_shell_rotated.stl
    Body H3_inf_thigh_girth_l: mass=0.117 mass_center=(-0.005303 1.4e-5 0.059842)
        inertia=(0.000298667 0.000700937 0.000427342 1.23e-7 -2.996e-6 2.3e-8)
        meshes=left_lower_femur_girth_rotated.stl
    Body knee_motor_l: mass=0.452 mass_center=(-5e-6 -0.012136 -0.022953)
        inertia=(0.000679876 0.000193898 0.000792928 1.8e-8 2.8e-8 9.0049e-5) meshes=left_knee_motor_rotated.stl
    Body H3_shank_l: mass=0.089 mass_center=(0 0.000354 2.5e-5) inertia=(0.000507209 5.727e-6 0.00051258 0 0 -1.3e-8)
        meshes=left_intermediate_bar_rotated.stl
    Body H3_ankle_shell_l: mass=0.888 mass_center=(-0.000655 0.008497 -0.043919)
        inertia=(0.001460325 0.001196945 0.00111185 1.0302e-5 1.4461e-5 -0.000232504)
        meshes=left_ankle_shell_rotated.stl
    Body ankle_motor_l: mass=0.442 mass_center=(-5e-6 -0.006801 -0.023402)
        inertia=(0.00035382 0.000193421 0.000472792 5.8e-8 2.4e-8 4.8285e-5) meshes=left_ankle_motor_rotated.stl
    Body H3_sup_shank_girth_l: mass=0.159 mass_center=(-0.01383 -9.2e-5 0.045885)
        inertia=(0.000315684 0.000666949 0.000443554 -9.8e-8 -3.433e-6 -7.19e-7)
        meshes=left_upper_tibia_girth_rotated.stl
    Body H3_inf_shank_girth_l: mass=0.059 mass_center=(-0.024369 0 0.035204)
        inertia=(5.2998e-5 0.000105449 6.4248e-5 0 -1.3111e-5 0) meshes=left_lower_tibia_girth_rotated.stl
    Body H3_foot_l: mass=0.467 mass_center=(0.059668 -0.018026 0.037845)
        inertia=(0.000334268 0.002989772 0.002706414 -1.6126e-5 4.4642e-5 1.5623e-5) meshes=left_foot_rotated.stl
  JointSet:
    CustomJoint hip_r: socket_parent_frame=pelvis_offset socket_child_frame=femur_r_offset
      Coordinate hip_flexion_r: default_value=-0.03490659 range=(-2.094395 2.094395) clamped=false
      Coordinate hip_adduction_r: default_value=-0.05235988 range=(-2.094395 2.094395) clamped=false
      Coordinate hip_rotation_r: default_value=0 range=(-2.094395 2.094395) clamped=false
      PhysicalOffsetFrame pelvis_offset: socket_parent=/bodyset/pelvis translation=(-0.0707 -0.0661 0.0835) [meters]
      PhysicalOffsetFrame femur_r_offset: socket_parent=/bodyset/femur_r translation=(0 0 0)
      SpatialTransform: axes_held_at_zero=(translation1 translation2 translation3)
        TransformAxis rotation1: coordinates=hip_flexion_r axis=(0 0 1) LinearFunction(coefficients=1 0)
        TransformAxis rotation2: coordinates=hip_adduction_r axis=(1 0 0) LinearFunction(coefficients=1 0)
        TransformAxis rotation3: coordinates=hip_rotation_r axis=(0 1 0) LinearFunction(coefficients=1 0)
    CustomJoint knee_r: socket_parent_frame=femur_r_offset socket_child_frame=tibia_r_offset
      Coordinate knee_angle_r: default_value=0 range=(-2.094395 0.1745329) clamped=false
      PhysicalOffsetFrame femur_r_offset: socket_parent=/bodyset/femur_r translation=(0 0 0)
      PhysicalOffsetFrame tibia_r_offset: socket_parent=/bodyset/tibia_r translation=(0 0 0)
      SpatialTransform: axes_held_at_zero=(rotation2 rotation3 translation3)
        TransformAxis rotation1: coordinates=knee_angle_r axis=(0 0 1) LinearFunction(coefficients=1 0)
        TransformAxis translation1: coordinates=knee_angle_r axis=(1 0 0)
          SimmSpline: x=(-2.0944 -1.74533 -1.39626 -1.0472 -0.698132 -0.349066 -0.174533 0.197344 0.337395 0.490178 1.52146 2.0944)
              y=(-0.0032 0.00179 0.00411 0.0041 0.00212 -0.001 -0.0031 -0.005227 -0.005435 -0.005574 -0.005435 -0.00525)
        TransformAxis translation2: coordinates=knee_angle_r axis=(0 1 0)
          SimmSpline: x=(-2.0944 -1.22173 -0.523599 -0.349066 -0.174533 0.159149 2.0944)
              y=(-0.4226 -0.4082 -0.399 -0.3976 -0.3966 -0.395264 -0.396)
    CustomJoint ankle_r: socket_parent_frame=tibia_r_offset socket_child_frame=talus_r_offset
      Coordinate ankle_angle_r: default_value=0 range=(-1.570796 1.570796) clamped=false
      PhysicalOffsetFrame tibia_r_offset: socket_parent=/bodyset/tibia_r translation=(0 -0.43 0)
      PhysicalOffsetFrame talus_r_offset: socket_parent=/bodyset/talus_r translation=(0 0 0)
      SpatialTransform: axes_held_at_zero=(rotation2 rotation3 translation1 translation2 translation3)
        TransformAxis rotation1: coordinates=ankle_angle_r axis=(-0.1050135 -0.1740224 0.9791263)
            LinearFunction(coefficients=1 0)
    CustomJoint subtalar_r: socket_parent_frame=talus_r_offset socket_child_frame=calcn_r_offset
      Coordinate subtalar_angle_r: default_value=0 range=(-1.570796 1.570796) clamped=false locked=true
      PhysicalOffsetFrame talus_r_offset: socket_parent=/bodyset/talus_r translation=(-0.04877 -0.04195 0.00792)
      PhysicalOffsetFrame calcn_r_offset: socket_parent=/bodyset/calcn_r translation=(0 0 0)
      SpatialTransform: axes_held_at_zero=(rotation2 rotation3 translation1 translation2 translation3)
        TransformAxis rotation1: coordinates=subtalar_angle_r axis=(0.7871796 0.6047475 -0.1209495)
            LinearFunction(coefficients=1 0)
    CustomJoint mtp_r: socket_parent_frame=calcn_r_offset socket_child_frame=toes_r_offset
      Coordinate mtp_angle_r: default_value=0 range=(-1.570796 1.570796) clamped=false locked=true
      PhysicalOffsetFrame calcn_r_offset: socket_parent=/bodyset/calcn_r translation=(0.1788 -0.002 0.00108)
      PhysicalOffsetFrame toes_r_offset: socket_parent=/bodyset/toes_r translation=(0 0 0)
      SpatialTransform: axes_held_at_zero=(rotation2 rotation3 translation1 translation2 translation3)
        TransformAxis rotation1: coordinates=mtp_angle_r axis=(-0.5809544 0 0.8139361) LinearFunction(coefficients=1 0)
    CustomJoint hip_l: socket_parent_frame=pelvis_offset socket_child_frame=femur_l_offset
      Coordinate hip_flexion_l: default_value=-0.03490659 range=(-2.094395 2.094395) clamped=false
      Coordinate hip_adduction_l: default_value=-0.05235988 range=(-2.094395 2.094395) clamped=false
      Coordinate hip_rotation_l: default_value=0 range=(-2.094395 2.094395) clamped=false
      PhysicalOffsetFrame pelvis_offset: socket_parent=/bodyset/pelvis translation=(-0.0707 -0.0661 -0.0835)
      PhysicalOffsetFrame femur_l_offset: socket_parent=/bodyset/femur_l translation=(0 0 0)
      SpatialTransform: axes_held_at_zero=(translation1 translation2 translation3)
        TransformAxis rotation1: coordinates=hip_flexion_l axis=(0 0 1) LinearFunction(coefficients=1 0)
        TransformAxis rotation2: coordinates=hip_adduction_l axis=(-1 0 0) LinearFunction(coefficients=1 0)
        TransformAxis rotation3: coordinates=hip_rotation_l axis=(0 -1 0) LinearFunction(coefficients=1 0)
    CustomJoint knee_l: socket_parent_frame=femur_l_offset socket_child_frame=tibia_l_offset
      Coordinate knee_angle_l: default_value=0 range=(-2.094395 0.1745329) clamped=false
      PhysicalOffsetFrame femur_l_offset: socket_parent=/bodyset/femur_l translation=(0 0 0)
      PhysicalOffsetFrame tibia_l_offset: socket_parent=/bodyset/tibia_l translation=(0 0 0)
      SpatialTransform: axes_held_at_zero=(rotation2 rotation3 translation3)
        TransformAxis rotation1: coordinates=knee_angle_l axis=(0 0 1) LinearFunction(coefficients=1 0)
        TransformAxis translation1: coordinates=knee_angle_l axis=(1 0 0)
          SimmSpline: x=(-2.0944 -1.74533 -1.39626 -1.0472 -0.698132 -0.349066 -0.174533 0.197344 0.337395 0.490178 1.52146 2.0944)
              y=(-0.0032 0.00179 0.00411 0.0041 0.00212 -0.001 -0.0031 -0.005227 -0.005435 -0.005574 -0.005435 -0.00525)
        TransformAxis translation2: coordinates=knee_angle_l axis=(0 1 0)
          SimmSpline: x=(-2.0944 -1.22173 -0.523599 -0.349066 -0.174533 0.159149 2.0944)
              y=(-0.4226 -0.4082 -0.399 -0.3976 -0.3966 -0.395264 -0.396)
    CustomJoint ankle_l: socket_parent_frame=tibia_l_offset socket_child_frame=talus_l_offset
      Coordinate ankle_angle_l: default_value=0 range=(-1.570796 1.570796) clamped=false
      PhysicalOffsetFrame tibia_l_offset: socket_parent=/bodyset/tibia_l translation=(0 -0.43 0)
      PhysicalOffsetFrame talus_l_offset: socket_parent=/bodyset/talus_l translation=(0 0 0)
      SpatialTransform: axes_held_at_zero=(rotation2 rotation3 translation1 translation2 translation3)
        TransformAxis rotation1: coordinates=ankle_angle_l axis=(0.1050135 0.1740224 0.9791263)
            LinearFunction(coefficients=1 0)
    CustomJoint subtalar_l: socket_parent_frame=talus_l_offset socket_child_frame=calcn_l_offset
      Coordinate subtalar_angle_l: default_value=0 range=(-1.570796 1.570796) clamped=false locked=true
      PhysicalOffsetFrame talus_l_offset: socket_parent=/bodyset/talus_l translation=(-0.04877 -0.04195 -0.00792)
      PhysicalOffsetFrame calcn_l_offset: socket_parent=/bodyset/calcn_l translation=(0 0 0)
      SpatialTransform: axes_held_at_zero=(rotation2 rotation3 translation1 translation2 translation3)
        TransformAxis rotation1: coordinates=subtalar_angle_l axis=(-0.7871796 -0.6047475 -0.1209495)
            LinearFunction(coefficients=1 0)
    CustomJoint mtp_l: socket_parent_frame=calcn_l_offset socket_child_frame=toes_l_offset
      Coordinate mtp_angle_l: default_value=0 range=(-1.570796 1.570796) clamped=false locked=true
      PhysicalOffsetFrame calcn_l_offset: socket_parent=/bodyset/calcn_l translation=(0.1788 -0.002 -0.00108)
      PhysicalOffsetFrame toes_l_offset: socket_parent=/bodyset/toes_l translation=(0 0 0)
      SpatialTransform: axes_held_at_zero=(rotation2 rotation3 translation1 translation2 translation3)
        TransformAxis rotation1: coordinates=mtp_angle_l axis=(0.5809544 0 0.8139361) LinearFunction(coefficients=1 0)
    CustomJoint back: socket_parent_frame=pelvis_offset socket_child_frame=torso_offset
      Coordinate lumbar_extension: default_value=-0.1396263 range=(-1.570796 1.570796) clamped=false locked=true
      Coordinate lumbar_bending: default_value=0 range=(-1.570796 1.570796) clamped=false locked=true
      Coordinate lumbar_rotation: default_value=0 range=(-1.570796 1.570796) clamped=false locked=true
      PhysicalOffsetFrame pelvis_offset: socket_parent=/bodyset/pelvis translation=(-0.1007 0.0815 0)
      PhysicalOffsetFrame torso_offset: socket_parent=/bodyset/torso translation=(0 0 0)
      SpatialTransform: axes_held_at_zero=(translation1 translation2 translation3)
        TransformAxis rotation1: coordinates=lumbar_extension axis=(0 0 1) LinearFunction(coefficients=1 0)
        TransformAxis rotation2: coordinates=lumbar_bending axis=(1 0 0) LinearFunction(coefficients=1 0)
        TransformAxis rotation3: coordinates=lumbar_rotation axis=(0 1 0) LinearFunction(coefficients=1 0)
    CustomJoint ground_H3_back: socket_parent_frame=ground_offset socket_child_frame=H3_back_offset
      Coordinate H3_back_tilt: default_value=0 range=(-1.570796 1.570796) clamped=false locked=true
      Coordinate H3_back_list: default_value=0 range=(-1.570796 1.570796) clamped=false locked=true
      Coordinate H3_back_rotation: default_value=0 range=(-1.570796 1.570796) clamped=false locked=true
      Coordinate H3_back_tx: default_value=0 range=(-5 5) clamped=false locked=true
      Coordinate H3_back_ty: default_value=0.91 range=(-1 2) clamped=false locked=true
      Coordinate H3_back_tz: default_value=0 range=(-3 3) clamped=false locked=true
      PhysicalOffsetFrame ground_offset: socket_parent=/ground translation=(0 0 0)
      PhysicalOffsetFrame H3_back_offset: socket_parent=/bodyset/H3_back translation=(0 0 0)
      SpatialTransform:
        TransformAxis rotation1: coordinates=H3_back_tilt axis=(0 0 1) LinearFunction(coefficients=1 0)
        TransformAxis rotation2: coordinates=H3_back_list axis=(1 0 0) LinearFunction(coefficients=1 0)
        TransformAxis rotation3: coordinates=H3_back_rotation axis=(0 1 0) LinearFunction(coefficients=1 0)
        TransformAxis translation1: coordinates=H3_back_tx axis=(1 0 0) LinearFunction(coefficients=1 0)
        TransformAxis translation2: coordinates=H3_back_ty axis=(0 1 0) LinearFunction(coefficients=1 0)
        TransformAxis translation3: coordinates=H3_back_tz axis=(0 0 1) LinearFunction(coefficients=1 0)
    WeldJoint H3_back_pelvis: socket_parent_frame=H3_back_offset socket_child_frame=pelvis_offset
      PhysicalOffsetFrame H3_back_offset: socket_parent=/bodyset/H3_back translation=(0.06 0.0661 0)
      PhysicalOffsetFrame pelvis_offset: socket_parent=/bodyset/pelvis translation=(0 0 0)
    CustomJoint H3_back_hip_motor_r: socket_parent_frame=H3_back_offset socket_child_frame=hip_motor_r_offset
      Coordinate H3_hip_flexion_r: default_value=-0.07504916 range=(-0.5236 1.8326) clamped=false
      PhysicalOffsetFrame H3_back_offset: socket_parent=/bodyset/H3_back translation=(0 0 0.1825)
      PhysicalOffsetFrame hip_motor_r_offset: socket_parent=/bodyset/hip_motor_r translation=(0 0 0)
      SpatialTransform:
        TransformAxis rotation1: axis=(1 0 0)
        TransformAxis rotation2: axis=(0 1 0)
        TransformAxis rotation3: coordinates=H3_hip_flexion_r axis=(0 0 1) LinearFunction(coefficients=1 0)
        TransformAxis translation1: axis=(1 0 0)
        TransformAxis translation2: axis=(0 1 0)
        TransformAxis translation3: axis=(0 0 1)
    WeldJoint hip_motor_r_H3_thigh_r: socket_parent_frame=hip_motor_r_offset socket_child_frame=H3_thigh_r_offset
      PhysicalOffsetFrame hip_motor_r_offset: socket_parent=/bodyset/hip_motor_r translation=(0 -0.20775 0.01325)
      PhysicalOffsetFrame H3_thigh_r_offset: socket_parent=/bodyset/H3_thigh_r translation=(0 0 0)
    WeldJoint hip_motor_r_H3_sup_thigh_girth_r: socket_parent_frame=hip_motor_r_offset
        socket_child_frame=H3_sup_thigh_girth_r_offset
      PhysicalOffsetFrame hip_motor_r_offset: socket_parent=/bodyset/hip_motor_r translation=(0 -0.121711 0.0075)
      PhysicalOffsetFrame H3_sup_thigh_girth_r_offset: socket_parent=/bodyset/H3_sup_thigh_girth_r translation=(0 0 0)
    WeldJoint H3_thigh_r_H3_knee_shell_r: socket_parent_frame=H3_thigh_r_offset
        socket_child_frame=H3_knee_shell_r_offset
      PhysicalOffsetFrame H3_thigh_r_offset: socket_parent=/bodyset/H3_thigh_r translation=(0 -0.18375 -0.013)
      PhysicalOffsetFrame H3_knee_shell_r_offset: socket_parent=/bodyset/H3_knee_shell_r translation=(0 0 0)
    WeldJoint H3_knee_shell_r_H3_inf_thigh_girth_r: socket_parent_frame=H3_knee_shell_r_offset
        socket_child_frame=H3_inf_thigh_girth_r_offset
      PhysicalOffsetFrame H3_knee_shell_r_offset: socket_parent=/bodyset/H3_knee_shell_r translation=(0 0.0975 0.0075)
      PhysicalOffsetFrame H3_inf_thigh_girth_r_offset: socket_parent=/bodyset/H3_inf_thigh_girth_r translation=(0 0 0)
    CustomJoint H3_knee_shell_r_knee_motor_r: socket_parent_frame=H3_knee_shell_r_offset
        socket_child_frame=knee_motor_r_offset
      Coordinate H3_knee_angle_r: default_value=0.0413643 range=(-1.8326 0.08726646) clamped=false
      PhysicalOffsetFrame H3_knee_shell_r_offset: socket_parent=/bodyset/H3_knee_shell_r translation=(0 0 0)
      PhysicalOffsetFrame knee_motor_r_offset: socket_parent=/bodyset/knee_motor_r translation=(0 0 0)
      SpatialTransform:
        TransformAxis rotation1: axis=(1 0 0)
        TransformAxis rotation2: axis=(0 1 0)
        TransformAxis rotation3: coordinates=H3_knee_angle_r axis=(0 0 1) LinearFunction(coefficients=1 0)
        TransformAxis translation1: axis=(1 0 0)
        TransformAxis translation2: axis=(0 1 0)
        TransformAxis translation3: axis=(0 0 1)
    WeldJoint knee_motor_r_H3_shank_r: socket_parent_frame=knee_motor_r_offset socket_child_frame=H3_shank_r_offset
      PhysicalOffsetFrame knee_motor_r_offset: socket_parent=/bodyset/knee_motor_r translation=(0 -0.225 0.01325)
      PhysicalOffsetFrame H3_shank_r_offset: socket_parent=/bodyset/H3_shank_r translation=(0 0 0)
    WeldJoint H3_shank_r_H3_ankle_shell_r: socket_parent_frame=H3_shank_r_offset
        socket_child_frame=H3_ankle_shell_r_offset
      PhysicalOffsetFrame H3_shank_r_offset: socket_parent=/bodyset/H3_shank_r translation=(0 -0.2 -0.013)
      PhysicalOffsetFrame H3_ankle_shell_r_offset: socket_parent=/bodyset/H3_ankle_shell_r translation=(0 0 0)
    CustomJoint H3_ankle_shell_r_ankle_motor_r: socket_parent_frame=H3_ankle_shell_r_offset
        socket_child_frame=ankle_motor_r_offset
      Coordinate H3_ankle_angle_r: default_value=0 range=(-0.5235988 0.5235988) clamped=false
      PhysicalOffsetFrame H3_ankle_shell_r_offset: socket_parent=/bodyset/H3_ankle_shell_r translation=(0 0 0)
      PhysicalOffsetFrame ankle_motor_r_offset: socket_parent=/bodyset/ankle_motor_r translation=(0 0 0)
      SpatialTransform:
        TransformAxis rotation1: axis=(1 0 0)
        TransformAxis rotation2: axis=(0 1 0)
        TransformAxis rotation3: coordinates=H3_ankle_angle_r axis=(0 0 1) LinearFunction(coefficients=1 0)
        TransformAxis translation1: axis=(1 0 0)
        TransformAxis translation2: axis=(0 1 0)
        TransformAxis translation3: axis=(0 0 1)
    WeldJoint knee_motor_r_H3_sup_shank_girth_r: socket_parent_frame=knee_motor_r_offset
        socket_child_frame=H3_sup_shank_girth_r_offset
      PhysicalOffsetFrame knee_motor_r_offset: socket_parent=/bodyset/knee_motor_r translation=(0 -0.125 0.0075)
      PhysicalOffsetFrame H3_sup_shank_girth_r_offset: socket_parent=/bodyset/H3_sup_shank_girth_r translation=(0 0 0)
    WeldJoint H3_ankle_shell_r_H3_inf_shank_girth_r: socket_parent_frame=H3_ankle_shell_r_offset
        socket_child_frame=H3_inf_shank_girth_r_offset
      PhysicalOffsetFrame H3_ankle_shell_r_offset: socket_parent=/bodyset/H3_ankle_shell_r translation=(0 0.08 0.0075)
      PhysicalOffsetFrame H3_inf_shank_girth_r_offset: socket_parent=/bodyset/H3_inf_shank_girth_r translation=(0 0 0)
    WeldJoint ankle_motor_r_H3_foot_r: socket_parent_frame=ankle_motor_r_offset socket_child_frame=H3_foot_r_offset
      PhysicalOffsetFrame ankle_motor_r_offset: socket_parent=/bodyset/ankle_motor_r translation=(0 -0.061687 0.013)
      PhysicalOffsetFrame H3_foot_r_offset: socket_parent=/bodyset/H3_foot_r translation=(0 0 0)
    CustomJoint H3_back_hip_motor_l: socket_parent_frame=H3_back_offset socket_child_frame=hip_motor_l_offset
      Coordinate H3_hip_flexion_l: default_value=-0.07504916 range=(-0.5236 1.8326) clamped=false
      PhysicalOffsetFrame H3_back_offset: socket_parent=/bodyset/H3_back translation=(0 0 -0.1825)
      PhysicalOffsetFrame hip_motor_l_offset: socket_parent=/bodyset/hip_motor_l translation=(0 0 0)
      SpatialTransform:
        TransformAxis rotation1: axis=(1 0 0)
        TransformAxis rotation2: axis=(0 1 0)
        TransformAxis rotation3: coordinates=H3_hip_flexion_l axis=(0 0 1) LinearFunction(coefficients=1 0)
        TransformAxis translation1: axis=(1 0 0)
        TransformAxis translation2: axis=(0 1 0)
        TransformAxis translation3: axis=(0 0 1)
    WeldJoint hip_motor_l_H3_thigh_l: socket_parent_frame=hip_motor_l_offset socket_child_frame=H3_thigh_l_offset
      PhysicalOffsetFrame hip_motor_l_offset: socket_parent=/bodyset/hip_motor_l translation=(0 -0.20775 -0.01325)
      PhysicalOffsetFrame H3_thigh_l_offset: socket_parent=/bodyset/H3_thigh_l translation=(0 0 0)
    WeldJoint hip_motor_l_H3_sup_thigh_girth_l: socket_parent_frame=hip_motor_l_offset
        socket_child_frame=H3_sup_thigh_girth_l_offset
      PhysicalOffsetFrame hip_motor_l_offset: socket_parent=/bodyset/hip_motor_l translation=(0 -0.121711 -0.0075)
      PhysicalOffsetFrame H3_sup_thigh_girth_l_offset: socket_parent=/bodyset/H3_sup_thigh_girth_l translation=(0 0 0)
    WeldJoint H3_thigh_l_H3_knee_shell_l: socket_parent_frame=H3_thigh_l_offset
        socket_child_frame=H3_knee_shell_l_offset
      PhysicalOffsetFrame H3_thigh_l_offset: socket_parent=/bodyset/H3_thigh_l translation=(0 -0.18375 0.013)
      PhysicalOffsetFrame H3_knee_shell_l_offset: socket_parent=/bodyset/H3_knee_shell_l translation=(0 0 0)
    WeldJoint H3_knee_shell_l_H3_inf_thigh_girth_l: socket_parent_frame=H3_knee_shell_l_offset
        socket_child_frame=H3_inf_thigh_girth_l_offset
      PhysicalOffsetFrame H3_knee_shell_l_offset: socket_parent=/bodyset/H3_knee_shell_l translation=(0 0.0975 -0.0075)
      PhysicalOffsetFrame H3_inf_thigh_girth_l_offset: socket_parent=/bodyset/H3_inf_thigh_girth_l translation=(0 0 0)
    CustomJoint H3_knee_shell_l_knee_motor_l: socket_parent_frame=H3_knee_shell_l_offset
        socket_child_frame=knee_motor_l_offset
      Coordinate H3_knee_angle_l: default_value=0.0413643 range=(-1.8326 0.08726646) clamped=false
      PhysicalOffsetFrame H3_knee_shell_l_offset: socket_parent=/bodyset/H3_knee_shell_l translation=(0 0 0)
      PhysicalOffsetFrame knee_motor_l_offset: socket_parent=/bodyset/knee_motor_l translation=(0 0 0)
      SpatialTransform:
        TransformAxis rotation1: axis=(1 0 0)
        TransformAxis rotation2: axis=(0 1 0)
        TransformAxis rotation3: coordinates=H3_knee_angle_l axis=(0 0 1) LinearFunction(coefficients=1 0)
        TransformAxis translation1: axis=(1 0 0)
        TransformAxis translation2: axis=(0 1 0)
        TransformAxis translation3: axis=(0 0 1)
    WeldJoint knee_motor_l_H3_shank_l: socket_parent_frame=knee_motor_l_offset socket_child_frame=H3_shank_l_offset
      PhysicalOffsetFrame knee_motor_l_offset: socket_parent=/bodyset/knee_motor_l translation=(0 -0.225 -0.01325)
      PhysicalOffsetFrame H3_shank_l_offset: socket_parent=/bodyset/H3_shank_l translation=(0 0 0)
    WeldJoint H3_shank_l_H3_ankle_shell_l: socket_parent_frame=H3_shank_l_offset
        socket_child_frame=H3_ankle_shell_l_offset
      PhysicalOffsetFrame H3_shank_l_offset: socket_parent=/bodyset/H3_shank_l translation=(0 -0.2 0.013)
      PhysicalOffsetFrame H3_ankle_shell_l_offset: socket_parent=/bodyset/H3_ankle_shell_l translation=(0 0 0)
    CustomJoint H3_ankle_shell_l_ankle_motor_l: socket_parent_frame=H3_ankle_shell_l_offset
        socket_child_frame=ankle_motor_l_offset
      Coordinate H3_ankle_angle_l: default_value=0 range=(-0.5235988 0.5235988) clamped=false
      PhysicalOffsetFrame H3_ankle_shell_l_offset: socket_parent=/bodyset/H3_ankle_shell_l translation=(0 0 0)
      PhysicalOffsetFrame ankle_motor_l_offset: socket_parent=/bodyset/ankle_motor_l translation=(0 0 0)
      SpatialTransform:
        TransformAxis rotation1: axis=(1 0 0)
        TransformAxis rotation2: axis=(0 1 0)
        TransformAxis rotation3: coordinates=H3_ankle_angle_l axis=(0 0 1) LinearFunction(coefficients=1 0)
        TransformAxis translation1: axis=(1 0 0)
        TransformAxis translation2: axis=(0 1 0)
        TransformAxis translation3: axis=(0 0 1)
    WeldJoint knee_motor_l_H3_sup_shank_girth_l: socket_parent_frame=knee_motor_l_offset
        socket_child_frame=H3_sup_shank_girth_l_offset
      PhysicalOffsetFrame knee_motor_l_offset: socket_parent=/bodyset/knee_motor_l translation=(0 -0.125 -0.0075)
      PhysicalOffsetFrame H3_sup_shank_girth_l_offset: socket_parent=/bodyset/H3_sup_shank_girth_l translation=(0 0 0)
    WeldJoint H3_ankle_shell_l_H3_inf_shank_girth_l: socket_parent_frame=H3_ankle_shell_l_offset
        socket_child_frame=H3_inf_shank_girth_l_offset
      PhysicalOffsetFrame H3_ankle_shell_l_offset: socket_parent=/bodyset/H3_ankle_shell_l translation=(0 0.08 -0.0075)
      PhysicalOffsetFrame H3_inf_shank_girth_l_offset: socket_parent=/bodyset/H3_inf_shank_girth_l translation=(0 0 0)
    WeldJoint ankle_motor_l_H3_foot_l: socket_parent_frame=ankle_motor_l_offset socket_child_frame=H3_foot_l_offset
      PhysicalOffsetFrame ankle_motor_l_offset: socket_parent=/bodyset/ankle_motor_l translation=(0 -0.061687 -0.013)
      PhysicalOffsetFrame H3_foot_l_offset: socket_parent=/bodyset/H3_foot_l translation=(0 0 0)
  ForceSet:
    Millard2012EquilibriumMuscle [values shared by the 92 below unless stated]: optimal_force=1
        max_contraction_velocity=10 activation_time_constant=0.01 [seconds] deactivation_time_constant=0.04 [seconds]
        minimum_activation=0.01
      ActiveForceLengthCurve: minimum_value=0
      ForceVelocityCurve: concentric_slope_at_vmax=0 concentric_slope_near_vmax=0.25 isometric_slope=5
          eccentric_slope_at_vmax=0 eccentric_slope_near_vmax=0.15 max_eccentric_velocity_force_multiplier=1.4
      FiberForceLengthCurve
      TendonForceLengthCurve
    Millard2012EquilibriumMuscle glut_med1_r: max_isometric_force=819 optimal_fiber_length=0.0535
        tendon_slack_length=0.078 pennation_angle_at_optimal=0.1396263 [radians]
      PathPoint P1: pelvis (-0.0408 0.0304 0.1209)
      PathPoint P2: femur_r (-0.0218 -0.0117 0.0555)
    Millard2012EquilibriumMuscle glut_med2_r: max_isometric_force=573 optimal_fiber_length=0.0845
        tendon_slack_length=0.053 pennation_angle_at_optimal=0
      PathPoint P1: pelvis (-0.0855 0.0445 0.0766)
      PathPoint P2: femur_r (-0.0258 -0.0058 0.0527)
    Millard2012EquilibriumMuscle glut_med3_r: max_isometric_force=653 optimal_fiber_length=0.0646
        tendon_slack_length=0.053 pennation_angle_at_optimal=0.3316126
      PathPoint P1: pelvis (-0.1223 0.0105 0.0648)
      PathPoint P2: femur_r (-0.0309 -0.0047 0.0518)
    Millard2012EquilibriumMuscle glut_min1_r: max_isometric_force=270 optimal_fiber_length=0.068
        tendon_slack_length=0.016 pennation_angle_at_optimal=0.1745329
      PathPoint P1: pelvis (-0.0467 -0.008 0.1056)
      PathPoint P2: femur_r (-0.0072 -0.0104 0.056)
    Millard2012EquilibriumMuscle glut_min2_r: max_isometric_force=285 optimal_fiber_length=0.056
        tendon_slack_length=0.026 pennation_angle_at_optimal=0
      PathPoint P1: pelvis (-0.0633 -0.0065 0.0991)
      PathPoint P2: femur_r (-0.0096 -0.0104 0.056)
    Millard2012EquilibriumMuscle glut_min3_r: max_isometric_force=323 optimal_fiber_length=0.038
        tendon_slack_length=0.051 pennation_angle_at_optimal=0.01745329
      PathPoint P1: pelvis (-0.0834 -0.0063 0.0856)
      PathPoint P2: femur_r (-0.0135 -0.0083 0.055)
    Millard2012EquilibriumMuscle semimem_r: max_isometric_force=1288 optimal_fiber_length=0.08
        tendon_slack_length=0.359 pennation_angle_at_optimal=0.2617994
      PathPoint P1: pelvis (-0.1192 -0.09747 0.07151)
      ConditionalPathPoint P2: tibia_r (-0.0348 -0.03519 -0.01891) socket_coordinate=/jointset/knee_r/knee_angle_r
          range=(-0.558505 0.174533) [radians]
      PathPoint P3: tibia_r (-0.027 -0.04771 -0.01957)
    Millard2012EquilibriumMuscle semiten_r: max_isometric_force=410 optimal_fiber_length=0.201
        tendon_slack_length=0.2555 pennation_angle_at_optimal=0.08726646
      PathPoint P1: pelvis (-0.12635 -0.10988 0.06039)
      ConditionalPathPoint P2: tibia_r (-0.04203 -0.02859 -0.02277) socket_coordinate=/jointset/knee_r/knee_angle_r
          range=(-0.331613 0.174533)
      PathPoint P3: tibia_r (-0.03322 -0.05282 -0.02288)
      PathPoint P4: tibia_r (-0.0113 -0.0746 -0.0245)
      PathPoint P5: tibia_r (0.0027 -0.0956 -0.0193)
    Millard2012EquilibriumMuscle bifemlh_r: max_isometric_force=896 optimal_fiber_length=0.109
        tendon_slack_length=0.326 pennation_angle_at_optimal=0
      PathPoint P1: pelvis (-0.12596 -0.10257 0.06944)
      PathPoint P2: tibia_r (-0.0301 -0.036 0.02943)
      PathPoint P3: tibia_r (-0.0234 -0.0563 0.0343)
    Millard2012EquilibriumMuscle bifemsh_r: max_isometric_force=804 optimal_fiber_length=0.173
        tendon_slack_length=0.089 pennation_angle_at_optimal=0.4014257
      PathPoint P1: femur_r (0.005 -0.2111 0.0234)
      PathPoint P2: tibia_r (-0.0301 -0.036 0.02943)
      PathPoint P3: tibia_r (-0.0234 -0.0563 0.0343)
    Millard2012EquilibriumMuscle sar_r: max_isometric_force=156 optimal_fiber_length=0.52 tendon_slack_length=0.1
        pennation_angle_at_optimal=0
      PathPoint P1: pelvis (-0.0153 -0.0013 0.1242)
      PathPoint P2: femur_r (-0.003 -0.3568 -0.0421)
      PathPoint P3: tibia_r (-0.0056 -0.0419 -0.0399)
      PathPoint P4: tibia_r (0.006 -0.0589 -0.0383)
      PathPoint P5: tibia_r (0.0243 -0.084 -0.0252)
    Millard2012EquilibriumMuscle add_long_r: max_isometric_force=627 optimal_fiber_length=0.138
        tendon_slack_length=0.11 pennation_angle_at_optimal=0.1047198
      PathPoint P1: pelvis (-0.0316 -0.0836 0.0169)
      PathPoint P2: femur_r (0.005 -0.2111 0.0234)
    Millard2012EquilibriumMuscle add_brev_r: max_isometric_force=429 optimal_fiber_length=0.133
        tendon_slack_length=0.02 pennation_angle_at_optimal=0
      PathPoint P1: pelvis (-0.0587 -0.0915 0.0164)
      PathPoint P2: femur_r (0.0009 -0.1196 0.0294)
    Millard2012EquilibriumMuscle add_mag1_r: max_isometric_force=381 optimal_fiber_length=0.087
        tendon_slack_length=0.06 pennation_angle_at_optimal=0.08726646
      PathPoint P1: pelvis (-0.0732 -0.1174 0.0255)
      PathPoint P2: femur_r (-0.0045 -0.1211 0.0339)
    Millard2012EquilibriumMuscle add_mag2_r: max_isometric_force=343 optimal_fiber_length=0.121
        tendon_slack_length=0.12 pennation_angle_at_optimal=0.05235988
      PathPoint P1: pelvis (-0.0831 -0.1192 0.0308)
      PathPoint P2: femur_r (0.0054 -0.2285 0.0227)
    Millard2012EquilibriumMuscle add_mag3_r: max_isometric_force=488 optimal_fiber_length=0.131
        tendon_slack_length=0.249 pennation_angle_at_optimal=0.08726646
      PathPoint P1: pelvis (-0.11108 -0.11413 0.04882)
      PathPoint P2: femur_r (0.007 -0.3837 -0.0266)
    Millard2012EquilibriumMuscle tfl_r: max_isometric_force=233 optimal_fiber_length=0.095 tendon_slack_length=0.425
        pennation_angle_at_optimal=0.05235988
      PathPoint P1: pelvis (-0.0311 0.0214 0.1241)
      PathPoint P2: femur_r (0.0294 -0.0995 0.0597)
      PathPoint P3: femur_r (0.0054 -0.4049 0.0357)
      PathPoint P4: tibia_r (0.006 -0.0487 0.0297)
    Millard2012EquilibriumMuscle pect_r: max_isometric_force=266 optimal_fiber_length=0.1 tendon_slack_length=0.033
        pennation_angle_at_optimal=0
      PathPoint P1: pelvis (-0.0431 -0.0768 0.0451)
      PathPoint P2: femur_r (-0.0122 -0.0822 0.0253)
    Millard2012EquilibriumMuscle grac_r: max_isometric_force=162 optimal_fiber_length=0.352 tendon_slack_length=0.126
        pennation_angle_at_optimal=0.05235988
      PathPoint P1: pelvis (-0.07401 -0.1187 0.02794)
      ConditionalPathPoint P2: tibia_r (-0.02657 -0.0319 -0.03774) socket_coordinate=/jointset/knee_r/knee_angle_r
          range=(-0.436332 0.174533)
      PathPoint P3: tibia_r (-0.01943 -0.05153 -0.0358)
      PathPoint P4: tibia_r (0.006 -0.0836 -0.0228)
    Millard2012EquilibriumMuscle glut_max1_r: max_isometric_force=573 optimal_fiber_length=0.142
        tendon_slack_length=0.125 pennation_angle_at_optimal=0.08726646
      PathPoint P1: pelvis (-0.1195 0.0612 0.07)
      PathPoint P2: pelvis (-0.1291 0.0012 0.0886)
      PathPoint P3: femur_r (-0.0457 -0.0248 0.0392)
      PathPoint P4: femur_r (-0.0277 -0.0566 0.047)
    Millard2012EquilibriumMuscle glut_max2_r: max_isometric_force=819 optimal_fiber_length=0.147
        tendon_slack_length=0.127 pennation_angle_at_optimal=0
      PathPoint P1: pelvis (-0.1349 0.0176 0.0563)
      PathPoint P2: pelvis (-0.1376 -0.052 0.0914)
      PathPoint P3: femur_r (-0.0426 -0.053 0.0293)
      PathPoint P4: femur_r (-0.0156 -0.1016 0.0419)
    Millard2012EquilibriumMuscle glut_max3_r: max_isometric_force=552 optimal_fiber_length=0.144
        tendon_slack_length=0.145 pennation_angle_at_optimal=0.08726646
      PathPoint P1: pelvis (-0.1556 -0.0314 0.0058)
      PathPoint P2: pelvis (-0.1529 -0.1052 0.0403)
      PathPoint P3: femur_r (-0.0299 -0.1041 0.0135)
      PathPoint P4: femur_r (-0.006 -0.1419 0.0411)
    Millard2012EquilibriumMuscle iliacus_r: max_isometric_force=1073 optimal_fiber_length=0.1 tendon_slack_length=0.1
        pennation_angle_at_optimal=0.1221731
      PathPoint P1: pelvis (-0.0674 0.0365 0.0854)
      PathPoint P2: pelvis (-0.0258 -0.055 0.0811)
      ConditionalPathPoint P3: pelvis (-0.0288 -0.0805 0.0816) socket_coordinate=/jointset/hip_r/hip_flexion_r
          range=(-1.5708 0.785398)
      PathPoint P4: femur_r (0.0017 -0.0543 0.0057)
      PathPoint P5: femur_r (-0.0193 -0.0621 0.0129)
    Millard2012EquilibriumMuscle psoas_r: max_isometric_force=1113 optimal_fiber_length=0.1 tendon_slack_length=0.16
        pennation_angle_at_optimal=0.1396263
      PathPoint P1: pelvis (-0.0647 0.0887 0.0289)
      PathPoint P2: pelvis (-0.0238 -0.057 0.0759)
      ConditionalPathPoint P3: pelvis (-0.0288 -0.0805 0.0816) socket_coordinate=/jointset/hip_r/hip_flexion_r
          range=(-1.5708 0.785398)
      PathPoint P4: femur_r (0.0016 -0.0507 0.0038)
      PathPoint P5: femur_r (-0.0188 -0.0597 0.0104)
    Millard2012EquilibriumMuscle quad_fem_r: max_isometric_force=381 optimal_fiber_length=0.054
        tendon_slack_length=0.024 pennation_angle_at_optimal=0
      PathPoint P1: pelvis (-0.1143 -0.1151 0.052)
      PathPoint P2: femur_r (-0.0381 -0.0359 0.0366)
    Millard2012EquilibriumMuscle gem_r: max_isometric_force=164 optimal_fiber_length=0.024 tendon_slack_length=0.039
        pennation_angle_at_optimal=0
      PathPoint P1: pelvis (-0.1133 -0.082 0.0714)
      PathPoint P2: femur_r (-0.0142 -0.0033 0.0443)
    Millard2012EquilibriumMuscle peri_r: max_isometric_force=444 optimal_fiber_length=0.026 tendon_slack_length=0.115
        pennation_angle_at_optimal=0.1745329
      PathPoint P1: pelvis (-0.1396 0.0003 0.0235)
      PathPoint P2: pelvis (-0.1193 -0.0276 0.0657)
      PathPoint P3: femur_r (-0.0148 -0.0036 0.0437)
    Millard2012EquilibriumMuscle rect_fem_r: max_isometric_force=1169 optimal_fiber_length=0.114
        tendon_slack_length=0.31 pennation_angle_at_optimal=0.08726646
      PathPoint P1: pelvis (-0.0295 -0.0311 0.0968)
      ConditionalPathPoint P2: femur_r (0.0334 -0.403 0.0019) socket_coordinate=/jointset/knee_r/knee_angle_r
          range=(-2.61799 -1.45997)
      MovingPathPoint P3: tibia_r socket_x_coordinate=/jointset/knee_r/knee_angle_r
          socket_y_coordinate=/jointset/knee_r/knee_angle_r socket_z_coordinate=/jointset/knee_r/knee_angle_r
        x_location: SimmSpline: x=(-2.0944 -1.99997 -1.5708 -1.45752 -1.39626 -1.0472 -0.698132 -0.526391 -0.349066 -0.174533 0 0.00017453 0.00034907 0.0279253 0.0872665 0.174533 2.0944)
            y=(0.0155805 0.0179938 0.0275081 0.0296564 0.0307615 0.0365695 0.0422074 0.0450902 0.048391 0.0534299 0.0617576 0.0617669 0.0617762 0.0633083 0.066994 0.0733035 0.0573481)
        y_location: SimmSpline: x=(-2.0944 -1.99997 -1.5708 -1.45752 -1.39626 -1.0472 -0.698132 -0.526391 -0.349066 -0.174533 0 0.00017453 0.00034907 0.0279253 0.0872665 0.174533 2.0944)
            y=(0.0234116 0.0237613 0.0251141 0.0252795 0.0253146 0.0249184 0.0242373 0.0238447 0.0234197 0.0227644 0.020984 0.0209814 0.0209788 0.0205225 0.0191754 0.0159554 -0.0673774)
        z_location: SimmSpline: x=(-2.0944 0.1745) y=(0.0014 0.0014)
    Millard2012EquilibriumMuscle vas_med_r: max_isometric_force=1294 optimal_fiber_length=0.089
        tendon_slack_length=0.126 pennation_angle_at_optimal=0.08726646
      PathPoint P1: femur_r (0.014 -0.2099 0.0188)
      PathPoint P2: femur_r (0.0356 -0.2769 0.0009)
      ConditionalPathPoint P3: femur_r (0.037 -0.4048 -0.0125) socket_coordinate=/jointset/knee_r/knee_angle_r
          range=(-2.61799 -1.21004)
      ConditionalPathPoint P4: femur_r (0.0274 -0.4255 -0.0131) socket_coordinate=/jointset/knee_r/knee_angle_r
          range=(-2.61799 -1.78006)
      MovingPathPoint P5: tibia_r socket_x_coordinate=/jointset/knee_r/knee_angle_r
          socket_y_coordinate=/jointset/knee_r/knee_angle_r socket_z_coordinate=/jointset/knee_r/knee_angle_r
        x_location: SimmSpline: x=(-2.0944 -1.99997 -1.5708 -1.45752 -1.39626 -1.0472 -0.698132 -0.526391 -0.349066 -0.174533 0 0.00017453 0.00034907 0.0279253 0.0872665 0.174533 2.0944)
            y=(0.00981097 0.0122243 0.0217371 0.0238851 0.0249902 0.0307959 0.0364187 0.0392871 0.0425654 0.0475764 0.0559586 0.0559681 0.0559776 0.0575419 0.0613368 0.0679503 0.0629332)
        y_location: SimmSpline: x=(-2.0944 -1.99997 -1.5708 -1.45752 -1.39626 -1.0472 -0.698132 -0.526391 -0.349066 -0.174533 0 0.00017453 0.00034907 0.0279253 0.0872665 0.174533 2.0944)
            y=(0.0224154 0.0227651 0.0241265 0.0242933 0.0243287 0.0239462 0.0233593 0.0230677 0.0228342 0.0226362 0.0217917 0.0217903 0.0217889 0.0215365 0.0206842 0.0183269 -0.0656205)
        z_location: SimmSpline: x=(-2.0944 2.0944) y=(-0.0146 -0.0146)
    Millard2012EquilibriumMuscle vas_int_r: max_isometric_force=1365 optimal_fiber_length=0.087
        tendon_slack_length=0.136 pennation_angle_at_optimal=0.05235988
      PathPoint P1: femur_r (0.029 -0.1924 0.031)
      PathPoint P2: femur_r (0.0335 -0.2084 0.0285)
      ConditionalPathPoint P3: femur_r (0.0343 -0.403 0.0055) socket_coordinate=/jointset/knee_r/knee_angle_r
          range=(-2.61799 -1.42)
      MovingPathPoint P4: tibia_r socket_x_coordinate=/jointset/knee_r/knee_angle_r
          socket_y_coordinate=/jointset/knee_r/knee_angle_r socket_z_coordinate=/jointset/knee_r/knee_angle_r
        x_location: SimmSpline: x=(-2.0944 -1.99997 -1.5708 -1.45752 -1.39626 -1.0472 -0.698132 -0.526391 -0.349066 -0.174533 0 0.00017453 0.00034907 0.0279253 0.0872665 0.174533 2.0944)
            y=(0.0082733 0.0106866 0.0202042 0.022353 0.0234583 0.0292715 0.0349465 0.037871 0.0412569 0.0465287 0.0554632 0.0554735 0.0554837 0.0571717 0.061272 0.0684368 0.0648818)
        y_location: SimmSpline: x=(-2.0944 -1.99997 -1.5708 -1.45752 -1.39626 -1.0472 -0.698132 -0.526391 -0.349066 -0.174533 0 0.00017453 0.00034907 0.0279253 0.0872665 0.174533 2.0944)
            y=(0.025599 0.0259487 0.0273124 0.0274796 0.0275151 0.0271363 0.0265737 0.0263073 0.0261187 0.0260129 0.0252923 0.0252911 0.0252898 0.0250526 0.0242191 0.0218288 -0.0685706)
        z_location: SimmSpline: x=(-2.0944 2.0944) y=(0.0018 0.0018)
    Millard2012EquilibriumMuscle vas_lat_r: max_isometric_force=1871 optimal_fiber_length=0.084
        tendon_slack_length=0.157 pennation_angle_at_optimal=0.08726646
      PathPoint P1: femur_r (0.0048 -0.1854 0.0349)
      PathPoint P2: femur_r (0.0269 -0.2591 0.0409)
      ConditionalPathPoint P3: femur_r (0.0361 -0.403 0.0205) socket_coordinate=/jointset/knee_r/knee_angle_r
          range=(-2.61799 -1.21004)
      ConditionalPathPoint P4: femur_r (0.0253 -0.4243 0.0184) socket_coordinate=/jointset/knee_r/knee_angle_r
          range=(-2.61799 -1.92004)
      MovingPathPoint P5: tibia_r socket_x_coordinate=/jointset/knee_r/knee_angle_r
          socket_y_coordinate=/jointset/knee_r/knee_angle_r socket_z_coordinate=/jointset/knee_r/knee_angle_r
        x_location: SimmSpline: x=(-2.0944 -1.99997 -1.5708 -1.45752 -1.39626 -1.0472 -0.698132 -0.526391 -0.349066 -0.174533 0 0.00017453 0.00034907 0.0279253 0.0872665 0.174533 2.0944)
            y=(0.0142897 0.016703 0.0262145 0.0283623 0.0294674 0.0352709 0.0408785 0.0437291 0.0469704 0.0518742 0.0599557 0.0599647 0.0599738 0.0614577 0.0650351 0.0711867 0.0583766)
        y_location: SimmSpline: x=(-2.0944 -1.99997 -1.5708 -1.45752 -1.39626 -1.0472 -0.698132 -0.526391 -0.349066 -0.174533 0 0.00017453 0.00034907 0.0279253 0.0872665 0.174533 2.0944)
            y=(0.0215318 0.0218815 0.0232362 0.0234019 0.0234371 0.0230439 0.0223842 0.0220151 0.0216359 0.0210971 0.0195864 0.0195842 0.019582 0.01919 0.018008 0.0151073 -0.0653421)
        z_location: SimmSpline: x=(-2.0944 2.0944) y=(0.0165 0.0165)
    Millard2012EquilibriumMuscle med_gas_r: max_isometric_force=1558 optimal_fiber_length=0.06 tendon_slack_length=0.39
        pennation_angle_at_optimal=0.296706
      PathPoint P1: femur_r (-0.019 -0.3929 -0.0235)
      ConditionalPathPoint P2: femur_r (-0.03 -0.4022 -0.0258) socket_coordinate=/jointset/knee_r/knee_angle_r
          range=(-0.785398 0.174533)
      PathPoint P3: calcn_r (0 0.031 -0.0053)
    Millard2012EquilibriumMuscle lat_gas_r: max_isometric_force=683 optimal_fiber_length=0.064 tendon_slack_length=0.38
        pennation_angle_at_optimal=0.1396263
      PathPoint P1: femur_r (-0.022 -0.3946 0.0272)
      ConditionalPathPoint P2: femur_r (-0.03 -0.4018 0.0274) socket_coordinate=/jointset/knee_r/knee_angle_r
          range=(-0.785398 0.174533)
      PathPoint P3: calcn_r (0 0.031 -0.0053)
    Millard2012EquilibriumMuscle soleus_r: max_isometric_force=3549 optimal_fiber_length=0.05 tendon_slack_length=0.25
        pennation_angle_at_optimal=0.4363323
      PathPoint P1: tibia_r (-0.0024 -0.1533 0.0071)
      PathPoint P2: calcn_r (0 0.031 -0.0053)
    Millard2012EquilibriumMuscle tib_post_r: max_isometric_force=1588 optimal_fiber_length=0.031
        tendon_slack_length=0.31 pennation_angle_at_optimal=0.2094395
      PathPoint P1: tibia_r (-0.0094 -0.1348 0.0019)
      PathPoint P2: tibia_r (-0.0144 -0.4051 -0.0229)
      PathPoint P3: calcn_r (0.0417 0.0334 -0.0286)
      PathPoint P4: calcn_r (0.0772 0.0159 -0.0281)
    Millard2012EquilibriumMuscle flex_dig_r: max_isometric_force=310 optimal_fiber_length=0.034 tendon_slack_length=0.4
        pennation_angle_at_optimal=0.1221731
      PathPoint P1: tibia_r (-0.0083 -0.2046 -0.0018)
      PathPoint P2: tibia_r (-0.0154 -0.4051 -0.0196)
      PathPoint P3: calcn_r (0.0436 0.0315 -0.028)
      PathPoint P4: calcn_r (0.0708 0.0176 -0.0263)
      PathPoint P5: calcn_r (0.1658 -0.0081 0.0116)
      PathPoint P6: toes_r (-0.0019 -0.0078 0.0147)
      PathPoint P7: toes_r (0.0285 -0.0071 0.0215)
      PathPoint P8: toes_r (0.0441 -0.006 0.0242)
    Millard2012EquilibriumMuscle flex_hal_r: max_isometric_force=322 optimal_fiber_length=0.043
        tendon_slack_length=0.38 pennation_angle_at_optimal=0.1745329
      PathPoint P1: tibia_r (-0.0079 -0.2334 0.0244)
      PathPoint P2: tibia_r (-0.0186 -0.4079 -0.0174)
      PathPoint P3: calcn_r (0.0374 0.0276 -0.0241)
      PathPoint P4: calcn_r (0.1038 0.0068 -0.0256)
      PathPoint P5: calcn_r (0.1726 -0.0053 -0.0269)
      PathPoint P6: toes_r (0.0155 -0.0064 -0.0265)
      PathPoint P7: toes_r (0.0562 -0.0102 -0.0181)
    Millard2012EquilibriumMuscle tib_ant_r: max_isometric_force=905 optimal_fiber_length=0.098
        tendon_slack_length=0.223 pennation_angle_at_optimal=0.08726646
      PathPoint P1: tibia_r (0.0179 -0.1624 0.0115)
      PathPoint P2: tibia_r (0.0329 -0.3951 -0.0177)
      PathPoint P3: calcn_r (0.1166 0.0178 -0.0305)
    Millard2012EquilibriumMuscle per_brev_r: max_isometric_force=435 optimal_fiber_length=0.05
        tendon_slack_length=0.161 pennation_angle_at_optimal=0.08726646
      PathPoint P1: tibia_r (-0.007 -0.2646 0.0325)
      PathPoint P2: tibia_r (-0.0198 -0.4184 0.0283)
      PathPoint P3: tibia_r (-0.0144 -0.4295 0.0289)
      PathPoint P4: calcn_r (0.0471 0.027 0.0233)
      PathPoint P5: calcn_r (0.0677 0.0219 0.0343)
    Millard2012EquilibriumMuscle per_long_r: max_isometric_force=943 optimal_fiber_length=0.049
        tendon_slack_length=0.345 pennation_angle_at_optimal=0.1745329
      PathPoint P1: tibia_r (0.0005 -0.1568 0.0362)
      PathPoint P2: tibia_r (-0.0207 -0.4205 0.0286)
      PathPoint P3: tibia_r (-0.0162 -0.4319 0.0289)
      PathPoint P4: calcn_r (0.0438 0.023 0.0221)
      PathPoint P5: calcn_r (0.0681 0.0106 0.0284)
      PathPoint P6: calcn_r (0.0852 0.0069 0.0118)
      PathPoint P7: calcn_r (0.1203 0.0085 -0.0184)
    Millard2012EquilibriumMuscle per_tert_r: max_isometric_force=180 optimal_fiber_length=0.079 tendon_slack_length=0.1
        pennation_angle_at_optimal=0.2268928
      PathPoint P1: tibia_r (0.001 -0.2804 0.0231)
      PathPoint P2: tibia_r (0.0229 -0.4069 0.0159)
      PathPoint P3: calcn_r (0.0857 0.0228 0.0299)
    Millard2012EquilibriumMuscle ext_dig_r: max_isometric_force=512 optimal_fiber_length=0.102
        tendon_slack_length=0.345 pennation_angle_at_optimal=0.1396263
      PathPoint P1: tibia_r (0.0032 -0.1381 0.0276)
      PathPoint P2: tibia_r (0.0289 -0.4007 0.0072)
      PathPoint P3: calcn_r (0.0922 0.0388 -0.0001)
      PathPoint P4: calcn_r (0.1616 0.0055 0.013)
      PathPoint P5: toes_r (0.0003 0.0047 0.0153)
      PathPoint P6: toes_r (0.0443 -0.0004 0.025)
    Millard2012EquilibriumMuscle ext_hal_r: max_isometric_force=162 optimal_fiber_length=0.111
        tendon_slack_length=0.305 pennation_angle_at_optimal=0.1047198
      PathPoint P1: tibia_r (0.0012 -0.1767 0.0228)
      PathPoint P2: tibia_r (0.0326 -0.3985 -0.0085)
      PathPoint P3: calcn_r (0.097 0.0389 -0.0211)
      PathPoint P4: calcn_r (0.1293 0.0309 -0.0257)
      PathPoint P5: calcn_r (0.1734 0.0139 -0.028)
      PathPoint P6: toes_r (0.0298 0.0041 -0.0245)
      PathPoint P7: toes_r (0.0563 0.0034 -0.0186)
    Millard2012EquilibriumMuscle glut_med1_l: max_isometric_force=819 optimal_fiber_length=0.0535
        tendon_slack_length=0.078 pennation_angle_at_optimal=0.1396263
      PathPoint P1: pelvis (-0.0408 0.0304 -0.1209)
      PathPoint P2: femur_l (-0.0218 -0.0117 -0.0555)
    Millard2012EquilibriumMuscle glut_med2_l: max_isometric_force=573 optimal_fiber_length=0.0845
        tendon_slack_length=0.053 pennation_angle_at_optimal=0
      PathPoint P1: pelvis (-0.0855 0.0445 -0.0766)
      PathPoint P2: femur_l (-0.0258 -0.0058 -0.0527)
    Millard2012EquilibriumMuscle glut_med3_l: max_isometric_force=653 optimal_fiber_length=0.0646
        tendon_slack_length=0.053 pennation_angle_at_optimal=0.3316126
      PathPoint P1: pelvis (-0.1223 0.0105 -0.0648)
      PathPoint P2: femur_l (-0.0309 -0.0047 -0.0518)
    Millard2012EquilibriumMuscle glut_min1_l: max_isometric_force=270 optimal_fiber_length=0.068
        tendon_slack_length=0.016 pennation_angle_at_optimal=0.1745329
      PathPoint P1: pelvis (-0.0467 -0.008 -0.1056)
      PathPoint P2: femur_l (-0.0072 -0.0104 -0.056)
    Millard2012EquilibriumMuscle glut_min2_l: max_isometric_force=285 optimal_fiber_length=0.056
        tendon_slack_length=0.026 pennation_angle_at_optimal=0
      PathPoint P1: pelvis (-0.0633 -0.0065 -0.0991)
      PathPoint P2: femur_l (-0.0096 -0.0104 -0.056)
    Millard2012EquilibriumMuscle glut_min3_l: max_isometric_force=323 optimal_fiber_length=0.038
        tendon_slack_length=0.051 pennation_angle_at_optimal=0.01745329
      PathPoint P1: pelvis (-0.0834 -0.0063 -0.0856)
      PathPoint P2: femur_l (-0.0135 -0.0083 -0.055)
    Millard2012EquilibriumMuscle semimem_l: max_isometric_force=1288 optimal_fiber_length=0.08
        tendon_slack_length=0.359 pennation_angle_at_optimal=0.2617994
      PathPoint P1: pelvis (-0.1192 -0.09747 -0.07151)
      ConditionalPathPoint P2: tibia_l (-0.0348 -0.03519 0.01891) socket_coordinate=/jointset/knee_l/knee_angle_l
          range=(-0.558505 0.174533)
      PathPoint P3: tibia_l (-0.027 -0.04771 0.01957)
    Millard2012EquilibriumMuscle semiten_l: max_isometric_force=410 optimal_fiber_length=0.201
        tendon_slack_length=0.2555 pennation_angle_at_optimal=0.08726646
      PathPoint P1: pelvis (-0.12635 -0.10988 -0.06039)
      ConditionalPathPoint P2: tibia_l (-0.04203 -0.02859 0.02277) socket_coordinate=/jointset/knee_l/knee_angle_l
          range=(-0.331613 0.174533)
      PathPoint P3: tibia_l (-0.03322 -0.05282 0.02288)
      PathPoint P4: tibia_l (-0.0113 -0.0746 0.0245)
      PathPoint P5: tibia_l (0.0027 -0.0956 0.0193)
    Millard2012EquilibriumMuscle bifemlh_l: max_isometric_force=896 optimal_fiber_length=0.109
        tendon_slack_length=0.326 pennation_angle_at_optimal=0
      PathPoint P1: pelvis (-0.12596 -0.10257 -0.06944)
      PathPoint P2: tibia_l (-0.0301 -0.036 -0.02943)
      PathPoint P3: tibia_l (-0.0234 -0.0563 -0.0343)
    Millard2012EquilibriumMuscle bifemsh_l: max_isometric_force=804 optimal_fiber_length=0.173
        tendon_slack_length=0.089 pennation_angle_at_optimal=0.4014257
      PathPoint P1: femur_l (0.005 -0.2111 -0.0234)
      PathPoint P2: tibia_l (-0.0301 -0.036 -0.02943)
      PathPoint P3: tibia_l (-0.0234 -0.0563 -0.0343)
    Millard2012EquilibriumMuscle sar_l: max_isometric_force=156 optimal_fiber_length=0.52 tendon_slack_length=0.1
        pennation_angle_at_optimal=0
      PathPoint P1: pelvis (-0.0153 -0.0013 -0.1242)
      PathPoint P2: femur_l (-0.003 -0.3568 0.0421)
      PathPoint P3: tibia_l (-0.0056 -0.0419 0.0399)
      PathPoint P4: tibia_l (0.006 -0.0589 0.0383)
      PathPoint P5: tibia_l (0.0243 -0.084 0.0252)
    Millard2012EquilibriumMuscle add_long_l: max_isometric_force=627 optimal_fiber_length=0.138
        tendon_slack_length=0.11 pennation_angle_at_optimal=0.1047198
      PathPoint P1: pelvis (-0.0316 -0.0836 -0.0169)
      PathPoint P2: femur_l (0.005 -0.2111 -0.0234)
    Millard2012EquilibriumMuscle add_brev_l: max_isometric_force=429 optimal_fiber_length=0.133
        tendon_slack_length=0.02 pennation_angle_at_optimal=0
      PathPoint P1: pelvis (-0.0587 -0.0915 -0.0164)
      PathPoint P2: femur_l (0.0009 -0.1196 -0.0294)
    Millard2012EquilibriumMuscle add_mag1_l: max_isometric_force=381 optimal_fiber_length=0.087
        tendon_slack_length=0.06 pennation_angle_at_optimal=0.08726646
      PathPoint P1: pelvis (-0.0732 -0.1174 -0.0255)
      PathPoint P2: femur_l (-0.0045 -0.1211 -0.0339)
    Millard2012EquilibriumMuscle add_mag2_l: max_isometric_force=343 optimal_fiber_length=0.121
        tendon_slack_length=0.12 pennation_angle_at_optimal=0.05235988
      PathPoint P1: pelvis (-0.0831 -0.1192 -0.0308)
      PathPoint P2: femur_l (0.0054 -0.2285 -0.0227)
    Millard2012EquilibriumMuscle add_mag3_l: max_isometric_force=488 optimal_fiber_length=0.131
        tendon_slack_length=0.249 pennation_angle_at_optimal=0.08726646
      PathPoint P1: pelvis (-0.11108 -0.11413 -0.04882)
      PathPoint P2: femur_l (0.007 -0.3837 0.0266)
    Millard2012EquilibriumMuscle tfl_l: max_isometric_force=233 optimal_fiber_length=0.095 tendon_slack_length=0.425
        pennation_angle_at_optimal=0.05235988
      PathPoint P1: pelvis (-0.0311 0.0214 -0.1241)
      PathPoint P2: femur_l (0.0294 -0.0995 -0.0597)
      PathPoint P3: femur_l (0.0054 -0.4049 -0.0357)
      PathPoint P4: tibia_l (0.006 -0.0487 -0.0297)
    Millard2012EquilibriumMuscle pect_l: max_isometric_force=266 optimal_fiber_length=0.1 tendon_slack_length=0.033
        pennation_angle_at_optimal=0
      PathPoint P1: pelvis (-0.0431 -0.0768 -0.0451)
      PathPoint P2: femur_l (-0.0122 -0.0822 -0.0253)
    Millard2012EquilibriumMuscle grac_l: max_isometric_force=162 optimal_fiber_length=0.352 tendon_slack_length=0.126
        pennation_angle_at_optimal=0.05235988
      PathPoint P1: pelvis (-0.07401 -0.1187 -0.02794)
      ConditionalPathPoint P2: tibia_l (-0.02657 -0.0319 0.03774) socket_coordinate=/jointset/knee_l/knee_angle_l
          range=(-0.436332 0.174533)
      PathPoint P3: tibia_l (-0.01943 -0.05153 0.0358)
      PathPoint P4: tibia_l (0.006 -0.0836 0.0228)
    Millard2012EquilibriumMuscle glut_max1_l: max_isometric_force=573 optimal_fiber_length=0.142
        tendon_slack_length=0.125 pennation_angle_at_optimal=0.08726646
      PathPoint P1: pelvis (-0.1195 0.0612 -0.07)
      PathPoint P2: pelvis (-0.1291 0.0012 -0.0886)
      PathPoint P3: femur_l (-0.0457 -0.0248 -0.0392)
      PathPoint P4: femur_l (-0.0277 -0.0566 -0.047)
    Millard2012EquilibriumMuscle glut_max2_l: max_isometric_force=819 optimal_fiber_length=0.147
        tendon_slack_length=0.127 pennation_angle_at_optimal=0
      PathPoint P1: pelvis (-0.1349 0.0176 -0.0563)
      PathPoint P2: pelvis (-0.1376 -0.052 -0.0914)
      PathPoint P3: femur_l (-0.0426 -0.053 -0.0293)
      PathPoint P4: femur_l (-0.0156 -0.1016 -0.0419)
    Millard2012EquilibriumMuscle glut_max3_l: max_isometric_force=552 optimal_fiber_length=0.144
        tendon_slack_length=0.145 pennation_angle_at_optimal=0.08726646
      PathPoint P1: pelvis (-0.1556 -0.0314 -0.0058)
      PathPoint P2: pelvis (-0.1529 -0.1052 -0.0403)
      PathPoint P3: femur_l (-0.0299 -0.1041 -0.0135)
      PathPoint P4: femur_l (-0.006 -0.1419 -0.0411)
    Millard2012EquilibriumMuscle iliacus_l: max_isometric_force=1073 optimal_fiber_length=0.1 tendon_slack_length=0.1
        pennation_angle_at_optimal=0.1221731
      PathPoint P1: pelvis (-0.0674 0.0365 -0.0854)
      PathPoint P2: pelvis (-0.0258 -0.055 -0.0811)
      ConditionalPathPoint P3: pelvis (-0.0288 -0.0805 -0.0816) socket_coordinate=/jointset/hip_l/hip_flexion_l
          range=(-1.5708 0.785398)
      PathPoint P4: femur_l (0.0017 -0.0543 -0.0057)
      PathPoint P5: femur_l (-0.0193 -0.0621 -0.0129)
    Millard2012EquilibriumMuscle psoas_l: max_isometric_force=1113 optimal_fiber_length=0.1 tendon_slack_length=0.16
        pennation_angle_at_optimal=0.1396263
      PathPoint P1: pelvis (-0.0647 0.0887 -0.0289)
      PathPoint P2: pelvis (-0.0238 -0.057 -0.0759)
      ConditionalPathPoint P3: pelvis (-0.0288 -0.0805 -0.0816) socket_coordinate=/jointset/hip_l/hip_flexion_l
          range=(-1.5708 0.785398)
      PathPoint P4: femur_l (0.0016 -0.0507 -0.0038)
      PathPoint P5: femur_l (-0.0188 -0.0597 -0.0104)
    Millard2012EquilibriumMuscle quad_fem_l: max_isometric_force=381 optimal_fiber_length=0.054
        tendon_slack_length=0.024 pennation_angle_at_optimal=0
      PathPoint P1: pelvis (-0.1143 -0.1151 -0.052)
      PathPoint P2: femur_l (-0.0381 -0.0359 -0.0366)
    Millard2012EquilibriumMuscle gem_l: max_isometric_force=164 optimal_fiber_length=0.024 tendon_slack_length=0.039
        pennation_angle_at_optimal=0
      PathPoint P1: pelvis (-0.1133 -0.082 -0.0714)
      PathPoint P2: femur_l (-0.0142 -0.0033 -0.0443)
    Millard2012EquilibriumMuscle peri_l: max_isometric_force=444 optimal_fiber_length=0.026 tendon_slack_length=0.115
        pennation_angle_at_optimal=0.1745329
      PathPoint P1: pelvis (-0.1396 0.0003 -0.0235)
      PathPoint P2: pelvis (-0.1193 -0.0276 -0.0657)
      PathPoint P3: femur_l (-0.0148 -0.0036 -0.0437)
    Millard2012EquilibriumMuscle rect_fem_l: max_isometric_force=1169 optimal_fiber_length=0.114
        tendon_slack_length=0.31 pennation_angle_at_optimal=0.08726646
      PathPoint P1: pelvis (-0.0295 -0.0311 -0.0968)
      ConditionalPathPoint P2: femur_l (0.0334 -0.403 -0.0019) socket_coordinate=/jointset/knee_l/knee_angle_l
          range=(-2.61799 -1.45997)
      MovingPathPoint P3: tibia_l socket_x_coordinate=/jointset/knee_l/knee_angle_l
          socket_y_coordinate=/jointset/knee_l/knee_angle_l socket_z_coordinate=/jointset/knee_l/knee_angle_l
        x_location: SimmSpline: x=(-2.0944 -1.99997 -1.5708 -1.45752 -1.39626 -1.0472 -0.698132 -0.526391 -0.349066 -0.174533 0 0.00017453 0.00034907 0.0279253 0.0872665 0.174533 2.0944)
            y=(0.0155805 0.0179938 0.0275081 0.0296564 0.0307615 0.0365695 0.0422074 0.0450902 0.048391 0.0534299 0.0617576 0.0617669 0.0617762 0.0633083 0.066994 0.0733035 0.0573481)
        y_location: SimmSpline: x=(-2.0944 -1.99997 -1.5708 -1.45752 -1.39626 -1.0472 -0.698132 -0.526391 -0.349066 -0.174533 0 0.00017453 0.00034907 0.0279253 0.0872665 0.174533 2.0944)
            y=(0.0234116 0.0237613 0.0251141 0.0252795 0.0253146 0.0249184 0.0242373 0.0238447 0.0234197 0.0227644 0.020984 0.0209814 0.0209788 0.0205225 0.0191754 0.0159554 -0.0673774)
        z_location: SimmSpline: x=(-2.0944 0.1745) y=(-0.0014 -0.0014)
    Millard2012EquilibriumMuscle vas_med_l: max_isometric_force=1294 optimal_fiber_length=0.089
        tendon_slack_length=0.126 pennation_angle_at_optimal=0.08726646
      PathPoint P1: femur_l (0.014 -0.2099 -0.0188)
      PathPoint P2: femur_l (0.0356 -0.2769 -0.0009)
      ConditionalPathPoint P3: femur_l (0.037 -0.4048 0.0125) socket_coordinate=/jointset/knee_l/knee_angle_l
          range=(-2.61799 -1.21004)
      ConditionalPathPoint P4: femur_l (0.0274 -0.4255 0.0131) socket_coordinate=/jointset/knee_l/knee_angle_l
          range=(-2.61799 -1.78006)
      MovingPathPoint P5: tibia_l socket_x_coordinate=/jointset/knee_l/knee_angle_l
          socket_y_coordinate=/jointset/knee_l/knee_angle_l socket_z_coordinate=/jointset/knee_l/knee_angle_l
        x_location: SimmSpline: x=(-2.0944 -1.99997 -1.5708 -1.45752 -1.39626 -1.0472 -0.698132 -0.526391 -0.349066 -0.174533 0 0.00017453 0.00034907 0.0279253 0.0872665 0.174533 2.0944)
            y=(0.00981097 0.0122243 0.0217371 0.0238851 0.0249902 0.0307959 0.0364187 0.0392871 0.0425654 0.0475764 0.0559586 0.0559681 0.0559776 0.0575419 0.0613368 0.0679503 0.0629332)
        y_location: SimmSpline: x=(-2.0944 -1.99997 -1.5708 -1.45752 -1.39626 -1.0472 -0.698132 -0.526391 -0.349066 -0.174533 0 0.00017453 0.00034907 0.0279253 0.0872665 0.174533 2.0944)
            y=(0.0224154 0.0227651 0.0241265 0.0242933 0.0243287 0.0239462 0.0233593 0.0230677 0.0228342 0.0226362 0.0217917 0.0217903 0.0217889 0.0215365 0.0206842 0.0183269 -0.0656205)
        z_location: SimmSpline: x=(-2.0944 2.0944) y=(0.0146 0.0146)
    Millard2012EquilibriumMuscle vas_int_l: max_isometric_force=1365 optimal_fiber_length=0.087
        tendon_slack_length=0.136 pennation_angle_at_optimal=0.05235988
      PathPoint P1: femur_l (0.029 -0.1924 -0.031)
      PathPoint P2: femur_l (0.0335 -0.2084 -0.0285)
      ConditionalPathPoint P3: femur_l (0.0343 -0.403 -0.0055) socket_coordinate=/jointset/knee_l/knee_angle_l
          range=(-2.61799 -1.42)
      MovingPathPoint P4: tibia_l socket_x_coordinate=/jointset/knee_l/knee_angle_l
          socket_y_coordinate=/jointset/knee_l/knee_angle_l socket_z_coordinate=/jointset/knee_l/knee_angle_l
        x_location: SimmSpline: x=(-2.0944 -1.99997 -1.5708 -1.45752 -1.39626 -1.0472 -0.698132 -0.526391 -0.349066 -0.174533 0 0.00017453 0.00034907 0.0279253 0.0872665 0.174533 2.0944)
            y=(0.0082733 0.0106866 0.0202042 0.022353 0.0234583 0.0292715 0.0349465 0.037871 0.0412569 0.0465287 0.0554632 0.0554735 0.0554837 0.0571717 0.061272 0.0684368 0.0648818)
        y_location: SimmSpline: x=(-2.0944 -1.99997 -1.5708 -1.45752 -1.39626 -1.0472 -0.698132 -0.526391 -0.349066 -0.174533 0 0.00017453 0.00034907 0.0279253 0.0872665 0.174533 2.0944)
            y=(0.025599 0.0259487 0.0273124 0.0274796 0.0275151 0.0271363 0.0265737 0.0263073 0.0261187 0.0260129 0.0252923 0.0252911 0.0252898 0.0250526 0.0242191 0.0218288 -0.0685706)
        z_location: SimmSpline: x=(-2.0944 2.0944) y=(-0.0018 -0.0018)
    Millard2012EquilibriumMuscle vas_lat_l: max_isometric_force=1871 optimal_fiber_length=0.084
        tendon_slack_length=0.157 pennation_angle_at_optimal=0.08726646
      PathPoint P1: femur_l (0.0048 -0.1854 -0.0349)
      PathPoint P2: femur_l (0.0269 -0.2591 -0.0409)
      ConditionalPathPoint P3: femur_l (0.0361 -0.403 -0.0205) socket_coordinate=/jointset/knee_l/knee_angle_l
          range=(-2.61799 -1.21004)
      ConditionalPathPoint P4: femur_l (0.0253 -0.4243 -0.0184) socket_coordinate=/jointset/knee_l/knee_angle_l
          range=(-2.61799 -1.92004)
      MovingPathPoint P5: tibia_l socket_x_coordinate=/jointset/knee_l/knee_angle_l
          socket_y_coordinate=/jointset/knee_l/knee_angle_l socket_z_coordinate=/jointset/knee_l/knee_angle_l
        x_location: SimmSpline: x=(-2.0944 -1.99997 -1.5708 -1.45752 -1.39626 -1.0472 -0.698132 -0.526391 -0.349066 -0.174533 0 0.00017453 0.00034907 0.0279253 0.0872665 0.174533 2.0944)
            y=(0.0142897 0.016703 0.0262145 0.0283623 0.0294674 0.0352709 0.0408785 0.0437291 0.0469704 0.0518742 0.0599557 0.0599647 0.0599738 0.0614577 0.0650351 0.0711867 0.0583766)
        y_location: SimmSpline: x=(-2.0944 -1.99997 -1.5708 -1.45752 -1.39626 -1.0472 -0.698132 -0.526391 -0.349066 -0.174533 0 0.00017453 0.00034907 0.0279253 0.0872665 0.174533 2.0944)
            y=(0.0215318 0.0218815 0.0232362 0.0234019 0.0234371 0.0230439 0.0223842 0.0220151 0.0216359 0.0210971 0.0195864 0.0195842 0.019582 0.01919 0.018008 0.0151073 -0.0653421)
        z_location: SimmSpline: x=(-2.0944 2.0944) y=(-0.0165 -0.0165)
    Millard2012EquilibriumMuscle med_gas_l: max_isometric_force=1558 optimal_fiber_length=0.06 tendon_slack_length=0.39
        pennation_angle_at_optimal=0.296706
      PathPoint P1: femur_l (-0.019 -0.3929 0.0235)
      ConditionalPathPoint P2: femur_l (-0.03 -0.4022 0.0258) socket_coordinate=/jointset/knee_l/knee_angle_l
          range=(-0.785398 0.174533)
      PathPoint P3: calcn_l (0 0.031 0.0053)
    Millard2012EquilibriumMuscle lat_gas_l: max_isometric_force=683 optimal_fiber_length=0.064 tendon_slack_length=0.38
        pennation_angle_at_optimal=0.1396263
      PathPoint P1: femur_l (-0.022 -0.3946 -0.0272)
      ConditionalPathPoint P2: femur_l (-0.03 -0.4018 -0.0274) socket_coordinate=/jointset/knee_l/knee_angle_l
          range=(-0.785398 0.174533)
      PathPoint P3: calcn_l (0 0.031 0.0053)
    Millard2012EquilibriumMuscle soleus_l: max_isometric_force=3549 optimal_fiber_length=0.05 tendon_slack_length=0.25
        pennation_angle_at_optimal=0.4363323
      PathPoint P1: tibia_l (-0.0024 -0.1533 -0.0071)
      PathPoint P2: calcn_l (0 0.031 0.0053)
    Millard2012EquilibriumMuscle tib_post_l: max_isometric_force=1588 optimal_fiber_length=0.031
        tendon_slack_length=0.31 pennation_angle_at_optimal=0.2094395
      PathPoint P1: tibia_l (-0.0094 -0.1348 -0.0019)
      PathPoint P2: tibia_l (-0.0144 -0.4051 0.0229)
      PathPoint P3: calcn_l (0.0417 0.0334 0.0286)
      PathPoint P4: calcn_l (0.0772 0.0159 0.0281)
    Millard2012EquilibriumMuscle flex_dig_l: max_isometric_force=310 optimal_fiber_length=0.034 tendon_slack_length=0.4
        pennation_angle_at_optimal=0.1221731
      PathPoint P1: tibia_l (-0.0083 -0.2046 0.0018)
      PathPoint P2: tibia_l (-0.0154 -0.4051 0.0196)
      PathPoint P3: calcn_l (0.0436 0.0315 0.028)
      PathPoint P4: calcn_l (0.0708 0.0176 0.0263)
      PathPoint P5: calcn_l (0.1658 -0.0081 -0.0116)
      PathPoint P6: toes_l (-0.0019 -0.0078 -0.0147)
      PathPoint P7: toes_l (0.0285 -0.0071 -0.0215)
      PathPoint P8: toes_l (0.0441 -0.006 -0.0242)
    Millard2012EquilibriumMuscle flex_hal_l: max_isometric_force=322 optimal_fiber_length=0.043
        tendon_slack_length=0.38 pennation_angle_at_optimal=0.1745329
      PathPoint P1: tibia_l (-0.0079 -0.2334 -0.0244)
      PathPoint P2: tibia_l (-0.0186 -0.4079 0.0174)
      PathPoint P3: calcn_l (0.0374 0.0276 0.0241)
      PathPoint P4: calcn_l (0.1038 0.0068 0.0256)
      PathPoint P5: calcn_l (0.1726 -0.0053 0.0269)
      PathPoint P6: toes_l (0.0155 -0.0064 0.0265)
      PathPoint P7: toes_l (0.0562 -0.0102 0.0181)
    Millard2012EquilibriumMuscle tib_ant_l: max_isometric_force=905 optimal_fiber_length=0.098
        tendon_slack_length=0.223 pennation_angle_at_optimal=0.08726646
      PathPoint P1: tibia_l (0.0179 -0.1624 -0.0115)
      PathPoint P2: tibia_l (0.0329 -0.3951 0.0177)
      PathPoint P3: calcn_l (0.1166 0.0178 0.0305)
    Millard2012EquilibriumMuscle per_brev_l: max_isometric_force=435 optimal_fiber_length=0.05
        tendon_slack_length=0.161 pennation_angle_at_optimal=0.08726646
      PathPoint P1: tibia_l (-0.007 -0.2646 -0.0325)
      PathPoint P2: tibia_l (-0.0198 -0.4184 -0.0283)
      PathPoint P3: tibia_l (-0.0144 -0.4295 -0.0289)
      PathPoint P4: calcn_l (0.0471 0.027 -0.0233)
      PathPoint P5: calcn_l (0.0677 0.0219 -0.0343)
    Millard2012EquilibriumMuscle per_long_l: max_isometric_force=943 optimal_fiber_length=0.049
        tendon_slack_length=0.345 pennation_angle_at_optimal=0.1745329
      PathPoint P1: tibia_l (0.0005 -0.1568 -0.0362)
      PathPoint P2: tibia_l (-0.0207 -0.4205 -0.0286)
      PathPoint P3: tibia_l (-0.0162 -0.4319 -0.0289)
      PathPoint P4: calcn_l (0.0438 0.023 -0.0221)
      PathPoint P5: calcn_l (0.0681 0.0106 -0.0284)
      PathPoint P6: calcn_l (0.0852 0.0069 -0.0118)
      PathPoint P7: calcn_l (0.1203 0.0085 0.0184)
    Millard2012EquilibriumMuscle per_tert_l: max_isometric_force=180 optimal_fiber_length=0.079 tendon_slack_length=0.1
        pennation_angle_at_optimal=0.2268928
      PathPoint P1: tibia_l (0.001 -0.2804 -0.0231)
      PathPoint P2: tibia_l (0.0229 -0.4069 -0.0159)
      PathPoint P3: calcn_l (0.0857 0.0228 -0.0299)
    Millard2012EquilibriumMuscle ext_dig_l: max_isometric_force=512 optimal_fiber_length=0.102
        tendon_slack_length=0.345 pennation_angle_at_optimal=0.1396263
      PathPoint P1: tibia_l (0.0032 -0.1381 -0.0276)
      PathPoint P2: tibia_l (0.0289 -0.4007 -0.0072)
      PathPoint P3: calcn_l (0.0922 0.0388 0.0001)
      PathPoint P4: calcn_l (0.1616 0.0055 -0.013)
      PathPoint P5: toes_l (0.0003 0.0047 -0.0153)
      PathPoint P6: toes_l (0.0443 -0.0004 -0.025)
    Millard2012EquilibriumMuscle ext_hal_l: max_isometric_force=162 optimal_fiber_length=0.111
        tendon_slack_length=0.305 pennation_angle_at_optimal=0.1047198
      PathPoint P1: tibia_l (0.0012 -0.1767 -0.0228)
      PathPoint P2: tibia_l (0.0326 -0.3985 0.0085)
      PathPoint P3: calcn_l (0.097 0.0389 0.0211)
      PathPoint P4: calcn_l (0.1293 0.0309 0.0257)
      PathPoint P5: calcn_l (0.1734 0.0139 0.028)
      PathPoint P6: toes_l (0.0298 0.0041 0.0245)
      PathPoint P7: toes_l (0.0563 0.0034 0.0186)
    Millard2012EquilibriumMuscle ercspn_r: max_isometric_force=2500 optimal_fiber_length=0.12 tendon_slack_length=0.03
        pennation_angle_at_optimal=0
      PathPoint P1: pelvis (-0.14 0.0439 0.0436)
      PathPoint P2: torso (-0.055 0.11 0.0241)
    Millard2012EquilibriumMuscle ercspn_l: max_isometric_force=2500 optimal_fiber_length=0.12 tendon_slack_length=0.03
        pennation_angle_at_optimal=0
      PathPoint P1: pelvis (-0.14 0.0439 -0.0436)
      PathPoint P2: torso (-0.055 0.11 -0.0241)
    Millard2012EquilibriumMuscle intobl_r: max_isometric_force=900 optimal_fiber_length=0.1 tendon_slack_length=0.1
        pennation_angle_at_optimal=0
      PathPoint P1: pelvis (-0.04 0.07 0.1157)
      PathPoint P2: torso (0.07 0.16 0.015)
    Millard2012EquilibriumMuscle intobl_l: max_isometric_force=900 optimal_fiber_length=0.1 tendon_slack_length=0.1
        pennation_angle_at_optimal=0
      PathPoint P1: pelvis (-0.04 0.07 -0.1157)
      PathPoint P2: torso (0.07 0.16 -0.015)
    Millard2012EquilibriumMuscle extobl_r: max_isometric_force=900 optimal_fiber_length=0.12 tendon_slack_length=0.14
        pennation_angle_at_optimal=0
      PathPoint P1: pelvis (-0.03 -0.0636 0.01)
      PathPoint P2: torso (0.065 0.11 0.11)
    Millard2012EquilibriumMuscle extobl_l: max_isometric_force=900 optimal_fiber_length=0.12 tendon_slack_length=0.14
        pennation_angle_at_optimal=0
      PathPoint P1: pelvis (-0.03 -0.0636 -0.01)
      PathPoint P2: torso (0.065 0.11 -0.11)
    BushingForce [values shared by the 11 below unless stated]: rotational_stiffness=(100 100 100) [Nm/rad]
        translational_stiffness=(10000 10000 10000) [N/m] rotational_damping=(20 20 20) [Nm/(rad/s)]
        translational_damping=(200 200 200) [N/(m/s)]
    BushingForce torso_bushing: socket_frame1=H3_back socket_frame2=torso
      PhysicalOffsetFrame H3_back: socket_parent=/bodyset/H3_back translation=(0.0909522 0.4017509 0)
      PhysicalOffsetFrame torso: socket_parent=/bodyset/torso translation=(0.09499999 0.2700001 0)
    BushingForce sup_thigh_r_bushing: socket_frame1=H3_sup_thigh_girth_r_cuff socket_frame2=sup_femur_r_cuff
      PhysicalOffsetFrame H3_sup_thigh_girth_r_cuff: socket_parent=/bodyset/H3_sup_thigh_girth_r
          translation=(-0.0558624 0.00020901 -0.0802471)
      PhysicalOffsetFrame sup_femur_r_cuff: socket_parent=/bodyset/femur_r translation=(-0.05 -0.12 0.02)
    BushingForce inf_thigh_r_bushing: socket_frame1=H3_inf_thigh_girth_r_cuff socket_frame2=inf_femur_r_cuff
      PhysicalOffsetFrame H3_inf_thigh_girth_r_cuff: socket_parent=/bodyset/H3_inf_thigh_girth_r
          translation=(-0.0330622 0.00350986 -0.0716)
      PhysicalOffsetFrame inf_femur_r_cuff: socket_parent=/bodyset/femur_r translation=(-0.034 -0.29 0.02)
    BushingForce sup_shank_r_bushing: socket_frame1=H3_sup_shank_girth_r_cuff socket_frame2=sup_tibia_r_cuff
      PhysicalOffsetFrame H3_sup_shank_girth_r_cuff: socket_parent=/bodyset/H3_sup_shank_girth_r
          translation=(-0.0296336 0.00073351 -0.079754)
      PhysicalOffsetFrame sup_tibia_r_cuff: socket_parent=/bodyset/tibia_r translation=(-0.03 -0.12 0)
    BushingForce inf_shank_r_bushing: socket_frame1=H3_inf_shank_girth_r_cuff socket_frame2=inf_tibia_r_cuff
      PhysicalOffsetFrame H3_inf_shank_girth_r_cuff: socket_parent=/bodyset/H3_inf_shank_girth_r
          translation=(-0.0249014 0.00155243 -0.0585038)
      PhysicalOffsetFrame inf_tibia_r_cuff: socket_parent=/bodyset/tibia_r translation=(-0.025 -0.34 0.01)
    BushingForce foot_r_bushing: socket_frame1=H3_foot_r_cuff socket_frame2=calcn_r_cuff
      PhysicalOffsetFrame H3_foot_r_cuff: socket_parent=/bodyset/H3_foot_r
          translation=(0.0511553 0.00128208 -0.0586519)
      PhysicalOffsetFrame calcn_r_cuff: socket_parent=/bodyset/calcn_r translation=(0.1 -0.01 0)
    BushingForce sup_thigh_l_bushing: socket_frame1=H3_sup_thigh_girth_l_cuff socket_frame2=sup_femur_l_cuff
      PhysicalOffsetFrame H3_sup_thigh_girth_l_cuff: socket_parent=/bodyset/H3_sup_thigh_girth_l
          translation=(-0.0558624 0.00020901 0.0802471)
      PhysicalOffsetFrame sup_femur_l_cuff: socket_parent=/bodyset/femur_l translation=(-0.05 -0.12 -0.02)
    BushingForce inf_thigh_l_bushing: socket_frame1=H3_inf_thigh_girth_l_cuff socket_frame2=inf_femur_l_cuff
      PhysicalOffsetFrame H3_inf_thigh_girth_l_cuff: socket_parent=/bodyset/H3_inf_thigh_girth_l
          translation=(-0.0330622 0.00350986 0.0716)
      PhysicalOffsetFrame inf_femur_l_cuff: socket_parent=/bodyset/femur_l translation=(-0.034 -0.29 -0.02)
    BushingForce sup_shank_l_bushing: socket_frame1=H3_sup_shank_girth_l_cuff socket_frame2=sup_tibia_l_cuff
      PhysicalOffsetFrame H3_sup_shank_girth_l_cuff: socket_parent=/bodyset/H3_sup_shank_girth_l
          translation=(-0.0296336 0.00073351 0.079754)
      PhysicalOffsetFrame sup_tibia_l_cuff: socket_parent=/bodyset/tibia_l translation=(-0.03 -0.12 0)
    BushingForce inf_shank_l_bushing: socket_frame1=H3_inf_shank_girth_l_cuff socket_frame2=inf_tibia_l_cuff
      PhysicalOffsetFrame H3_inf_shank_girth_l_cuff: socket_parent=/bodyset/H3_inf_shank_girth_l
          translation=(-0.0249014 0.00155243 0.0585038)
      PhysicalOffsetFrame inf_tibia_l_cuff: socket_parent=/bodyset/tibia_l translation=(-0.025 -0.34 -0.01)
    BushingForce foot_l_bushing: socket_frame1=H3_foot_l_cuff socket_frame2=calcn_l_cuff
      PhysicalOffsetFrame H3_foot_l_cuff: socket_parent=/bodyset/H3_foot_l translation=(0.0511553 0.00128208 0.0586519)
      PhysicalOffsetFrame calcn_l_cuff: socket_parent=/bodyset/calcn_l translation=(0.1 -0.01 0)
    CoordinateActuator hip_motor_r: coordinate=H3_hip_flexion_r optimal_force=1
    CoordinateActuator knee_motor_r: coordinate=H3_knee_angle_r optimal_force=1
    CoordinateActuator ankle_motor_r: coordinate=H3_ankle_angle_r optimal_force=1
    CoordinateActuator hip_motor_l: coordinate=H3_hip_flexion_l optimal_force=1
    CoordinateActuator knee_motor_l: coordinate=H3_knee_angle_l optimal_force=1
    CoordinateActuator ankle_motor_l: coordinate=H3_ankle_angle_l optimal_force=1
    ObjectGroup R_hip_abd: members=(glut_max1_r glut_med1_r glut_med2_r glut_med3_r glut_min1_r glut_min2_r glut_min3_r peri_r sar_r tfl_r)
    ObjectGroup R_hip_flex: members=(add_brev_r add_long_r glut_med1_r glut_min1_r grac_r iliacus_r pect_r psoas_r rect_fem_r sar_r tfl_r)
    ObjectGroup R_hip_inrot: members=(glut_med1_r glut_min1_r iliacus_r psoas_r tfl_r)
    ObjectGroup R_hip_exrot: members=(gem_r glut_med3_r glut_min3_r peri_r quad_fem_r)
    ObjectGroup R_hip_ext: members=(add_long_r add_mag1_r add_mag2_r add_mag3_r bifemlh_r glut_max1_r glut_max2_r glut_max3_r glut_med3_r glut_min3_r semimem_r semiten_r)
    ObjectGroup R_hip_add: members=(add_brev_r add_long_r add_mag1_r add_mag2_r add_mag3_r bifemlh_r grac_r pect_r semimem_r semiten_r)
    ObjectGroup R_knee_bend: members=(bifemlh_r bifemsh_r grac_r lat_gas_r med_gas_r sar_r semimem_r semiten_r)
    ObjectGroup R_knee_ext: members=(rect_fem_r vas_int_r vas_lat_r vas_med_r)
    ObjectGroup R_ankle_pf: members=(flex_dig_r flex_hal_r lat_gas_r med_gas_r per_brev_r per_long_r soleus_r tib_post_r)
    ObjectGroup R_inverter: members=(ext_hal_r flex_dig_r flex_hal_r tib_ant_r tib_post_r)
    ObjectGroup R_ankle_df: members=(ext_dig_r ext_hal_r per_tert_r tib_ant_r)
    ObjectGroup R_everter: members=(ext_dig_r per_brev_r per_long_r per_tert_r)
    ObjectGroup L_hip_abd: members=(glut_max1_l glut_med1_l glut_med2_l glut_med3_l glut_min1_l glut_min2_l glut_min3_l peri_l sar_l tfl_l)
    ObjectGroup L_hip_flex: members=(add_brev_l add_long_l glut_med1_l glut_min1_l grac_l iliacus_l pect_l psoas_l rect_fem_l sar_l tfl_l)
    ObjectGroup L_hip_inrot: members=(glut_med1_l glut_min1_l iliacus_l psoas_l tfl_l)
    ObjectGroup L_hip_exrot: members=(gem_l glut_med3_l glut_min3_l peri_l quad_fem_l)
    ObjectGroup L_hip_ext: members=(add_long_l add_mag1_l add_mag2_l add_mag3_l bifemlh_l glut_max1_l glut_max2_l glut_max3_l glut_med3_l glut_min3_l semimem_l semiten_l)
    ObjectGroup L_hip_add: members=(add_brev_l add_long_l add_mag1_l add_mag2_l add_mag3_l bifemlh_l grac_l pect_l semimem_l semiten_l)
    ObjectGroup L_knee_bend: members=(bifemlh_l bifemsh_l grac_l lat_gas_l med_gas_l sar_l semimem_l semiten_l)
    ObjectGroup L_knee_ext: members=(rect_fem_l vas_int_l vas_lat_l vas_med_l)
    ObjectGroup L_ankle_pf: members=(flex_dig_l flex_hal_l lat_gas_l med_gas_l per_brev_l per_long_l soleus_l tib_post_l)
    ObjectGroup L_inverter: members=(ext_hal_l flex_dig_l flex_hal_l tib_ant_l tib_post_l)
    ObjectGroup L_ankle_df: members=(ext_dig_l ext_hal_l per_tert_l tib_ant_l)
    ObjectGroup L_everter: members=(ext_dig_l per_brev_l per_long_l per_tert_l)
    ObjectGroup back_ext: members=(ercspn_l ercspn_r)
    ObjectGroup back_rlb: members=(ercspn_r extobl_r intobl_r)
    ObjectGroup back_introt: members=(ercspn_r extobl_l intobl_r)
    ObjectGroup back_llb: members=(ercspn_l extobl_l intobl_l)
    ObjectGroup back_extrot: members=(ercspn_l extobl_r intobl_l)
    ObjectGroup back_flex: members=(extobl_l extobl_r intobl_l intobl_r)
  MarkerSet:
    Marker reference: ground (0 0 0)
    Marker H3_sup_thigh_r_bushing: H3_sup_thigh_girth_r (-0.05586239 0.0002090098 -0.08024709)
    Marker sup_femur_r_bushing: femur_r (-0.05 -0.12 0.02)
    Marker H3_inf_thigh_r_bushing: H3_inf_thigh_girth_r (-0.03306223 0.003509863 -0.07159998)
    Marker inf_femur_r_bushing: femur_r (-0.034 -0.29 0.02)
    Marker H3_sup_shank_r_bushing: H3_sup_shank_girth_r (-0.02963358 0.0007335105 -0.07975403)
    Marker sup_tibia_r_bushing: tibia_r (-0.03 -0.12 0)
    Marker H3_inf_shank_r_bushing: H3_inf_shank_girth_r (-0.02490136 0.001552427 -0.05850382)
    Marker inf_tibia_r_bushing: tibia_r (-0.025 -0.34 0.01)
    Marker H3_foot_r_bushing: H3_foot_r (0.05115526 0.001282079 -0.05865189)
    Marker foot_r_bushing: calcn_r (0.1 -0.01 0)
    Marker H3_sup_thigh_l_bushing: H3_sup_thigh_girth_l (-0.05586239 0.0002090098 0.08024709)
    Marker sup_femur_l_bushing: femur_l (-0.05 -0.12 -0.02)
    Marker H3_inf_thigh_l_bushing: H3_inf_thigh_girth_l (-0.03306223 0.003509863 0.07159998)
    Marker inf_femur_l_bushing: femur_l (-0.034 -0.29 -0.02)
    Marker H3_sup_shank_l_bushing: H3_sup_shank_girth_l (-0.02963358 0.0007335105 0.07975403)
    Marker sup_tibia_l_bushing: tibia_l (-0.03 -0.12 0)
    Marker H3_inf_shank_l_bushing: H3_inf_shank_girth_l (-0.02490136 0.001552427 0.05850382)
    Marker inf_tibia_l_bushing: tibia_l (-0.025 -0.34 -0.01)
    Marker H3_foot_l_bushing: H3_foot_l (0.05115526 0.001282079 0.05865189)
    Marker foot_l_bushing: calcn_l (0.1 -0.01 0)
    Marker H3_torso_bushing: H3_back (0.0909522 0.4017509 0)
    Marker torso_bushing: torso (0.09499999 0.2700001 0)
