# OpenSim document version 40000
Model FullBodyH3:
  gravity: 0 -9.80665 0
  length_units: meters
  force_units: N
  credits:
    Delp S.L., Loan J.P., Hoy M.G., Zajac F.E., Topp E.L., Rosen J.M., Thelen D.G., Anderson F.C., Seth A., Hamner S.R.
  publications:
    Notes: 3D, 23 DOF gait model created by D.G. Thelen, Univ. of Wisconsin-Madison, and Samuel Hamner, Ajay Seth, Frank C. Anderson, and Scott L. Delp, Stanford University. Lower extremity joint defintions based on Delp et al. (1990). Low back joint and anthropometry based on Anderson and Pandy (1999, 2001). Planar knee model of Yamaguchi and Zajac (1989). Seth removed the patella to avoid kinematic constraints; insertions of the quadrucepts are handled with moving points in the tibia frame. Hamner added arms adapted from Holzbaur et al., 2005. Hamner, S.R., Seth, A, Delp, S.L.: Muscle contributions to propulsion and support during running. Journal of Biomechanics, 2010. Delp, S.L., Loan, J.P., Hoy, M.G., Zajac, F.E., Topp E.L., Rosen, J.M.: An interactive graphics-based model of the lower extremity to study orthopaedic surgical procedures, IEEE Transactions on Biomedical Engineering, vol. 37, pp. 757-767, 1990. Yamaguchi G.T., Zajac F.E.: A planar model of the knee joint to characterize the knee extensor mechanism." J . Biomech. vol. 21. pp. 1-10. 1989. Anderson F.C., Pandy M.G.: A dynamic optimization solution for vertical jumping in three dimensions. Computer Methods in Biomechanics and Biomedical Engineering 2:201-231, 1999. Anderson F.C., Pandy M.G.: Dynamic optimization of human walking. Journal of Biomechanical Engineering 123:381-390, 2001. Holzbaur, KR, WM Murray and SL Delp, 2005. A model of the upper extremity for simulating musculoskeletal surgery and analyzing neuromuscular control. Ann Biomed Eng 33(6): 829-840.
  defaults: CoordinateActuator default: optimal_force=300
  PrescribedController joint_torques: actuator_list=(hip_r hip_l knee_r knee_l ankle_r ankle_l lumbar_extension)
    FunctionSet ControlFunctions:
      PiecewiseConstantFunction [values shared by the 7 below unless stated]: x=(0 0.001 0.002 0.003 0.004 0.005 0.006 0.007 0.008 0.009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)
      PiecewiseConstantFunction: y=(-67.4519 -67.4552 -67.4721 -67.4895 -67.5081 -67.5271 -67.5469 -67.5673 -67.5885 -67.6104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)
      PiecewiseConstantFunction: y=(-28.7389 -28.7734 -28.8167 -28.8601 -28.9039 -28.9475 -28.9913 -29.0352 -29.0791 -29.1231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)
      PiecewiseConstantFunction: y=(48.7015 48.6735 48.6383 48.6019 48.5644 48.526 48.4867 48.4464 48.4053 48.3633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)
      PiecewiseConstantFunction: y=(52.5169 52.512 52.5039 52.4952 52.4863 52.4773 52.4681 52.4588 52.4493 52.4396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)
      PiecewiseConstantFunction: y=(-55.6263 -55.6383 -55.6513 -55.6646 -55.6783 -55.6923 -55.7067 -55.7215 -55.7366 -55.7522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)
      PiecewiseConstantFunction: y=(-30.5347 -30.5513 -30.5686 -30.586 -30.6035 -30.6211 -30.6387 -30.6565 -30.6743 -30.6922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)
      PiecewiseConstantFunction: y=(99.6337 99.6649 99.6931 99.7169 99.7419 99.767 99.7925 99.8185 99.8448 99.8716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)
  Ground
  BodySet:
    Body pelvis: mass=11.777 [kg] mass_center=(-0.0707 0 0) inertia=(0.1028 0.0871 0.0579 0 0 0)
        meshes=(sacrum.vtp pelvis.vtp l_pelvis.vtp)
    Body femur_r: mass=9.3014 mass_center=(0 -0.17 0) inertia=(0.1339 0.0351 0.1412 0 0 0) meshes=femur_r.vtp
    Body tibia_r: mass=3.7075 mass_center=(0 -0.1867 0) inertia=(0.0504 0.0051 0.0511 0 0 0)
        meshes=(tibia_r.vtp fibula_r.vtp)
    Body talus_r: mass=0.1 mass_center=(0 0 0) inertia=(0.001 0.001 0.001 0 0 0) meshes=talus_rv.vtp
    Body calcn_r: mass=1.25 mass_center=(0.1 0.03 0) inertia=(0.0014 0.0039 0.0041 0 0 0) meshes=foot.vtp
    Body toes_r: mass=0.2166 mass_center=(0.0346 0.006 -0.0175) inertia=(0.0001 0.0002 0.001 0 0 0) meshes=bofoot.vtp
    Body femur_l: mass=9.3014 mass_center=(0 -0.17 0) inertia=(0.1339 0.0351 0.1412 0 0 0) meshes=femur_l.vtp
    Body tibia_l: mass=3.7075 mass_center=(0 -0.1867 0) inertia=(0.0504 0.0051 0.0511 0 0 0)
        meshes=(tibia_l.vtp fibula_l.vtp)
    Body talus_l: mass=0.1 mass_center=(0 0 0) inertia=(0.001 0.001 0.001 0 0 0) meshes=talus_lv.vtp
    Body calcn_l: mass=1.25 mass_center=(0.1 0.03 0) inertia=(0.0014 0.0039 0.0041 0 0 0) meshes=l_foot.vtp
    Body toes_l: mass=0.2166 mass_center=(0.0346 0.006 0.0175) inertia=(0.0001 0.0002 0.001 0 0 0) meshes=l_bofoot.vtp
    Body torso: mass=26.8266 mass_center=(-0.03 0.32 0) inertia=(1.4745 0.7555 1.4314 0 0 0)
        meshes=(hat_spine.vtp hat_jaw.vtp hat_skull.vtp hat_ribs_scap.vtp)
    Body humerus_r: mass=2.0325 mass_center=(0 -0.164502 0) inertia=(0.011946 0.004121 0.013409 0 0 0)
        meshes=humerus_rv.vtp
    Body ulna_r: mass=0.6075 mass_center=(0 -0.120525 0) inertia=(0.002962 0.000618 0.003213 0 0 0) meshes=ulna_rv.vtp
    Body radius_r: mass=0.6075 mass_center=(0 -0.120525 0) inertia=(0.002962 0.000618 0.003213 0 0 0)
        meshes=radius_rv.vtp
    Body hand_r: mass=0.4575 mass_center=(0 -0.068095 0) inertia=(0.000892 0.000547 0.00134 0 0 0)
        meshes=(pisiform_rvs.vtp lunate_rvs.vtp scaphoid_rvs.vtp triquetrum_rvs.vtp hamate_rvs.vtp capitate_rvs.vtp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)
    Body humerus_l: mass=2.0325 mass_center=(0 -0.164502 0) inertia=(0.011946 0.004121 0.013409 0 0 0)
        meshes=humerus_lv.vtp
    Body ulna_l: mass=0.6075 mass_center=(0 -0.120525 0) inertia=(0.002962 0.000618 0.003213 0 0 0) meshes=ulna_lv.vtp
    Body radius_l: mass=0.6075 mass_center=(0 -0.120525 0) inertia=(0.002962 0.000618 0.003213 0 0 0)
        meshes=radius_lv.vtp
    Body hand_l: mass=0.4575 mass_center=(0 -0.068095 0) inertia=(0.000892 0.000547 0.00134 0 0 0)
        meshes=(pisiform_lvs.vtp lunate_lvs.vtp scaphoid_lvs.vtp triquetrum_lvs.vtp hamate_lvs.vtp capitate_lvs.vtp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)
    Body H3_back: mass=7.591 mass_center=(-0.138 0.113453 0.016507)
        inertia=(0.2811895 0.3402015 0.1684602 -0.02367961 0.01913874 -0.00451547) meshes=H3_back_rotated.stl
    Body hip_motor_r: mass=0.452 mass_center=(1e-6 -0.0012139 0.02295)
        inertia=(0.001679082 0.00019465 0.000792906 -3.3e-7 7.7e-8 -9.0023e-5) meshes=right_hip_motor_rotated.stl
    Body H3_thigh_r: mass=0.089 mass_center=(0 0.000355 -2.5e-5) inertia=(0.000507212 5.727e-6 0.000512583 0 0 1.3e-8)
        meshes=right_intermediate_bar_rotated.stl
    Body H3_sup_thigh_girth_r: mass=0.196 mass_center=(-0.0015487 -3e-6 -0.056891)
        inertia=(0.000567839 0.001293191 0.000836715 8.52e-7 2.081e-5 3.1e-7)
        meshes=right_upper_femur_girth_rotated.stl
    Body H3_knee_shell_r: mass=0.861 mass_center=(0.001923 0.007976 0.044924)
        inertia=(0.001444962 0.001125414 0.00107658 -1.2202e-5 -8.4016e-5 0.000218819)
        meshes=right_knee_shell_rotated.stl
    Body H3_inf_thigh_girth_r: mass=0.117 mass_center=(-0.004386 1.4e-5 -0.05633)
        inertia=(0.000275993 0.000684354 0.000433433 1.28e-7 2.4785e-5 -2.7e-8)
        meshes=right_lower_femur_girth_rotated.stl
    Body knee_motor_r: mass=0.452 mass_center=(-0.000133 -0.012133 0.022949)
        inertia=(0.000679804 0.000193975 0.000792959 5.331e-6 1.013e-6 -9.0039e-5) meshes=right_knee_motor_rotated.stl
    Body H3_shank_r: mass=0.089 mass_center=(0 0.000355 -2.5e-5) inertia=(0.000507212 5.727e-6 0.000512583 0 0 1.3e-8)
        meshes=right_intermediate_bar_rotated.stl
    Body H3_ankle_shell_r: mass=0.888 mass_center=(-0.000935 0.008498 0.043919)
        inertia=(0.001460316 0.001196549 0.001111441 7.156e-6 -4.484e-6 0.000232528)
        meshes=right_ankle_shell_rotated.stl
    Body ankle_motor_r: mass=0.442 mass_center=(-3e-6 -0.006802 0.023402)
        inertia=(0.000353793 0.00019344 0.000472784 -6.3e-8 2e-8 -4.8275e-5) meshes=right_ankle_motor_rotated.stl
    Body H3_sup_shank_girth_r: mass=0.159 mass_center=(-0.013439 -9e-5 -0.045658)
        inertia=(0.000315556 0.000674596 0.000451329 -8.7e-8 5.589e-6 7.1e-7)
        meshes=right_upper_tibia_girth_rotated.stl
    Body H3_inf_shank_girth_r: mass=0.059 mass_center=(-0.024453 0 -0.035172)
        inertia=(5.2886e-5 0.000105092 6.4004e-5 0 1.3263e-5 0) meshes=right_lower_tibia_girth_rotated.stl
    Body H3_foot_r: mass=0.467 mass_center=(0.059668 -0.018026 -0.038454)
        inertia=(0.000336359 0.00299182 0.00270637 -1.6126e-5 -6.6052e-5 -1.6107e-5) meshes=right_foot_rotated.stl
    Body hip_motor_l: mass=0.452 mass_center=(4e-6 -0.0012135 -0.022949)
        inertia=(0.000679872 0.0001939 0.000792952 6e-8 -1.9e-8 9.0036e-5) meshes=left_hip_motor_rotated.stl
    Body H3_thigh_l: mass=0.089 mass_center=(0 0.000355 2.5e-5) inertia=(0.000507209 5.727e-6 0.00051258 0 0 -1.3e-8)
        meshes=left_intermediate_bar_rotated.stl
    Body H3_sup_thigh_girth_l: mass=0.196 mass_center=(-0.00158 -3e-6 0.058595)
        inertia=(0.000582806 0.001297883 0.000826067 8.18e-7 5.674e-6 -3.77e-7)
        meshes=left_upper_femur_girth_rotated.stl
    Body H3_knee_shell_l: mass=0.861 mass_center=(-0.005388 0.007999 -0.045008)
        inertia=(0.001447807 0.001127238 0.00107658 -6.101e-6 8.9783e-5 -0.000216188)
        meshes=left_knee_shell_rotated.stl
    Body H3_inf_thigh_girth_l: mass=0.117 mass_center=(-0.005303 1.4e-5 0.059842)
        inertia=(0.000298667 0.000700937 0.000427342 1.23e-7 -2.996e-6 2.3e-8)
        meshes=left_lower_femur_girth_rotated.stl
    Body knee_motor_l: mass=0.452 mass_center=(-5e-6 -0.012136 -0.022953)
        inertia=(0.000679876 0.000193898 0.000792928 1.8e-8 2.8e-8 9.0049e-5) meshes=left_knee_motor_rotated.stl
    Body H3_shank_l: mass=0.089 mass_center=(0 0.000354 2.5e-5) inertia=(0.000507209 5.727e-6 0.00051258 0 0 -1.3e-8)
        meshes=left_intermediate_bar_rotated.stl
    Body H3_ankle_shell_l: mass=0.888 mass_center=(-0.000655 0.008497 -0.043919)
        inertia=(0.001460325 0.001196945 0.00111185 1.0302e-5 1.4461e-5 -0.000232504)
        meshes=left_ankle_shell_rotated.stl
    Body ankle_motor_l: mass=0.442 mass_center=(-5e-6 -0.006801 -0.023402)
        inertia=(0.00035382 0.000193421 0.000472792 5.8e-8 2.4e-8 4.8285e-5) meshes=left_ankle_motor_rotated.stl
    Body H3_sup_shank_girth_l: mass=0.159 mass_center=(-0.01383 -9.2e-5 0.045885)
        inertia=(0.000315684 0.000666949 0.000443554 -9.8e-8 -3.433e-6 -7.19e-7)
        meshes=left_upper_tibia_girth_rotated.stl
    Body H3_inf_shank_girth_l: mass=0.059 mass_center=(-0.024369 0 0.035204)
        inertia=(5.2998e-5 0.000105449 6.4248e-5 0 -1.3111e-5 0) meshes=left_lower_tibia_girth_rotated.stl
    Body H3_foot_l: mass=0.467 mass_center=(0.059668 -0.018026 0.037845)
        inertia=(0.000334268 0.002989772 0.002706414 -1.6126e-5 4.4642e-5 1.5623e-5) meshes=left_foot_rotated.stl
    Body pole: mass=0.6439437 mass_center=(0 0 0.2) inertia=(0.0343731 0.0343731 5.892e-5 0 0 0)
        meshes=link_geometry_metres.STL
    Body pole_2: mass=0.6439437 mass_center=(0 0 0.2) inertia=(0.0343731 0.0343731 5.892e-5 0 0 0)
        meshes=link_geometry_metres.STL
  JointSet:
    CustomJoint ground_pole: socket_parent_frame=ground_pole_offset socket_child_frame=pole_offset
      Coordinate pole_tx: default_value=0.8 range=(-5 5) clamped=false
      Coordinate pole_ty: default_value=1 range=(-1 2) clamped=false
      PhysicalOffsetFrame ground_pole_offset: socket_parent=/ground translation=(0 0 0) [meters]
      PhysicalOffsetFrame pole_offset: socket_parent=/bodyset/pole translation=(0 0 0)
      SpatialTransform:
        TransformAxis rotation1: axis=(1 0 0)
        TransformAxis rotation2: axis=(0 1 0)
        TransformAxis rotation3: axis=(0 0 1)
        TransformAxis translation1: coordinates=pole_tx axis=(1 0 0) LinearFunction(coefficients=1 0)
        TransformAxis translation2: coordinates=pole_ty axis=(0 1 0) LinearFunction(coefficients=1 0)
        TransformAxis translation3: axis=(0 0 1)
    WeldJoint pole_pole_2: socket_parent_frame=pole_offset socket_child_frame=pole_2_offset
      PhysicalOffsetFrame pole_offset: socket_parent=/bodyset/pole translation=(0 0 0)
      PhysicalOffsetFrame pole_2_offset: socket_parent=/bodyset/pole_2 translation=(0 0 0.4)
    CustomJoint hip_r: socket_parent_frame=pelvis_offset socket_child_frame=femur_r_offset
      Coordinate hip_flexion_r: default_value=1.214517 range=(-2.094395 2.094395) clamped=true
      Coordinate hip_adduction_r: default_value=-0.0424487 range=(-2.094395 2.094395) clamped=true
      Coordinate hip_rotation_r: default_value=0.03373478 range=(-2.094395 2.094395) clamped=true
      PhysicalOffsetFrame pelvis_offset: socket_parent=/bodyset/pelvis translation=(-0.0707 -0.0661 0.0835)
      PhysicalOffsetFrame femur_r_offset: socket_parent=/bodyset/femur_r translation=(0 0 0)
      SpatialTransform: axes_held_at_zero=(translation1 translation2 translation3)
        TransformAxis rotation1: coordinates=hip_flexion_r axis=(0 0 1) LinearFunction(coefficients=1 0)
        TransformAxis rotation2: coordinates=hip_adduction_r axis=(1 0 0) LinearFunction(coefficients=1 0)
        TransformAxis rotation3: coordinates=hip_rotation_r axis=(0 1 0) LinearFunction(coefficients=1 0)
    CustomJoint knee_r: socket_parent_frame=femur_r_offset socket_child_frame=tibia_r_offset
      Coordinate knee_angle_r: default_value=-1.123229 range=(-2.094395 0.1745329) clamped=true
      PhysicalOffsetFrame femur_r_offset: socket_parent=/bodyset/femur_r translation=(0 0 0)
      PhysicalOffsetFrame tibia_r_offset: socket_parent=/bodyset/tibia_r translation=(0 0 0)
      SpatialTransform: axes_held_at_zero=(rotation2 rotation3 translation3)
        TransformAxis rotation1: coordinates=knee_angle_r axis=(0 0 1) LinearFunction(coefficients=1 0)
        TransformAxis translation1: coordinates=knee_angle_r axis=(1 0 0)
          SimmSpline: x=(-2.0944 -1.74533 -1.39626 -1.0472 -0.698132 -0.349066 -0.174533 0.197344 0.337395 0.490178 1.52146 2.0944)
              y=(-0.0032 0.00179 0.00411 0.0041 0.00212 -0.001 -0.0031 -0.005227 -0.005435 -0.005574 -0.005435 -0.00525)
        TransformAxis translation2: coordinates=knee_angle_r axis=(0 1 0)
          SimmSpline: x=(-2.0944 -1.22173 -0.523599 -0.349066 -0.174533 0.159149 2.0944)
              y=(-0.4226 -0.4082 -0.399 -0.3976 -0.3966 -0.395264 -0.396)
    CustomJoint ankle_r: socket_parent_frame=tibia_r_offset socket_child_frame=talus_r_offset
      Coordinate ankle_angle_r: default_value=0.508392 range=(-1.570796 1.570796) clamped=true
      PhysicalOffsetFrame tibia_r_offset: socket_parent=/bodyset/tibia_r translation=(0 -0.43 0)
      PhysicalOffsetFrame talus_r_offset: socket_parent=/bodyset/talus_r translation=(0 0 0)
      SpatialTransform: axes_held_at_zero=(rotation2 rotation3 translation1 translation2 translation3)
        TransformAxis rotation1: coordinates=ankle_angle_r axis=(-0.1050135 -0.1740224 0.9791263)
            LinearFunction(coefficients=1 0)
    CustomJoint subtalar_r: socket_parent_frame=talus_r_offset socket_child_frame=calcn_r_offset
      Coordinate subtalar_angle_r: default_value=0 range=(-1.570796 1.570796) clamped=true locked=true
      PhysicalOffsetFrame talus_r_offset: socket_parent=/bodyset/talus_r translation=(-0.04877 -0.04195 0.00792)
      PhysicalOffsetFrame calcn_r_offset: socket_parent=/bodyset/calcn_r translation=(0 0 0)
      SpatialTransform: axes_held_at_zero=(rotation2 rotation3 translation1 translation2 translation3)
        TransformAxis rotation1: coordinates=subtalar_angle_r axis=(0.7871796 0.6047475 -0.1209495)
            LinearFunction(coefficients=1 0)
    CustomJoint mtp_r: socket_parent_frame=calcn_r_offset socket_child_frame=toes_r_offset
      Coordinate mtp_angle_r: default_value=0 range=(-1.570796 1.570796) clamped=true locked=true
      PhysicalOffsetFrame calcn_r_offset: socket_parent=/bodyset/calcn_r translation=(0.1788 -0.002 0.00108)
      PhysicalOffsetFrame toes_r_offset: socket_parent=/bodyset/toes_r translation=(0 0 0)
      SpatialTransform: axes_held_at_zero=(rotation2 rotation3 translation1 translation2 translation3)
        TransformAxis rotation1: coordinates=mtp_angle_r axis=(-0.5809544 0 0.8139361) LinearFunction(coefficients=1 0)
    CustomJoint hip_l: socket_parent_frame=pelvis_offset socket_child_frame=femur_l_offset
      Coordinate hip_flexion_l: default_value=1.214517 range=(-2.094395 2.094395) clamped=true
      Coordinate hip_adduction_l: default_value=-0.0424487 range=(-2.094395 2.094395) clamped=true
      Coordinate hip_rotation_l: default_value=0.03373478 range=(-2.094395 2.094395) clamped=true
      PhysicalOffsetFrame pelvis_offset: socket_parent=/bodyset/pelvis translation=(-0.0707 -0.0661 -0.0835)
      PhysicalOffsetFrame femur_l_offset: socket_parent=/bodyset/femur_l translation=(0 0 0)
      SpatialTransform: axes_held_at_zero=(translation1 translation2 translation3)
        TransformAxis rotation1: coordinates=hip_flexion_l axis=(0 0 1) LinearFunction(coefficients=1 0)
        TransformAxis rotation2: coordinates=hip_adduction_l axis=(-1 0 0) LinearFunction(coefficients=1 0)
        TransformAxis rotation3: coordinates=hip_rotation_l axis=(0 -1 0) LinearFunction(coefficients=1 0)
    CustomJoint knee_l: socket_parent_frame=femur_l_offset socket_child_frame=tibia_l_offset
      Coordinate knee_angle_l: default_value=-1.123229 range=(-2.094395 0.1745329) clamped=true
      PhysicalOffsetFrame femur_l_offset: socket_parent=/bodyset/femur_l translation=(0 0 0)
      PhysicalOffsetFrame tibia_l_offset: socket_parent=/bodyset/tibia_l translation=(0 0 0)
      SpatialTransform: axes_held_at_zero=(rotation2 rotation3 translation3)
        TransformAxis rotation1: coordinates=knee_angle_l axis=(0 0 1) LinearFunction(coefficients=1 0)
        TransformAxis translation1: coordinates=knee_angle_l axis=(1 0 0)
          SimmSpline: x=(-2.0944 -1.74533 -1.39626 -1.0472 -0.698132 -0.349066 -0.174533 0.197344 0.337395 0.490178 1.52146 2.0944)
              y=(-0.0032 0.00179 0.00411 0.0041 0.00212 -0.001 -0.0031 -0.005227 -0.005435 -0.005574 -0.005435 -0.00525)
        TransformAxis translation2: coordinates=knee_angle_l axis=(0 1 0)
          SimmSpline: x=(-2.0944 -1.22173 -0.523599 -0.349066 -0.174533 0.159149 2.0944)
              y=(-0.4226 -0.4082 -0.399 -0.3976 -0.3966 -0.395264 -0.396)
    CustomJoint ankle_l: socket_parent_frame=tibia_l_offset socket_child_frame=talus_l_offset
      Coordinate ankle_angle_l: default_value=0.508392 range=(-1.047198 1.047198) clamped=true
      PhysicalOffsetFrame tibia_l_offset: socket_parent=/bodyset/tibia_l translation=(0 -0.43 0)
      PhysicalOffsetFrame talus_l_offset: socket_parent=/bodyset/talus_l translation=(0 0 0)
      SpatialTransform: axes_held_at_zero=(rotation2 rotation3 translation1 translation2 translation3)
        TransformAxis rotation1: coordinates=ankle_angle_l axis=(0.1050135 0.1740224 0.9791263)
            LinearFunction(coefficients=1 0)
    CustomJoint subtalar_l: socket_parent_frame=talus_l_offset socket_child_frame=calcn_l_offset
      Coordinate subtalar_angle_l: default_value=0 range=(-1.570796 1.570796) clamped=true locked=true
      PhysicalOffsetFrame talus_l_offset: socket_parent=/bodyset/talus_l translation=(-0.04877 -0.04195 -0.00792)
      PhysicalOffsetFrame calcn_l_offset: socket_parent=/bodyset/calcn_l translation=(0 0 0)
      SpatialTransform: axes_held_at_zero=(rotation2 rotation3 translation1 translation2 translation3)
        TransformAxis rotation1: coordinates=subtalar_angle_l axis=(-0.7871796 -0.6047475 -0.1209495)
            LinearFunction(coefficients=1 0)
    CustomJoint mtp_l: socket_parent_frame=calcn_l_offset socket_child_frame=toes_l_offset
      Coordinate mtp_angle_l: default_value=0 range=(-1.047198 1.047198) clamped=true locked=true
      PhysicalOffsetFrame calcn_l_offset: socket_parent=/bodyset/calcn_l translation=(0.1788 -0.002 -0.00108)
      PhysicalOffsetFrame toes_l_offset: socket_parent=/bodyset/toes_l translation=(0 0 0)
      SpatialTransform: axes_held_at_zero=(rotation2 rotation3 translation1 translation2 translation3)
        TransformAxis rotation1: coordinates=mtp_angle_l axis=(0.5809544 0 0.8139361) LinearFunction(coefficients=1 0)
    CustomJoint back: socket_parent_frame=pelvis_offset socket_child_frame=torso_offset
      Coordinate lumbar_extension: default_value=-0.1396263 range=(-1.570796 1.570796) clamped=true locked=true
      Coordinate lumbar_bending: default_value=0 range=(-1.570796 1.570796) clamped=true locked=true
      Coordinate lumbar_rotation: default_value=0 range=(-1.570796 1.570796) clamped=true locked=true
      PhysicalOffsetFrame pelvis_offset: socket_parent=/bodyset/pelvis translation=(-0.1007 0.0815 0)
      PhysicalOffsetFrame torso_offset: socket_parent=/bodyset/torso translation=(0 0 0)
      SpatialTransform: axes_held_at_zero=(translation1 translation2 translation3)
        TransformAxis rotation1: coordinates=lumbar_extension axis=(0 0 1) LinearFunction(coefficients=1 0)
        TransformAxis rotation2: coordinates=lumbar_bending axis=(1 0 0) LinearFunction(coefficients=1 0)
        TransformAxis rotation3: coordinates=lumbar_rotation axis=(0 1 0) LinearFunction(coefficients=1 0)
    CustomJoint acromial_r: socket_parent_frame=torso_offset socket_child_frame=humerus_r_offset
      Coordinate arm_flex_r: default_value=1.396263 range=(-1.570796 1.570796) clamped=true
      Coordinate arm_add_r: default_value=-0.1745329 range=(-2.094395 1.570796) clamped=true
      Coordinate arm_rot_r: default_value=-0.1745329 range=(-1.570796 1.570796) clamped=true
      PhysicalOffsetFrame torso_offset: socket_parent=/bodyset/torso translation=(0.003155 0.3715 0.17)
      PhysicalOffsetFrame humerus_r_offset: socket_parent=/bodyset/humerus_r translation=(0 0 0)
      SpatialTransform: axes_held_at_zero=(translation1 translation2 translation3)
        TransformAxis rotation1: coordinates=arm_flex_r axis=(0 0 1) LinearFunction(coefficients=1 0)
        TransformAxis rotation2: coordinates=arm_add_r axis=(1 0 0) LinearFunction(coefficients=1 0)
        TransformAxis rotation3: coordinates=arm_rot_r axis=(0 1 0) LinearFunction(coefficients=1 0)
    CustomJoint elbow_r: socket_parent_frame=humerus_r_offset socket_child_frame=ulna_r_offset
      Coordinate elbow_flex_r: default_value=1.047198 range=(0 2.618) clamped=true locked=true
      PhysicalOffsetFrame humerus_r_offset: socket_parent=/bodyset/humerus_r translation=(0.013144 -0.286273 -0.009595)
      PhysicalOffsetFrame ulna_r_offset: socket_parent=/bodyset/ulna_r translation=(0 0 0)
      SpatialTransform: axes_held_at_zero=(rotation2 rotation3 translation1 translation2 translation3)
        TransformAxis rotation1: coordinates=elbow_flex_r axis=(0.226047 0.022269 0.9738618)
            LinearFunction(coefficients=1 0)
    CustomJoint radioulnar_r: socket_parent_frame=ulna_r_offset socket_child_frame=radius_r_offset
      Coordinate pro_sup_r: default_value=0.7853982 range=(0 1.570796) clamped=true locked=true
      PhysicalOffsetFrame ulna_r_offset: socket_parent=/bodyset/ulna_r translation=(-0.006727 -0.013007 0.026083)
      PhysicalOffsetFrame radius_r_offset: socket_parent=/bodyset/radius_r translation=(0 0 0)
      SpatialTransform: axes_held_at_zero=(rotation2 rotation3 translation1 translation2 translation3)
        TransformAxis rotation1: coordinates=pro_sup_r axis=(0.05639803 0.9984065 0.001952)
            LinearFunction(coefficients=1 0)
    CustomJoint radius_hand_r: socket_parent_frame=radius_r_offset socket_child_frame=hand_r_offset
      Coordinate wrist_flex_r: default_value=0 range=(-1.22173 1.22173) clamped=true locked=true
      Coordinate wrist_dev_r: default_value=0 range=(-0.4363323 0.6108652) clamped=true locked=true
      PhysicalOffsetFrame radius_r_offset: socket_parent=/bodyset/radius_r translation=(-0.008797 -0.235841 0.01361)
      PhysicalOffsetFrame hand_r_offset: socket_parent=/bodyset/hand_r translation=(0 0 0)
      SpatialTransform: axes_held_at_zero=(rotation3 translation1 translation2 translation3)
        TransformAxis rotation1: coordinates=wrist_flex_r axis=(0 0 1) LinearFunction(coefficients=1 0)
        TransformAxis rotation2: coordinates=wrist_dev_r axis=(1 0 0) LinearFunction(coefficients=1 0)
    CustomJoint acromial_l: socket_parent_frame=torso_offset socket_child_frame=humerus_l_offset
      Coordinate arm_flex_l: default_value=1.396263 range=(-1.570796 1.570796) clamped=true
      Coordinate arm_add_l: default_value=-0.1745329 range=(-2.094395 1.570796) clamped=true
      Coordinate arm_rot_l: default_value=-0.1745329 range=(-1.570796 1.570796) clamped=true
      PhysicalOffsetFrame torso_offset: socket_parent=/bodyset/torso translation=(0.003155 0.3715 -0.17)
      PhysicalOffsetFrame humerus_l_offset: socket_parent=/bodyset/humerus_l translation=(0 0 0)
      SpatialTransform: axes_held_at_zero=(translation1 translation2 translation3)
        TransformAxis rotation1: coordinates=arm_flex_l axis=(0 0 1) LinearFunction(coefficients=1 0)
        TransformAxis rotation2: coordinates=arm_add_l axis=(-1 0 0) LinearFunction(coefficients=1 0)
        TransformAxis rotation3: coordinates=arm_rot_l axis=(0 -1 0) LinearFunction(coefficients=1 0)
    CustomJoint elbow_l: socket_parent_frame=humerus_l_offset socket_child_frame=ulna_l_offset
      Coordinate elbow_flex_l: default_value=1.047198 range=(0 2.618) clamped=true locked=true
      PhysicalOffsetFrame humerus_l_offset: socket_parent=/bodyset/humerus_l translation=(0.013144 -0.286273 0.009595)
      PhysicalOffsetFrame ulna_l_offset: socket_parent=/bodyset/ulna_l translation=(0 0 0)
      SpatialTransform: axes_held_at_zero=(rotation2 rotation3 translation1 translation2 translation3)
        TransformAxis rotation1: coordinates=elbow_flex_l axis=(-0.226047 -0.022269 0.9738618)
            LinearFunction(coefficients=1 0)
    CustomJoint radioulnar_l: socket_parent_frame=ulna_l_offset socket_child_frame=radius_l_offset
      Coordinate pro_sup_l: default_value=0.7853982 range=(0 1.570796) clamped=true locked=true
      PhysicalOffsetFrame ulna_l_offset: socket_parent=/bodyset/ulna_l translation=(-0.006727 -0.013007 -0.026083)
      PhysicalOffsetFrame radius_l_offset: socket_parent=/bodyset/radius_l translation=(0 0 0)
      SpatialTransform: axes_held_at_zero=(rotation2 rotation3 translation1 translation2 translation3)
        TransformAxis rotation1: coordinates=pro_sup_l axis=(-0.05639803 -0.9984065 0.001952)
            LinearFunction(coefficients=1 0)
    CustomJoint radius_hand_l: socket_parent_frame=radius_l_offset socket_child_frame=hand_l_offset
      Coordinate wrist_flex_l: default_value=0 range=(-1.22173 1.22173) clamped=true locked=true
      Coordinate wrist_dev_l: default_value=0 range=(-0.4363323 0.6108652) clamped=true locked=true
      PhysicalOffsetFrame radius_l_offset: socket_parent=/bodyset/radius_l translation=(-0.008797 -0.235841 -0.01361)
      PhysicalOffsetFrame hand_l_offset: socket_parent=/bodyset/hand_l translation=(0 0 0)
      SpatialTransform: axes_held_at_zero=(rotation3 translation1 translation2 translation3)
        TransformAxis rotation1: coordinates=wrist_flex_l axis=(0 0 1) LinearFunction(coefficients=1 0)
        TransformAxis rotation2: coordinates=wrist_dev_l axis=(-1 0 0) LinearFunction(coefficients=1 0)
    CustomJoint ground_H3_back: socket_parent_frame=ground_offset socket_child_frame=H3_back_offset
      Coordinate H3_back_tilt: default_value=-0.6108652 range=(-1.570796 1.570796) clamped=false
      Coordinate H3_back_list: default_value=0 range=(-1.570796 1.570796) clamped=false
      Coordinate H3_back_rotation: default_value=0 range=(-1.570796 1.570796) clamped=false
      Coordinate H3_back_tx: default_value=0 range=(-5 5) clamped=false
      Coordinate H3_back_ty: default_value=0.7825784 range=(-1 2) clamped=false
      Coordinate H3_back_tz: default_value=0 range=(-3 3) clamped=false
      PhysicalOffsetFrame ground_offset: socket_parent=/ground translation=(0 0 0)
      PhysicalOffsetFrame H3_back_offset: socket_parent=/bodyset/H3_back translation=(0 0 0)
      SpatialTransform:
        TransformAxis rotation1: coordinates=H3_back_tilt axis=(0 0 1) LinearFunction(coefficients=1 0)
        TransformAxis rotation2: coordinates=H3_back_list axis=(1 0 0) LinearFunction(coefficients=1 0)
        TransformAxis rotation3: coordinates=H3_back_rotation axis=(0 1 0) LinearFunction(coefficients=1 0)
        TransformAxis translation1: coordinates=H3_back_tx axis=(1 0 0) LinearFunction(coefficients=1 0)
        TransformAxis translation2: coordinates=H3_back_ty axis=(0 1 0) LinearFunction(coefficients=1 0)
        TransformAxis translation3: coordinates=H3_back_tz axis=(0 0 1) LinearFunction(coefficients=1 0)
    WeldJoint H3_back_pelvis: socket_parent_frame=H3_back_offset socket_child_frame=pelvis_offset
      PhysicalOffsetFrame H3_back_offset: socket_parent=/bodyset/H3_back translation=(0.06 0.0661 0)
      PhysicalOffsetFrame pelvis_offset: socket_parent=/bodyset/pelvis translation=(0 0 0)
    CustomJoint H3_back_hip_motor_r: socket_parent_frame=H3_back_offset socket_child_frame=hip_motor_r_offset
      Coordinate H3_hip_flexion_r: default_value=1.22173 range=(-0.5236 1.8326) clamped=false
      PhysicalOffsetFrame H3_back_offset: socket_parent=/bodyset/H3_back translation=(0 0 0.1825)
      PhysicalOffsetFrame hip_motor_r_offset: socket_parent=/bodyset/hip_motor_r translation=(0 0 0)
      SpatialTransform:
        TransformAxis rotation1: axis=(1 0 0)
        TransformAxis rotation2: axis=(0 1 0)
        TransformAxis rotation3: coordinates=H3_hip_flexion_r axis=(0 0 1) LinearFunction(coefficients=1 0)
        TransformAxis translation1: axis=(1 0 0)
        TransformAxis translation2: axis=(0 1 0)
        TransformAxis translation3: axis=(0 0 1)
    WeldJoint hip_motor_r_H3_thigh_r: socket_parent_frame=hip_motor_r_offset socket_child_frame=H3_thigh_r_offset
      PhysicalOffsetFrame hip_motor_r_offset: socket_parent=/bodyset/hip_motor_r translation=(0 -0.20775 0.01325)
      PhysicalOffsetFrame H3_thigh_r_offset: socket_parent=/bodyset/H3_thigh_r translation=(0 0 0)
    WeldJoint hip_motor_r_H3_sup_thigh_girth_r: socket_parent_frame=hip_motor_r_offset
        socket_child_frame=H3_sup_thigh_girth_r_offset
      PhysicalOffsetFrame hip_motor_r_offset: socket_parent=/bodyset/hip_motor_r translation=(0 -0.121711 0.0075)
      PhysicalOffsetFrame H3_sup_thigh_girth_r_offset: socket_parent=/bodyset/H3_sup_thigh_girth_r translation=(0 0 0)
    WeldJoint H3_thigh_r_H3_knee_shell_r: socket_parent_frame=H3_thigh_r_offset
        socket_child_frame=H3_knee_shell_r_offset
      PhysicalOffsetFrame H3_thigh_r_offset: socket_parent=/bodyset/H3_thigh_r translation=(0 -0.18375 -0.013)
      PhysicalOffsetFrame H3_knee_shell_r_offset: socket_parent=/bodyset/H3_knee_shell_r translation=(0 0 0)
    WeldJoint H3_knee_shell_r_H3_inf_thigh_girth_r: socket_parent_frame=H3_knee_shell_r_offset
        socket_child_frame=H3_inf_thigh_girth_r_offset
      PhysicalOffsetFrame H3_knee_shell_r_offset: socket_parent=/bodyset/H3_knee_shell_r translation=(0 0.0975 0.0075)
      PhysicalOffsetFrame H3_inf_thigh_girth_r_offset: socket_parent=/bodyset/H3_inf_thigh_girth_r translation=(0 0 0)
    CustomJoint H3_knee_shell_r_knee_motor_r: socket_parent_frame=H3_knee_shell_r_offset
        socket_child_frame=knee_motor_r_offset
      Coordinate H3_knee_angle_r: default_value=-1.134464 range=(-1.8326 0.08726646) clamped=false
      PhysicalOffsetFrame H3_knee_shell_r_offset: socket_parent=/bodyset/H3_knee_shell_r translation=(0 0 0)
      PhysicalOffsetFrame knee_motor_r_offset: socket_parent=/bodyset/knee_motor_r translation=(0 0 0)
      SpatialTransform:
        TransformAxis rotation1: axis=(1 0 0)
        TransformAxis rotation2: axis=(0 1 0)
        TransformAxis rotation3: coordinates=H3_knee_angle_r axis=(0 0 1) LinearFunction(coefficients=1 0)
        TransformAxis translation1: axis=(1 0 0)
        TransformAxis translation2: axis=(0 1 0)
        TransformAxis translation3: axis=(0 0 1)
    WeldJoint knee_motor_r_H3_shank_r: socket_parent_frame=knee_motor_r_offset socket_child_frame=H3_shank_r_offset
      PhysicalOffsetFrame knee_motor_r_offset: socket_parent=/bodyset/knee_motor_r translation=(0 -0.225 0.01325)
      PhysicalOffsetFrame H3_shank_r_offset: socket_parent=/bodyset/H3_shank_r translation=(0 0 0)
    WeldJoint H3_shank_r_H3_ankle_shell_r: socket_parent_frame=H3_shank_r_offset
        socket_child_frame=H3_ankle_shell_r_offset
      PhysicalOffsetFrame H3_shank_r_offset: socket_parent=/bodyset/H3_shank_r translation=(0 -0.2 -0.013)
      PhysicalOffsetFrame H3_ankle_shell_r_offset: socket_parent=/bodyset/H3_ankle_shell_r translation=(0 0 0)
    CustomJoint H3_ankle_shell_r_ankle_motor_r: socket_parent_frame=H3_ankle_shell_r_offset
        socket_child_frame=ankle_motor_r_offset
      Coordinate H3_ankle_angle_r: default_value=0.5235988 range=(-0.5235988 0.5235988) clamped=false
      PhysicalOffsetFrame H3_ankle_shell_r_offset: socket_parent=/bodyset/H3_ankle_shell_r translation=(0 0 0)
      PhysicalOffsetFrame ankle_motor_r_offset: socket_parent=/bodyset/ankle_motor_r translation=(0 0 0)
      SpatialTransform:
        TransformAxis rotation1: axis=(1 0 0)
        TransformAxis rotation2: axis=(0 1 0)
        TransformAxis rotation3: coordinates=H3_ankle_angle_r axis=(0 0 1) LinearFunction(coefficients=1 0)
        TransformAxis translation1: axis=(1 0 0)
        TransformAxis translation2: axis=(0 1 0)
        TransformAxis translation3: axis=(0 0 1)
    WeldJoint knee_motor_r_H3_sup_shank_girth_r: socket_parent_frame=knee_motor_r_offset
        socket_child_frame=H3_sup_shank_girth_r_offset
      PhysicalOffsetFrame knee_motor_r_offset: socket_parent=/bodyset/knee_motor_r translation=(0 -0.125 0.0075)
      PhysicalOffsetFrame H3_sup_shank_girth_r_offset: socket_parent=/bodyset/H3_sup_shank_girth_r translation=(0 0 0)
    WeldJoint H3_ankle_shell_r_H3_inf_shank_girth_r: socket_parent_frame=H3_ankle_shell_r_offset
        socket_child_frame=H3_inf_shank_girth_r_offset
      PhysicalOffsetFrame H3_ankle_shell_r_offset: socket_parent=/bodyset/H3_ankle_shell_r translation=(0 0.08 0.0075)
      PhysicalOffsetFrame H3_inf_shank_girth_r_offset: socket_parent=/bodyset/H3_inf_shank_girth_r translation=(0 0 0)
    WeldJoint ankle_motor_r_H3_foot_r: socket_parent_frame=ankle_motor_r_offset socket_child_frame=H3_foot_r_offset
      PhysicalOffsetFrame ankle_motor_r_offset: socket_parent=/bodyset/ankle_motor_r translation=(0 -0.061687 0.013)
      PhysicalOffsetFrame H3_foot_r_offset: socket_parent=/bodyset/H3_foot_r translation=(0 0 0)
    CustomJoint H3_back_hip_motor_l: socket_parent_frame=H3_back_offset socket_child_frame=hip_motor_l_offset
      Coordinate H3_hip_flexion_l: default_value=1.22173 range=(-0.5236 1.8326) clamped=false
      PhysicalOffsetFrame H3_back_offset: socket_parent=/bodyset/H3_back translation=(0 0 -0.1825)
      PhysicalOffsetFrame hip_motor_l_offset: socket_parent=/bodyset/hip_motor_l translation=(0 0 0)
      SpatialTransform:
        TransformAxis rotation1: axis=(1 0 0)
        TransformAxis rotation2: axis=(0 1 0)
        TransformAxis rotation3: coordinates=H3_hip_flexion_l axis=(0 0 1) LinearFunction(coefficients=1 0)
        TransformAxis translation1: axis=(1 0 0)
        TransformAxis translation2: axis=(0 1 0)
        TransformAxis translation3: axis=(0 0 1)
    WeldJoint hip_motor_l_H3_thigh_l: socket_parent_frame=hip_motor_l_offset socket_child_frame=H3_thigh_l_offset
      PhysicalOffsetFrame hip_motor_l_offset: socket_parent=/bodyset/hip_motor_l translation=(0 -0.20775 -0.01325)
      PhysicalOffsetFrame H3_thigh_l_offset: socket_parent=/bodyset/H3_thigh_l translation=(0 0 0)
    WeldJoint hip_motor_l_H3_sup_thigh_girth_l: socket_parent_frame=hip_motor_l_offset
        socket_child_frame=H3_sup_thigh_girth_l_offset
      PhysicalOffsetFrame hip_motor_l_offset: socket_parent=/bodyset/hip_motor_l translation=(0 -0.121711 -0.0075)
      PhysicalOffsetFrame H3_sup_thigh_girth_l_offset: socket_parent=/bodyset/H3_sup_thigh_girth_l translation=(0 0 0)
    WeldJoint H3_thigh_l_H3_knee_shell_l: socket_parent_frame=H3_thigh_l_offset
        socket_child_frame=H3_knee_shell_l_offset
      PhysicalOffsetFrame H3_thigh_l_offset: socket_parent=/bodyset/H3_thigh_l translation=(0 -0.18375 0.013)
      PhysicalOffsetFrame H3_knee_shell_l_offset: socket_parent=/bodyset/H3_knee_shell_l translation=(0 0 0)
    WeldJoint H3_knee_shell_l_H3_inf_thigh_girth_l: socket_parent_frame=H3_knee_shell_l_offset
        socket_child_frame=H3_inf_thigh_girth_l_offset
      PhysicalOffsetFrame H3_knee_shell_l_offset: socket_parent=/bodyset/H3_knee_shell_l translation=(0 0.0975 -0.0075)
      PhysicalOffsetFrame H3_inf_thigh_girth_l_offset: socket_parent=/bodyset/H3_inf_thigh_girth_l translation=(0 0 0)
    CustomJoint H3_knee_shell_l_knee_motor_l: socket_parent_frame=H3_knee_shell_l_offset
        socket_child_frame=knee_motor_l_offset
      Coordinate H3_knee_angle_l: default_value=-1.134464 range=(-1.8326 0.08726646) clamped=false
      PhysicalOffsetFrame H3_knee_shell_l_offset: socket_parent=/bodyset/H3_knee_shell_l translation=(0 0 0)
      PhysicalOffsetFrame knee_motor_l_offset: socket_parent=/bodyset/knee_motor_l translation=(0 0 0)
      SpatialTransform:
        TransformAxis rotation1: axis=(1 0 0)
        TransformAxis rotation2: axis=(0 1 0)
        TransformAxis rotation3: coordinates=H3_knee_angle_l axis=(0 0 1) LinearFunction(coefficients=1 0)
        TransformAxis translation1: axis=(1 0 0)
        TransformAxis translation2: axis=(0 1 0)
        TransformAxis translation3: axis=(0 0 1)
    WeldJoint knee_motor_l_H3_shank_l: socket_parent_frame=knee_motor_l_offset socket_child_frame=H3_shank_l_offset
      PhysicalOffsetFrame knee_motor_l_offset: socket_parent=/bodyset/knee_motor_l translation=(0 -0.225 -0.01325)
      PhysicalOffsetFrame H3_shank_l_offset: socket_parent=/bodyset/H3_shank_l translation=(0 0 0)
    WeldJoint H3_shank_l_H3_ankle_shell_l: socket_parent_frame=H3_shank_l_offset
        socket_child_frame=H3_ankle_shell_l_offset
      PhysicalOffsetFrame H3_shank_l_offset: socket_parent=/bodyset/H3_shank_l translation=(0 -0.2 0.013)
      PhysicalOffsetFrame H3_ankle_shell_l_offset: socket_parent=/bodyset/H3_ankle_shell_l translation=(0 0 0)
    CustomJoint H3_ankle_shell_l_ankle_motor_l: socket_parent_frame=H3_ankle_shell_l_offset
        socket_child_frame=ankle_motor_l_offset
      Coordinate H3_ankle_angle_l: default_value=0.5235988 range=(-0.5235988 0.5235988) clamped=false
      PhysicalOffsetFrame H3_ankle_shell_l_offset: socket_parent=/bodyset/H3_ankle_shell_l translation=(0 0 0)
      PhysicalOffsetFrame ankle_motor_l_offset: socket_parent=/bodyset/ankle_motor_l translation=(0 0 0)
      SpatialTransform:
        TransformAxis rotation1: axis=(1 0 0)
        TransformAxis rotation2: axis=(0 1 0)
        TransformAxis rotation3: coordinates=H3_ankle_angle_l axis=(0 0 1) LinearFunction(coefficients=1 0)
        TransformAxis translation1: axis=(1 0 0)
        TransformAxis translation2: axis=(0 1 0)
        TransformAxis translation3: axis=(0 0 1)
    WeldJoint knee_motor_l_H3_sup_shank_girth_l: socket_parent_frame=knee_motor_l_offset
        socket_child_frame=H3_sup_shank_girth_l_offset
      PhysicalOffsetFrame knee_motor_l_offset: socket_parent=/bodyset/knee_motor_l translation=(0 -0.125 -0.0075)
      PhysicalOffsetFrame H3_sup_shank_girth_l_offset: socket_parent=/bodyset/H3_sup_shank_girth_l translation=(0 0 0)
    WeldJoint H3_ankle_shell_l_H3_inf_shank_girth_l: socket_parent_frame=H3_ankle_shell_l_offset
        socket_child_frame=H3_inf_shank_girth_l_offset
      PhysicalOffsetFrame H3_ankle_shell_l_offset: socket_parent=/bodyset/H3_ankle_shell_l translation=(0 0.08 -0.0075)
      PhysicalOffsetFrame H3_inf_shank_girth_l_offset: socket_parent=/bodyset/H3_inf_shank_girth_l translation=(0 0 0)
    WeldJoint ankle_motor_l_H3_foot_l: socket_parent_frame=ankle_motor_l_offset socket_child_frame=H3_foot_l_offset
      PhysicalOffsetFrame ankle_motor_l_offset: socket_parent=/bodyset/ankle_motor_l translation=(0 -0.061687 -0.013)
      PhysicalOffsetFrame H3_foot_l_offset: socket_parent=/bodyset/H3_foot_l translation=(0 0 0)
  ForceSet:
    PrescribedForce: socket_frame=/bodyset/pole
      FunctionSet forceFunctions: Constant(value=-0.1) Constant(value=750) Constant(value=0)
      FunctionSet pointFunctions: Constant(value=0) Constant(value=0) Constant(value=0)
    BushingForce [values shared by the 13 below unless stated]: rotational_stiffness=(100 100 100) [Nm/rad]
        translational_stiffness=(10000 10000 10000) [N/m] rotational_damping=(20 20 20) [Nm/(rad/s)]
        translational_damping=(200 200 200) [N/(m/s)]
    BushingForce hand_r_bushing: socket_frame1=hand_r_offset socket_frame2=pole_offset
      PhysicalOffsetFrame hand_r_offset: socket_parent=/bodyset/hand_r translation=(0.00911999 -0.0739416 -0.00608408)
      PhysicalOffsetFrame pole_offset: socket_parent=/bodyset/pole translation=(0.00964827 0.0108206 0.240876)
    BushingForce hand_l_bushing: socket_frame1=hand_l_offset socket_frame2=pole_2_offset
      PhysicalOffsetFrame hand_l_offset: socket_parent=/bodyset/hand_l translation=(0.00911964 -0.0739412 0.00608453)
      PhysicalOffsetFrame pole_2_offset: socket_parent=/bodyset/pole_2 translation=(0.009648 0.01082 0.159124)
    BushingForce torso_bushing: socket_frame1=H3_back socket_frame2=torso
      PhysicalOffsetFrame H3_back: socket_parent=/bodyset/H3_back translation=(0.0909522 0.4017509 0)
      PhysicalOffsetFrame torso: socket_parent=/bodyset/torso translation=(0.09499999 0.2700001 0)
    BushingForce sup_thigh_r_bushing: socket_frame1=H3_sup_thigh_girth_r_cuff socket_frame2=sup_femur_r_cuff
      PhysicalOffsetFrame H3_sup_thigh_girth_r_cuff: socket_parent=/bodyset/H3_sup_thigh_girth_r
          translation=(-0.0558624 0.00020901 -0.0802471)
      PhysicalOffsetFrame sup_femur_r_cuff: socket_parent=/bodyset/femur_r translation=(-0.05 -0.12 0.02)
    BushingForce inf_thigh_r_bushing: socket_frame1=H3_inf_thigh_girth_r_cuff socket_frame2=inf_femur_r_cuff
      PhysicalOffsetFrame H3_inf_thigh_girth_r_cuff: socket_parent=/bodyset/H3_inf_thigh_girth_r
          translation=(-0.0330622 0.00350986 -0.0716)
      PhysicalOffsetFrame inf_femur_r_cuff: socket_parent=/bodyset/femur_r translation=(-0.034 -0.29 0.02)
    BushingForce sup_shank_r_bushing: socket_frame1=H3_sup_shank_girth_r_cuff socket_frame2=sup_tibia_r_cuff
      PhysicalOffsetFrame H3_sup_shank_girth_r_cuff: socket_parent=/bodyset/H3_sup_shank_girth_r
          translation=(-0.0296336 0.00073351 -0.079754)
      PhysicalOffsetFrame sup_tibia_r_cuff: socket_parent=/bodyset/tibia_r translation=(-0.03 -0.12 0)
    BushingForce inf_shank_r_bushing: socket_frame1=H3_inf_shank_girth_r_cuff socket_frame2=inf_tibia_r_cuff
      PhysicalOffsetFrame H3_inf_shank_girth_r_cuff: socket_parent=/bodyset/H3_inf_shank_girth_r
          translation=(-0.0249014 0.00155243 -0.0585038)
      PhysicalOffsetFrame inf_tibia_r_cuff: socket_parent=/bodyset/tibia_r translation=(-0.025 -0.34 0.01)
    BushingForce foot_r_bushing: socket_frame1=H3_foot_r_cuff socket_frame2=calcn_r_cuff
      PhysicalOffsetFrame H3_foot_r_cuff: socket_parent=/bodyset/H3_foot_r
          translation=(0.0511553 0.00128208 -0.0586519)
      PhysicalOffsetFrame calcn_r_cuff: socket_parent=/bodyset/calcn_r translation=(0.1 -0.01 0)
    BushingForce sup_thigh_l_bushing: socket_frame1=H3_sup_thigh_girth_l_cuff socket_frame2=sup_femur_l_cuff
      PhysicalOffsetFrame H3_sup_thigh_girth_l_cuff: socket_parent=/bodyset/H3_sup_thigh_girth_l
          translation=(-0.0558624 0.00020901 0.0802471)
      PhysicalOffsetFrame sup_femur_l_cuff: socket_parent=/bodyset/femur_l translation=(-0.05 -0.12 -0.02)
    BushingForce inf_thigh_l_bushing: socket_frame1=H3_inf_thigh_girth_l_cuff socket_frame2=inf_femur_l_cuff
      PhysicalOffsetFrame H3_inf_thigh_girth_l_cuff: socket_parent=/bodyset/H3_inf_thigh_girth_l
          translation=(-0.0330622 0.00350986 0.0716)
      PhysicalOffsetFrame inf_femur_l_cuff: socket_parent=/bodyset/femur_l translation=(-0.034 -0.29 -0.02)
    BushingForce sup_shank_l_bushing: socket_frame1=H3_sup_shank_girth_l_cuff socket_frame2=sup_tibia_l_cuff
      PhysicalOffsetFrame H3_sup_shank_girth_l_cuff: socket_parent=/bodyset/H3_sup_shank_girth_l
          translation=(-0.0296336 0.00073351 0.079754)
      PhysicalOffsetFrame sup_tibia_l_cuff: socket_parent=/bodyset/tibia_l translation=(-0.03 -0.12 0)
    BushingForce inf_shank_l_bushing: socket_frame1=H3_inf_shank_girth_l_cuff socket_frame2=inf_tibia_l_cuff
      PhysicalOffsetFrame H3_inf_shank_girth_l_cuff: socket_parent=/bodyset/H3_inf_shank_girth_l
          translation=(-0.0249014 0.00155243 0.0585038)
      PhysicalOffsetFrame inf_tibia_l_cuff: socket_parent=/bodyset/tibia_l translation=(-0.025 -0.34 -0.01)
    BushingForce foot_l_bushing: socket_frame1=H3_foot_l_cuff socket_frame2=calcn_l_cuff
      PhysicalOffsetFrame H3_foot_l_cuff: socket_parent=/bodyset/H3_foot_l translation=(0.0511553 0.00128208 0.0586519)
      PhysicalOffsetFrame calcn_l_cuff: socket_parent=/bodyset/calcn_l translation=(0.1 -0.01 0)
    CoordinateActuator hip_motor_r: coordinate=H3_hip_flexion_r optimal_force=1
    CoordinateActuator knee_motor_r: coordinate=H3_knee_angle_r optimal_force=1
    CoordinateActuator ankle_motor_r: coordinate=H3_ankle_angle_r optimal_force=1
    CoordinateActuator hip_motor_l: coordinate=H3_hip_flexion_l optimal_force=1
    CoordinateActuator knee_motor_l: coordinate=H3_knee_angle_l optimal_force=1
    CoordinateActuator ankle_motor_l: coordinate=H3_ankle_angle_l optimal_force=1
    CoordinateActuator hip_r: coordinate=hip_flexion_r optimal_force=1
    CoordinateActuator knee_r: coordinate=knee_angle_r optimal_force=1
    CoordinateActuator ankle_r: coordinate=ankle_angle_r optimal_force=1
    CoordinateActuator hip_l: coordinate=hip_flexion_l optimal_force=1
    CoordinateActuator knee_l: coordinate=knee_angle_l optimal_force=1
    CoordinateActuator ankle_l: coordinate=ankle_angle_l optimal_force=1
    CoordinateActuator lumbar_extension: coordinate=lumbar_extension optimal_force=1
    SmoothSphereHalfSpaceForce [values shared by the 8 below unless stated]: socket_half_space=/contactgeometryset/floor
        stiffness=3067776 [N/m^2] dissipation=2 [s/m] static_friction=0.8 dynamic_friction=0.8 viscous_friction=0.5
        transition_velocity=0.2 [m/s] hertz_smoothing=300 hunt_crossley_smoothing=50
    SmoothSphereHalfSpaceForce contact_foot_r_1: socket_sphere=/contactgeometryset/foot_r_1
    SmoothSphereHalfSpaceForce contact_foot_r_2: socket_sphere=/contactgeometryset/foot_r_2
    SmoothSphereHalfSpaceForce contact_foot_r_3: socket_sphere=/contactgeometryset/foot_r_3
    SmoothSphereHalfSpaceForce contact_foot_r_4: socket_sphere=/contactgeometryset/foot_r_4
    SmoothSphereHalfSpaceForce contact_foot_l_1: socket_sphere=/contactgeometryset/foot_l_1
    SmoothSphereHalfSpaceForce contact_foot_l_2: socket_sphere=/contactgeometryset/foot_l_2
    SmoothSphereHalfSpaceForce contact_foot_l_3: socket_sphere=/contactgeometryset/foot_l_3
    SmoothSphereHalfSpaceForce contact_foot_l_4: socket_sphere=/contactgeometryset/foot_l_4
    SpringGeneralizedForce [values shared by the 6 below unless stated]: stiffness=10 rest_length=0 viscosity=20
    SpringGeneralizedForce r_hip_damper: coordinate=H3_hip_flexion_r
    SpringGeneralizedForce r_knee_damper: coordinate=H3_knee_angle_r
    SpringGeneralizedForce r_ankle_damper: coordinate=H3_ankle_angle_r
    SpringGeneralizedForce l_hip_damper: coordinate=H3_hip_flexion_l
    SpringGeneralizedForce l_knee_damper: coordinate=H3_knee_angle_l
    SpringGeneralizedForce l_ankle_damper: coordinate=H3_ankle_angle_l
  MarkerSet:
    Marker Chest: torso (0.09608062 0.2644989 -0.00138437)
    Marker R_Acromium: torso (0.003811098 0.420656 0.1316935)
    Marker L_Acromium: torso (0.0038111 0.420656 -0.1283721)
    Marker R_Elbow: ulna_r (-0.04326918 0.01179798 -0.0001011923)
    Marker L_Elbow: ulna_l (-0.04404321 0.002502765 -0.001353369)
    Marker R_Elbow_Parallel: humerus_r (-0.03280623 -0.1998246 0.002302052)
    Marker R_Elbow_Adjacent: humerus_r (0.009953661 -0.1968385 0.04421785)
    Marker L_Elbow_Parallel: humerus_l (-0.0328062 -0.199825 0.00230205)
    Marker L_Elbow_Adjacent: humerus_l (0.00995366 -0.196839 -0.04134895)
    Marker R_Forearm_Lower: radius_r (-0.03163005 -0.2151755 0.008627196)
    Marker L_Forearm_Lower: radius_l (-0.03163 -0.215175 -0.01033543)
    Marker R_Forearm_Middle: radius_r (-0.03311392 -0.1454078 0.004139843)
    Marker R_Forearm_Upper: radius_r (-0.03163 -0.05760079 -0.004532923)
    Marker L_Forearm_Middle: radius_l (-0.02849612 -0.145408 -0.003422376)
    Marker L_Forearm_Upper: radius_l (-0.03163 -0.0576008 0.006226863)
    Marker R_Hand: hand_r (-0.02809339 -0.0271867 0.0008793688)
    Marker R_MCP2: hand_r (-0.01371027 -0.08646573 0.01993072)
    Marker R_MCP5: hand_r (-0.01448597 -0.07178115 -0.03241405)
    Marker L_Hand: hand_l (-0.02907239 -0.02708879 0.000747301)
    Marker L_MCP2: hand_l (-0.01635346 -0.08393901 -0.01377277)
    Marker L_MCP5: hand_l (-0.01781881 -0.07165689 0.03278066)
    Marker R_ASIS: pelvis (0.01299194 0.007885193 0.1256782)
    Marker L_ASIS: pelvis (0.0129919 0.00788519 -0.129835) fixed=true
    Marker V_Sacral: pelvis (-0.1799354 0.00788519 -0.00388995)
    Marker R_Knee_Med: femur_r (0.009533451 -0.407858 -0.05279173)
    Marker R_Knee_Lat: femur_r (0.00953345 -0.407858 0.05591094)
    Marker L_Knee_Med: femur_l (0.00953345 -0.407858 0.05464881)
    Marker L_Knee_Lat: femur_l (0.00953345 -0.407858 -0.05496506)
    Marker R_Thigh_Upper: femur_r (0.0457191 -0.2103051 0.06677696)
    Marker R_Thigh_Front: femur_r (0.07203318 -0.2858889 0.04023905)
    Marker R_Thigh_Rear: femur_r (0.01967607 -0.2867223 0.08565182)
    Marker L_Thigh_Upper: femur_l (0.0457191 -0.210305 -0.06198927)
    Marker L_Thigh_Front: femur_l (0.0720332 -0.285889 -0.03285494)
    Marker L_Thigh_Rear: femur_l (0.0196761 -0.286722 -0.08786616)
    Marker R_Ankle_Med: tibia_r (6.915784e-5 -0.4045596 -0.04051817)
    Marker R_Ankle_Lat: tibia_r (-0.006816271 -0.4103669 0.05964154)
    Marker L_Ankle_Lat: tibia_l (-0.005041927 -0.4084075 -0.05783811)
    Marker L_Ankle_Med: tibia_l (6.91578e-5 -0.40456 0.0398366)
    Marker R_Shank_Upper: tibia_r (0.04102205 -0.1897696 0.0371997)
    Marker R_Shank_Front: tibia_r (0.04205002 -0.2883318 0.008721953)
    Marker R_Shank_Rear: tibia_r (0.022104 -0.2847318 0.06169711)
    Marker L_Shank_Upper: tibia_l (0.0410221 -0.18977 -0.03691752)
    Marker L_Shank_Front: tibia_l (0.04205 -0.288332 -0.0117168)
    Marker L_Shank_Rear: tibia_l (0.022104 -0.284732 -0.06448028)
    Marker R_Heel: calcn_r (-0.02300719 0.01665468 -0.001110617)
    Marker R_MTP1: calcn_r (0.1790478 0.02598826 -0.02912163)
    Marker R_MTP5: calcn_r (0.145152 0.01962148 0.03899691)
    Marker L_Heel: calcn_l (-0.02182684 0.02018089 0.007767469)
    Marker L_MTP1: calcn_l (0.179048 0.0259883 0.02523082)
    Marker L_MTP5: calcn_l (0.145152 0.0196215 -0.03876396)
    Marker RHJC: pelvis (-0.07140762 -0.06743495 0.08306031)
    Marker LHJC: pelvis (-0.0714076 -0.067435 -0.08615684)
    Marker RKJC: tibia_r (0.01310024 -0.008418802 -0.001753888)
    Marker LKJC: tibia_l (0.0131002 -0.0084188 -0.005677061)
    Marker RAJC: talus_r (0.002682161 0.02273621 0.003481377)
    Marker LAJC: talus_l (0.00268216 0.0227362 -0.005275563)
    Marker R_Pelvis: pelvis (-0.0302621 0.04414345 0.1497968)
    Marker L_Pelvis: pelvis (-0.03522551 0.0441435 -0.1483052)
  ContactGeometrySet:
    ContactSphere foot_r_1: socket_frame=/bodyset/H3_foot_r location=(0.18 -0.02 -0.08) radius=0.01
    ContactSphere foot_r_2: socket_frame=/bodyset/H3_foot_r location=(0.18 -0.02 -0.02) radius=0.01
    ContactSphere foot_r_3: socket_frame=/bodyset/H3_foot_r location=(-0.04 -0.02 -0.02) radius=0.01
    ContactSphere foot_r_4: socket_frame=/bodyset/H3_foot_r location=(-0.04 -0.02 -0.07) radius=0.01
    ContactSphere foot_l_1: socket_frame=/bodyset/H3_foot_l location=(0.18 -0.02 0.08) radius=0.01
    ContactSphere foot_l_2: socket_frame=/bodyset/H3_foot_l location=(0.18 -0.02 0.02) radius=0.01
    ContactSphere foot_l_3: socket_frame=/bodyset/H3_foot_l location=(-0.04 -0.02 0.02) radius=0.01
    ContactSphere foot_l_4: socket_frame=/bodyset/H3_foot_l location=(-0.04 -0.02 0.07) radius=0.01
    ContactHalfSpace floor: socket_frame=/ground location=(0 0.01 0) orientation=(0 0 -1.570796)
