# OpenSim document version 40000
Model H3Gait23GenericModel:
  gravity: 0 -9.80665 0
  length_units: meters
  force_units: N
  credits:
    Delp S.L., Loan J.P., Hoy M.G., Zajac F.E., Topp E.L., Rosen J.M., Thelen D.G., Anderson F.C., Seth A. Notes: 3D, 23 DOF gait model created by D.G. Thelen, Univ. of Wisconsin-Madison, and Ajay Seth, Frank C. Anderson, and Scott L. Delp, Stanford University. Lower extremity joint defintions based on Delp et al. (1990). Low back joint and anthropometry based on Anderson and Pandy (1999, 2001). Planar knee model of Yamaguchi and Zajac (1989). Seth replaced tibia translation constraints with a CustomJoint for the knee and removed the patella to eliminate all kinematic constraints; insertions of the quadrucepts are handled with moving points in the tibia frame as defined by Delp 1990. License: Creative Commons (CCBY 3.0). You are free to distribute, remix, tweak, and build upon this work, even commercially, as long as you credit us for the original creation. http://creativecommons.org/licenses/by/3.0/ More Information: http://simtk-confluence.stanford.edu:8080/display/OpenSim/Gait+2392+and+2354+Models
  publications:
    Delp, S.L., Loan, J.P., Hoy, M.G., Zajac, F.E., Topp E.L., Rosen, J.M.: An interactive graphics-based model of the lower extremity to study orthopaedic surgical procedures, IEEE Transactions on Biomedical Engineering, vol. 37, pp. 757-767, 1990. Yamaguchi G.T., Zajac F.E.: A planar model of the knee joint to characterize the knee extensor mechanism." J . Biomecl7. vol. 21. pp. 1-10. 1989. Anderson F.C., Pandy M.G.: A dynamic optimization solution for vertical jumping in three dimensions. Computer Methods in Biomechanics and Biomedical Engineering 2:201-231, 1999. Anderson F.C., Pandy M.G.: Dynamic optimization of human walking. Journal of Biomechanical Engineering 123:381-390, 2001.
  Ground: meshes=treadmill.vtp
  BodySet:
    Body pelvis: mass=11.777 [kg] mass_center=(-0.0707 0 0) inertia=(0.1028 0.0871 0.0579 0 0 0)
        meshes=(sacrum.vtp pelvis.vtp l_pelvis.vtp)
    Body femur_r: mass=9.3014 mass_center=(0 -0.17 0) inertia=(0.1339 0.0351 0.1412 0 0 0) meshes=femur_r.vtp
    Body tibia_r: mass=3.7075 mass_center=(0 -0.1867 0) inertia=(0.0504 0.0051 0.0511 0 0 0)
        meshes=(tibia_r.vtp fibula.vtp)
    Body talus_r: mass=0.1 mass_center=(0 0 0) inertia=(0.001 0.001 0.001 0 0 0) meshes=talus.vtp
    Body calcn_r: mass=1.25 mass_center=(0.1 0.03 0) inertia=(0.0014 0.0039 0.0041 0 0 0) meshes=foot.vtp
    Body toes_r: mass=0.2166 mass_center=(0.0346 0.006 -0.0175) inertia=(0.0001 0.0002 0.0001 0 0 0) meshes=bofoot.vtp
    Body femur_l: mass=9.3014 mass_center=(0 -0.17 0) inertia=(0.1339 0.0351 0.1412 0 0 0) meshes=femur_l.vtp
    Body tibia_l: mass=3.7075 mass_center=(0 -0.1867 0) inertia=(0.0504 0.0051 0.0511 0 0 0)
        meshes=(tibia_l.vtp l_fibula.vtp)
    Body talus_l: mass=0.1 mass_center=(0 0 0) inertia=(0.001 0.001 0.001 0 0 0) meshes=l_talus.vtp
    Body calcn_l: mass=1.25 mass_center=(0.1 0.03 0) inertia=(0.0014 0.0039 0.0041 0 0 0) meshes=l_foot.vtp
    Body toes_l: mass=0.2166 mass_center=(0.0346 0.006 0.0175) inertia=(0.0001 0.0002 0.0001 0 0 0) meshes=l_bofoot.vtp
    Body torso: mass=34.2366 mass_center=(-0.03 0.32 0) inertia=(1.4745 0.7555 1.4314 0 0 0)
        meshes=(hat_spine.vtp hat_jaw.vtp hat_skull.vtp hat_ribs.vtp)
    Body H3_back: mass=7.591 mass_center=(-0.138 0.113453 0.016507)
        inertia=(0.2811895 0.3402015 0.1684602 -0.02367961 0.01913874 -0.00451547) meshes=H3_back_rotated.stl
    Body H3_hip_motor_r: mass=0.452 mass_center=(1e-6 -0.0012139 0.02295)
        inertia=(0.001679082 0.00019465 0.000792906 -3.3e-7 7.7e-8 -9.0023e-5) meshes=right_hip_motor_rotated.stl
    Body H3_thigh_r: mass=0.089 mass_center=(0 0.000355 -2.5e-5) inertia=(0.000507212 5.727e-6 0.000512583 0 0 1.3e-8)
        meshes=right_intermediate_bar_rotated.stl
    Body H3_sup_thigh_girth_r: mass=0.196 mass_center=(-0.15487 -3e-6 -0.056891)
        inertia=(0.000567839 0.001293191 0.000836715 8.52e-7 2.081e-5 3.1e-7)
        meshes=right_upper_femur_girth_rotated.stl
    Body H3_knee_shell_r: mass=0.861 mass_center=(0.001923 0.007976 0.044924)
        inertia=(0.001444962 0.001125414 0.00107658 -1.2202e-5 -8.4016e-5 0.000218819)
        meshes=right_knee_shell_rotated.stl
    Body H3_inf_thigh_girth_r: mass=0.117 mass_center=(-0.004386 1.4e-5 -0.05633)
        inertia=(0.000275993 0.000684354 0.000433433 1.28e-7 2.4785e-5 -2.7e-8)
        meshes=right_lower_femur_girth_rotated.stl
    Body H3_knee_motor_r: mass=0.452 mass_center=(-0.000133 -0.012133 0.022949)
        inertia=(0.000679804 0.000193975 0.000792959 5.331e-6 1.013e-6 -9.0039e-5) meshes=right_knee_motor_rotated.stl
    Body H3_shank_r: mass=0.089 mass_center=(0 0.000355 -2.5e-5) inertia=(0.000507212 5.727e-6 0.000512583 0 0 1.3e-8)
        meshes=right_intermediate_bar_rotated.stl
    Body H3_ankle_shell_r: mass=0.888 mass_center=(-0.000935 0.008498 0.043919)
        inertia=(0.001460316 0.001196549 0.001111441 7.156e-6 -4.484e-6 0.000232528)
        meshes=right_ankle_shell_rotated.stl
    Body H3_ankle_motor_r: mass=0.442 mass_center=(-3e-6 -0.006802 0.023402)
        inertia=(0.000353793 0.00019344 0.000472784 -6.3e-8 2e-8 -4.8275e-5) meshes=right_ankle_motor_rotated.stl
    Body H3_sup_shank_girth_r: mass=0.159 mass_center=(-0.013439 -9e-5 -0.045658)
        inertia=(0.000315556 0.000674596 0.000451329 -8.7e-8 5.589e-6 7.1e-7)
        meshes=right_upper_tibia_girth_rotated.stl
    Body H3_inf_shank_girth_r: mass=0.059 mass_center=(-0.024453 0 -0.035172)
        inertia=(5.2886e-5 0.000105092 6.4004e-5 0 1.3263e-5 0) meshes=right_lower_tibia_girth_rotated.stl
    Body H3_foot_r: mass=0.467 mass_center=(0.059668 -0.018026 -0.038454)
        inertia=(0.000336359 0.00299182 0.00270637 -1.6126e-5 -6.6052e-5 -1.6107e-5) meshes=right_foot_rotated.stl
    Body H3_hip_motor_l: mass=0.452 mass_center=(4e-6 -0.0012135 -0.022949)
        inertia=(0.000679872 0.0001939 0.000792952 6e-8 -1.9e-8 9.0036e-5) meshes=left_hip_motor_rotated.stl
    Body H3_thigh_l: mass=0.089 mass_center=(0 0.000355 2.5e-5) inertia=(0.000507209 5.727e-6 0.00051258 0 0 -1.3e-8)
        meshes=left_intermediate_bar_rotated.stl
    Body H3_sup_thigh_girth_l: mass=0.196 mass_center=(-0.158 -3e-6 0.058595)
        inertia=(0.000582806 0.001297883 0.000826067 8.18e-7 5.674e-6 -3.77e-7)
        meshes=left_upper_femur_girth_rotated.stl
    Body H3_knee_shell_l: mass=0.861 mass_center=(-0.005388 0.007999 -0.045008)
        inertia=(0.001447807 0.001127238 0.00107658 -6.101e-6 8.9783e-5 -0.000216188)
        meshes=left_knee_shell_rotated.stl
    Body H3_inf_thigh_girth_l: mass=0.117 mass_center=(-0.005303 1.4e-5 0.059842)
        inertia=(0.000298667 0.000700937 0.000427342 1.23e-7 -2.996e-6 2.3e-8)
        meshes=left_lower_femur_girth_rotated.stl
    Body H3_knee_motor_l: mass=0.452 mass_center=(-5e-6 -0.012136 -0.022953)
        inertia=(0.000679876 0.000193898 0.000792928 1.8e-8 2.8e-8 9.0049e-5) meshes=left_knee_motor_rotated.stl
    Body H3_shank_l: mass=0.089 mass_center=(0 0.000354 2.5e-5) inertia=(0.000507209 5.727e-6 0.00051258 0 0 -1.3e-8)
        meshes=left_intermediate_bar_rotated.stl
    Body H3_ankle_shell_l: mass=0.888 mass_center=(-0.000655 0.008497 -0.043919)
        inertia=(0.001460325 0.001196945 0.00111185 1.0302e-5 1.4461e-5 -0.000232504)
        meshes=left_ankle_shell_rotated.stl
    Body H3_ankle_motor_l: mass=0.442 mass_center=(-5e-6 -0.006801 -0.023402)
        inertia=(0.00035382 0.000193421 0.000472792 5.8e-8 2.4e-8 4.8285e-5) meshes=left_ankle_motor_rotated.stl
    Body H3_sup_shank_girth_l: mass=0.159 mass_center=(-0.01383 -9.2e-5 0.045885)
        inertia=(0.000315684 0.000666949 0.000443554 -9.8e-8 -3.433e-6 -7.19e-7)
        meshes=left_upper_tibia_girth_rotated.stl
    Body H3_inf_shank_girth_l: mass=0.059 mass_center=(-0.024369 0 0.035204)
        inertia=(5.2998e-5 0.000105449 6.4248e-5 0 -1.3111e-5 0) meshes=left_lower_tibia_girth_rotated.stl
    Body H3_foot_l: mass=0.467 mass_center=(0.059668 -0.018026 0.037845)
        inertia=(0.000334268 0.002989772 0.002706414 -1.6126e-5 4.4642e-5 1.5623e-5) meshes=left_foot_rotated.stl
  JointSet:
    CustomJoint hip_r: socket_parent_frame=pelvis_offset socket_child_frame=femur_r_offset
      Coordinate hip_flexion_r: default_value=-0.03490659 range=(-2.094395 2.094395) clamped=false
      Coordinate hip_adduction_r: default_value=-0.05235988 range=(-2.094395 2.094395) clamped=false
      Coordinate hip_rotation_r: default_value=0 range=(-2.094395 2.094395) clamped=false
      PhysicalOffsetFrame pelvis_offset: socket_parent=/bodyset/pelvis translation=(-0.0707 -0.0661 0.0835) [meters]
      PhysicalOffsetFrame femur_r_offset: socket_parent=/bodyset/femur_r translation=(0 0 0)
      SpatialTransform: axes_held_at_zero=(translation1 translation2 translation3)
        TransformAxis rotation1: coordinates=hip_flexion_r axis=(0 0 1) LinearFunction(coefficients=1 0)
        TransformAxis rotation2: coordinates=hip_adduction_r axis=(1 0 0) LinearFunction(coefficients=1 0)
        TransformAxis rotation3: coordinates=hip_rotation_r axis=(0 1 0) LinearFunction(coefficients=1 0)
    CustomJoint knee_r: socket_parent_frame=femur_r_offset socket_child_frame=tibia_r_offset
      Coordinate knee_angle_r: default_value=0 range=(-2.094395 0.1745329) clamped=false
      PhysicalOffsetFrame femur_r_offset: socket_parent=/bodyset/femur_r translation=(0 0 0)
      PhysicalOffsetFrame tibia_r_offset: socket_parent=/bodyset/tibia_r translation=(0 0 0)
      SpatialTransform: axes_held_at_zero=(rotation2 rotation3 translation3)
        TransformAxis rotation1: coordinates=knee_angle_r axis=(0 0 1) LinearFunction(coefficients=1 0)
        TransformAxis translation1: coordinates=knee_angle_r axis=(1 0 0)
          SimmSpline: x=(-2.0944 -1.74533 -1.39626 -1.0472 -0.698132 -0.349066 -0.174533 0.197344 0.337395 0.490178 1.52146 2.0944)
              y=(-0.0032 0.00179 0.00411 0.0041 0.00212 -0.001 -0.0031 -0.005227 -0.005435 -0.005574 -0.005435 -0.00525)
        TransformAxis translation2: coordinates=knee_angle_r axis=(0 1 0)
          SimmSpline: x=(-2.0944 -1.22173 -0.523599 -0.349066 -0.174533 0.159149 2.0944)
              y=(-0.4226 -0.4082 -0.399 -0.3976 -0.3966 -0.395264 -0.396)
    CustomJoint ankle_r: socket_parent_frame=tibia_r_offset socket_child_frame=talus_r_offset
      Coordinate ankle_angle_r: default_value=0 range=(-1.570796 1.570796) clamped=false
      PhysicalOffsetFrame tibia_r_offset: socket_parent=/bodyset/tibia_r translation=(0 -0.43 0)
      PhysicalOffsetFrame talus_r_offset: socket_parent=/bodyset/talus_r translation=(0 0 0)
      SpatialTransform: axes_held_at_zero=(rotation2 rotation3 translation1 translation2 translation3)
        TransformAxis rotation1: coordinates=ankle_angle_r axis=(-0.1050135 -0.1740224 0.9791263)
            LinearFunction(coefficients=1 0)
    CustomJoint subtalar_r: socket_parent_frame=talus_r_offset socket_child_frame=calcn_r_offset
      Coordinate subtalar_angle_r: default_value=0 range=(-1.570796 1.570796) clamped=false locked=true
      PhysicalOffsetFrame talus_r_offset: socket_parent=/bodyset/talus_r translation=(-0.04877 -0.04195 0.00792)
      PhysicalOffsetFrame calcn_r_offset: socket_parent=/bodyset/calcn_r translation=(0 0 0)
      SpatialTransform: axes_held_at_zero=(rotation2 rotation3 translation1 translation2 translation3)
        TransformAxis rotation1: coordinates=subtalar_angle_r axis=(0.7871796 0.6047475 -0.1209495)
            LinearFunction(coefficients=1 0)
    CustomJoint mtp_r: socket_parent_frame=calcn_r_offset socket_child_frame=toes_r_offset
      Coordinate mtp_angle_r: default_value=0 range=(-1.570796 1.570796) clamped=false locked=true
      PhysicalOffsetFrame calcn_r_offset: socket_parent=/bodyset/calcn_r translation=(0.1788 -0.002 0.00108)
      PhysicalOffsetFrame toes_r_offset: socket_parent=/bodyset/toes_r translation=(0 0 0)
      SpatialTransform: axes_held_at_zero=(rotation2 rotation3 translation1 translation2 translation3)
        TransformAxis rotation1: coordinates=mtp_angle_r axis=(-0.5809544 0 0.8139361) LinearFunction(coefficients=1 0)
    CustomJoint hip_l: socket_parent_frame=pelvis_offset socket_child_frame=femur_l_offset
      Coordinate hip_flexion_l: default_value=-0.03490659 range=(-2.094395 2.094395) clamped=false
      Coordinate hip_adduction_l: default_value=-0.05235988 range=(-2.094395 2.094395) clamped=false
      Coordinate hip_rotation_l: default_value=0 range=(-2.094395 2.094395) clamped=false
      PhysicalOffsetFrame pelvis_offset: socket_parent=/bodyset/pelvis translation=(-0.0707 -0.0661 -0.0835)
      PhysicalOffsetFrame femur_l_offset: socket_parent=/bodyset/femur_l translation=(0 0 0)
      SpatialTransform: axes_held_at_zero=(translation1 translation2 translation3)
        TransformAxis rotation1: coordinates=hip_flexion_l axis=(0 0 1) LinearFunction(coefficients=1 0)
        TransformAxis rotation2: coordinates=hip_adduction_l axis=(-1 0 0) LinearFunction(coefficients=1 0)
        TransformAxis rotation3: coordinates=hip_rotation_l axis=(0 -1 0) LinearFunction(coefficients=1 0)
    CustomJoint knee_l: socket_parent_frame=femur_l_offset socket_child_frame=tibia_l_offset
      Coordinate knee_angle_l: default_value=0 range=(-2.094395 0.1745329) clamped=false
      PhysicalOffsetFrame femur_l_offset: socket_parent=/bodyset/femur_l translation=(0 0 0)
      PhysicalOffsetFrame tibia_l_offset: socket_parent=/bodyset/tibia_l translation=(0 0 0)
      SpatialTransform: axes_held_at_zero=(rotation2 rotation3 translation3)
        TransformAxis rotation1: coordinates=knee_angle_l axis=(0 0 1) LinearFunction(coefficients=1 0)
        TransformAxis translation1: coordinates=knee_angle_l axis=(1 0 0)
          SimmSpline: x=(-2.0944 -1.74533 -1.39626 -1.0472 -0.698132 -0.349066 -0.174533 0.197344 0.337395 0.490178 1.52146 2.0944)
              y=(-0.0032 0.00179 0.00411 0.0041 0.00212 -0.001 -0.0031 -0.005227 -0.005435 -0.005574 -0.005435 -0.00525)
        TransformAxis translation2: coordinates=knee_angle_l axis=(0 1 0)
          SimmSpline: x=(-2.0944 -1.22173 -0.523599 -0.349066 -0.174533 0.159149 2.0944)
              y=(-0.4226 -0.4082 -0.399 -0.3976 -0.3966 -0.395264 -0.396)
    CustomJoint ankle_l: socket_parent_frame=tibia_l_offset socket_child_frame=talus_l_offset
      Coordinate ankle_angle_l: default_value=0 range=(-1.570796 1.570796) clamped=false
      PhysicalOffsetFrame tibia_l_offset: socket_parent=/bodyset/tibia_l translation=(0 -0.43 0)
      PhysicalOffsetFrame talus_l_offset: socket_parent=/bodyset/talus_l translation=(0 0 0)
      SpatialTransform: axes_held_at_zero=(rotation2 rotation3 translation1 translation2 translation3)
        TransformAxis rotation1: coordinates=ankle_angle_l axis=(0.1050135 0.1740224 0.9791263)
            LinearFunction(coefficients=1 0)
    CustomJoint subtalar_l: socket_parent_frame=talus_l_offset socket_child_frame=calcn_l_offset
      Coordinate subtalar_angle_l: default_value=0 range=(-1.570796 1.570796) clamped=false locked=true
      PhysicalOffsetFrame talus_l_offset: socket_parent=/bodyset/talus_l translation=(-0.04877 -0.04195 -0.00792)
      PhysicalOffsetFrame calcn_l_offset: socket_parent=/bodyset/calcn_l translation=(0 0 0)
      SpatialTransform: axes_held_at_zero=(rotation2 rotation3 translation1 translation2 translation3)
        TransformAxis rotation1: coordinates=subtalar_angle_l axis=(-0.7871796 -0.6047475 -0.1209495)
            LinearFunction(coefficients=1 0)
    CustomJoint mtp_l: socket_parent_frame=calcn_l_offset socket_child_frame=toes_l_offset
      Coordinate mtp_angle_l: default_value=0 range=(-1.570796 1.570796) clamped=false locked=true
      PhysicalOffsetFrame calcn_l_offset: socket_parent=/bodyset/calcn_l translation=(0.1788 -0.002 -0.00108)
      PhysicalOffsetFrame toes_l_offset: socket_parent=/bodyset/toes_l translation=(0 0 0)
      SpatialTransform: axes_held_at_zero=(rotation2 rotation3 translation1 translation2 translation3)
        TransformAxis rotation1: coordinates=mtp_angle_l axis=(0.5809544 0 0.8139361) LinearFunction(coefficients=1 0)
    CustomJoint back: socket_parent_frame=pelvis_offset socket_child_frame=torso_offset
      Coordinate lumbar_extension: default_value=-0.1396263 range=(-1.570796 1.570796) clamped=false locked=true
      Coordinate lumbar_bending: default_value=0 range=(-1.570796 1.570796) clamped=false locked=true
      Coordinate lumbar_rotation: default_value=0 range=(-1.570796 1.570796) clamped=false locked=true
      PhysicalOffsetFrame pelvis_offset: socket_parent=/bodyset/pelvis translation=(-0.1007 0.0815 0)
      PhysicalOffsetFrame torso_offset: socket_parent=/bodyset/torso translation=(0 0 0)
      SpatialTransform: axes_held_at_zero=(translation1 translation2 translation3)
        TransformAxis rotation1: coordinates=lumbar_extension axis=(0 0 1) LinearFunction(coefficients=1 0)
        TransformAxis rotation2: coordinates=lumbar_bending axis=(1 0 0) LinearFunction(coefficients=1 0)
        TransformAxis rotation3: coordinates=lumbar_rotation axis=(0 1 0) LinearFunction(coefficients=1 0)
    CustomJoint ground_H3_back: socket_parent_frame=ground_offset socket_child_frame=H3_back_offset
      Coordinate H3_back_tilt: default_value=0 range=(-1.570796 1.570796) clamped=false locked=true
      Coordinate H3_back_list: default_value=0 range=(-1.570796 1.570796) clamped=false locked=true
      Coordinate H3_back_rotation: default_value=0 range=(-1.570796 1.570796) clamped=false locked=true
      Coordinate H3_back_tx: default_value=0 range=(-5 5) clamped=false locked=true
      Coordinate H3_back_ty: default_value=0.9 range=(-1 2) clamped=false locked=true
      Coordinate H3_back_tz: default_value=0 range=(-3 3) clamped=false locked=true
      PhysicalOffsetFrame ground_offset: socket_parent=/ground translation=(0 0 0)
      PhysicalOffsetFrame H3_back_offset: socket_parent=/bodyset/H3_back translation=(0 0 0)
      SpatialTransform:
        TransformAxis rotation1: coordinates=H3_back_tilt axis=(0 0 1) LinearFunction(coefficients=1 0)
        TransformAxis rotation2: coordinates=H3_back_list axis=(1 0 0) LinearFunction(coefficients=1 0)
        TransformAxis rotation3: coordinates=H3_back_rotation axis=(0 1 0) LinearFunction(coefficients=1 0)
        TransformAxis translation1: coordinates=H3_back_tx axis=(1 0 0) LinearFunction(coefficients=1 0)
        TransformAxis translation2: coordinates=H3_back_ty axis=(0 1 0) LinearFunction(coefficients=1 0)
        TransformAxis translation3: coordinates=H3_back_tz axis=(0 0 1) LinearFunction(coefficients=1 0)
    WeldJoint H3_back_pelvis: socket_parent_frame=H3_back_offset socket_child_frame=pelvis_offset
      PhysicalOffsetFrame H3_back_offset: socket_parent=/bodyset/H3_back translation=(0.06 0.0661 0)
      PhysicalOffsetFrame pelvis_offset: socket_parent=/bodyset/pelvis translation=(0 0 0)
    CustomJoint H3_back_H3_hip_motor_r: socket_parent_frame=H3_back_offset socket_child_frame=H3_hip_motor_r_offset
      Coordinate H3_hip_flexion_r: default_value=-0.07504916 range=(-0.5236 1.8326) clamped=false
      PhysicalOffsetFrame H3_back_offset: socket_parent=/bodyset/H3_back translation=(0 0 0.1825)
      PhysicalOffsetFrame H3_hip_motor_r_offset: socket_parent=/bodyset/H3_hip_motor_r translation=(0 0 0)
      SpatialTransform:
        TransformAxis rotation1: axis=(1 0 0)
        TransformAxis rotation2: axis=(0 1 0)
        TransformAxis rotation3: coordinates=H3_hip_flexion_r axis=(0 0 1) LinearFunction(coefficients=1 0)
        TransformAxis translation1: axis=(1 0 0)
        TransformAxis translation2: axis=(0 1 0)
        TransformAxis translation3: axis=(0 0 1)
    WeldJoint H3_hip_motor_r_H3_thigh_r: socket_parent_frame=H3_hip_motor_r_offset socket_child_frame=H3_thigh_r_offset
      PhysicalOffsetFrame H3_hip_motor_r_offset: socket_parent=/bodyset/H3_hip_motor_r translation=(0 -0.20775 0.01325)
      PhysicalOffsetFrame H3_thigh_r_offset: socket_parent=/bodyset/H3_thigh_r translation=(0 0 0)
    WeldJoint H3_hip_motor_r_H3_sup_thigh_girth_r: socket_parent_frame=H3_hip_motor_r_offset
        socket_child_frame=H3_sup_thigh_girth_r_offset
      PhysicalOffsetFrame H3_hip_motor_r_offset: socket_parent=/bodyset/H3_hip_motor_r translation=(0 -0.121711 0.0075)
      PhysicalOffsetFrame H3_sup_thigh_girth_r_offset: socket_parent=/bodyset/H3_sup_thigh_girth_r translation=(0 0 0)
    WeldJoint H3_thigh_r_H3_knee_shell_r: socket_parent_frame=H3_thigh_r_offset
        socket_child_frame=H3_knee_shell_r_offset
      PhysicalOffsetFrame H3_thigh_r_offset: socket_parent=/bodyset/H3_thigh_r translation=(0 -0.18375 -0.013)
      PhysicalOffsetFrame H3_knee_shell_r_offset: socket_parent=/bodyset/H3_knee_shell_r translation=(0 0 0)
    WeldJoint H3_knee_shell_r_H3_inf_thigh_girth_r: socket_parent_frame=H3_knee_shell_r_offset
        socket_child_frame=H3_inf_thigh_girth_r_offset
      PhysicalOffsetFrame H3_knee_shell_r_offset: socket_parent=/bodyset/H3_knee_shell_r translation=(0 0.0975 0.0075)
      PhysicalOffsetFrame H3_inf_thigh_girth_r_offset: socket_parent=/bodyset/H3_inf_thigh_girth_r translation=(0 0 0)
    CustomJoint H3_knee_shell_r_H3_knee_motor_r: socket_parent_frame=H3_knee_shell_r_offset
        socket_child_frame=H3_knee_motor_r_offset
      Coordinate H3_knee_angle_r: default_value=0.0413643 range=(-1.8326 0.08726646) clamped=false
      PhysicalOffsetFrame H3_knee_shell_r_offset: socket_parent=/bodyset/H3_knee_shell_r translation=(0 0 0)
      PhysicalOffsetFrame H3_knee_motor_r_offset: socket_parent=/bodyset/H3_knee_motor_r translation=(0 0 0)
      SpatialTransform:
        TransformAxis rotation1: axis=(1 0 0)
        TransformAxis rotation2: axis=(0 1 0)
        TransformAxis rotation3: coordinates=H3_knee_angle_r axis=(0 0 1) LinearFunction(coefficients=1 0)
        TransformAxis translation1: axis=(1 0 0)
        TransformAxis translation2: axis=(0 1 0)
        TransformAxis translation3: axis=(0 0 1)
    WeldJoint H3_knee_motor_r_H3_shank_r: socket_parent_frame=H3_knee_motor_r_offset
        socket_child_frame=H3_shank_r_offset
      PhysicalOffsetFrame H3_knee_motor_r_offset: socket_parent=/bodyset/H3_knee_motor_r translation=(0 -0.225 0.01325)
      PhysicalOffsetFrame H3_shank_r_offset: socket_parent=/bodyset/H3_shank_r translation=(0 0 0)
    WeldJoint H3_shank_r_H3_ankle_shell_r: socket_parent_frame=H3_shank_r_offset
        socket_child_frame=H3_ankle_shell_r_offset
      PhysicalOffsetFrame H3_shank_r_offset: socket_parent=/bodyset/H3_shank_r translation=(0 -0.2 -0.013)
      PhysicalOffsetFrame H3_ankle_shell_r_offset: socket_parent=/bodyset/H3_ankle_shell_r translation=(0 0 0)
    CustomJoint H3_ankle_shell_r_H3_ankle_motor_r: socket_parent_frame=H3_ankle_shell_r_offset
        socket_child_frame=H3_ankle_motor_r_offset
      Coordinate H3_ankle_angle_r: default_value=0 range=(-0.5235988 0.5235988) clamped=false
      PhysicalOffsetFrame H3_ankle_shell_r_offset: socket_parent=/bodyset/H3_ankle_shell_r translation=(0 0 0)
      PhysicalOffsetFrame H3_ankle_motor_r_offset: socket_parent=/bodyset/H3_ankle_motor_r translation=(0 0 0)
      SpatialTransform:
        TransformAxis rotation1: axis=(1 0 0)
        TransformAxis rotation2: axis=(0 1 0)
        TransformAxis rotation3: coordinates=H3_ankle_angle_r axis=(0 0 1) LinearFunction(coefficients=1 0)
        TransformAxis translation1: axis=(1 0 0)
        TransformAxis translation2: axis=(0 1 0)
        TransformAxis translation3: axis=(0 0 1)
    WeldJoint H3_knee_motor_r_H3_sup_shank_girth_r: socket_parent_frame=H3_knee_motor_r_offset
        socket_child_frame=H3_sup_shank_girth_r_offset
      PhysicalOffsetFrame H3_knee_motor_r_offset: socket_parent=/bodyset/H3_knee_motor_r translation=(0 -0.125 0.0075)
      PhysicalOffsetFrame H3_sup_shank_girth_r_offset: socket_parent=/bodyset/H3_sup_shank_girth_r translation=(0 0 0)
    WeldJoint H3_ankle_shell_r_H3_inf_shank_girth_r: socket_parent_frame=H3_ankle_shell_r_offset
        socket_child_frame=H3_inf_shank_girth_r_offset
      PhysicalOffsetFrame H3_ankle_shell_r_offset: socket_parent=/bodyset/H3_ankle_shell_r translation=(0 0.08 0.0075)
      PhysicalOffsetFrame H3_inf_shank_girth_r_offset: socket_parent=/bodyset/H3_inf_shank_girth_r translation=(0 0 0)
    WeldJoint H3_ankle_motor_r_H3_foot_r: socket_parent_frame=H3_ankle_motor_r_offset
        socket_child_frame=H3_foot_r_offset
      PhysicalOffsetFrame H3_ankle_motor_r_offset: socket_parent=/bodyset/H3_ankle_motor_r
          translation=(0 -0.061687 0.013)
      PhysicalOffsetFrame H3_foot_r_offset: socket_parent=/bodyset/H3_foot_r translation=(0 0 0)
    CustomJoint H3_back_H3_hip_motor_l: socket_parent_frame=H3_back_offset socket_child_frame=H3_hip_motor_l_offset
      Coordinate H3_hip_flexion_l: default_value=-0.07504916 range=(-0.5236 1.8326) clamped=false
      PhysicalOffsetFrame H3_back_offset: socket_parent=/bodyset/H3_back translation=(0 0 -0.1825)
      PhysicalOffsetFrame H3_hip_motor_l_offset: socket_parent=/bodyset/H3_hip_motor_l translation=(0 0 0)
      SpatialTransform:
        TransformAxis rotation1: axis=(1 0 0)
        TransformAxis rotation2: axis=(0 1 0)
        TransformAxis rotation3: coordinates=H3_hip_flexion_l axis=(0 0 1) LinearFunction(coefficients=1 0)
        TransformAxis translation1: axis=(1 0 0)
        TransformAxis translation2: axis=(0 1 0)
        TransformAxis translation3: axis=(0 0 1)
    WeldJoint H3_hip_motor_l_H3_thigh_l: socket_parent_frame=H3_hip_motor_l_offset socket_child_frame=H3_thigh_l_offset
      PhysicalOffsetFrame H3_hip_motor_l_offset: socket_parent=/bodyset/H3_hip_motor_l
          translation=(0 -0.20775 -0.01325)
      PhysicalOffsetFrame H3_thigh_l_offset: socket_parent=/bodyset/H3_thigh_l translation=(0 0 0)
    WeldJoint H3_hip_motor_l_H3_sup_thigh_girth_l: socket_parent_frame=H3_hip_motor_l_offset
        socket_child_frame=H3_sup_thigh_girth_l_offset
      PhysicalOffsetFrame H3_hip_motor_l_offset: socket_parent=/bodyset/H3_hip_motor_l
          translation=(0 -0.121711 -0.0075)
      PhysicalOffsetFrame H3_sup_thigh_girth_l_offset: socket_parent=/bodyset/H3_sup_thigh_girth_l translation=(0 0 0)
    WeldJoint H3_thigh_l_H3_knee_shell_l: socket_parent_frame=H3_thigh_l_offset
        socket_child_frame=H3_knee_shell_l_offset
      PhysicalOffsetFrame H3_thigh_l_offset: socket_parent=/bodyset/H3_thigh_l translation=(0 -0.18375 0.013)
      PhysicalOffsetFrame H3_knee_shell_l_offset: socket_parent=/bodyset/H3_knee_shell_l translation=(0 0 0)
    WeldJoint H3_knee_shell_l_H3_inf_thigh_girth_l: socket_parent_frame=H3_knee_shell_l_offset
        socket_child_frame=H3_inf_thigh_girth_l_offset
      PhysicalOffsetFrame H3_knee_shell_l_offset: socket_parent=/bodyset/H3_knee_shell_l translation=(0 0.0975 -0.0075)
      PhysicalOffsetFrame H3_inf_thigh_girth_l_offset: socket_parent=/bodyset/H3_inf_thigh_girth_l translation=(0 0 0)
    CustomJoint H3_knee_shell_l_H3_knee_motor_l: socket_parent_frame=H3_knee_shell_l_offset
        socket_child_frame=H3_knee_motor_l_offset
      Coordinate H3_knee_angle_l: default_value=0.0413643 range=(-1.8326 0.08726646) clamped=false
      PhysicalOffsetFrame H3_knee_shell_l_offset: socket_parent=/bodyset/H3_knee_shell_l translation=(0 0 0)
      PhysicalOffsetFrame H3_knee_motor_l_offset: socket_parent=/bodyset/H3_knee_motor_l translation=(0 0 0)
      SpatialTransform:
        TransformAxis rotation1: axis=(1 0 0)
        TransformAxis rotation2: axis=(0 1 0)
        TransformAxis rotation3: coordinates=H3_knee_angle_l axis=(0 0 1) LinearFunction(coefficients=1 0)
        TransformAxis translation1: axis=(1 0 0)
        TransformAxis translation2: axis=(0 1 0)
        TransformAxis translation3: axis=(0 0 1)
    WeldJoint H3_knee_motor_l_H3_shank_l: socket_parent_frame=H3_knee_motor_l_offset
        socket_child_frame=H3_shank_l_offset
      PhysicalOffsetFrame H3_knee_motor_l_offset: socket_parent=/bodyset/H3_knee_motor_l
          translation=(0 -0.225 -0.01325)
      PhysicalOffsetFrame H3_shank_l_offset: socket_parent=/bodyset/H3_shank_l translation=(0 0 0)
    WeldJoint H3_shank_l_H3_ankle_shell_l: socket_parent_frame=H3_shank_l_offset
        socket_child_frame=H3_ankle_shell_l_offset
      PhysicalOffsetFrame H3_shank_l_offset: socket_parent=/bodyset/H3_shank_l translation=(0 -0.2 0.013)
      PhysicalOffsetFrame H3_ankle_shell_l_offset: socket_parent=/bodyset/H3_ankle_shell_l translation=(0 0 0)
    CustomJoint H3_ankle_shell_l_H3_ankle_motor_l: socket_parent_frame=H3_ankle_shell_l_offset
        socket_child_frame=H3_ankle_motor_l_offset
      Coordinate H3_ankle_angle_l: default_value=0 range=(-0.5235988 0.5235988) clamped=false
      PhysicalOffsetFrame H3_ankle_shell_l_offset: socket_parent=/bodyset/H3_ankle_shell_l translation=(0 0 0)
      PhysicalOffsetFrame H3_ankle_motor_l_offset: socket_parent=/bodyset/H3_ankle_motor_l translation=(0 0 0)
      SpatialTransform:
        TransformAxis rotation1: axis=(1 0 0)
        TransformAxis rotation2: axis=(0 1 0)
        TransformAxis rotation3: coordinates=H3_ankle_angle_l axis=(0 0 1) LinearFunction(coefficients=1 0)
        TransformAxis translation1: axis=(1 0 0)
        TransformAxis translation2: axis=(0 1 0)
        TransformAxis translation3: axis=(0 0 1)
    WeldJoint H3_knee_motor_l_H3_sup_shank_girth_l: socket_parent_frame=H3_knee_motor_l_offset
        socket_child_frame=H3_sup_shank_girth_l_offset
      PhysicalOffsetFrame H3_knee_motor_l_offset: socket_parent=/bodyset/H3_knee_motor_l translation=(0 -0.125 -0.0075)
      PhysicalOffsetFrame H3_sup_shank_girth_l_offset: socket_parent=/bodyset/H3_sup_shank_girth_l translation=(0 0 0)
    WeldJoint H3_ankle_shell_l_H3_inf_shank_girth_l: socket_parent_frame=H3_ankle_shell_l_offset
        socket_child_frame=H3_inf_shank_girth_l_offset
      PhysicalOffsetFrame H3_ankle_shell_l_offset: socket_parent=/bodyset/H3_ankle_shell_l translation=(0 0.08 -0.0075)
      PhysicalOffsetFrame H3_inf_shank_girth_l_offset: socket_parent=/bodyset/H3_inf_shank_girth_l translation=(0 0 0)
    WeldJoint H3_ankle_motor_l_H3_foot_l: socket_parent_frame=H3_ankle_motor_l_offset
        socket_child_frame=H3_foot_l_offset
      PhysicalOffsetFrame H3_ankle_motor_l_offset: socket_parent=/bodyset/H3_ankle_motor_l
          translation=(0 -0.061687 -0.013)
      PhysicalOffsetFrame H3_foot_l_offset: socket_parent=/bodyset/H3_foot_l translation=(0 0 0)
  ForceSet:
    BushingForce [values shared by the 10 below unless stated]: rotational_stiffness=(20 20 20) [Nm/rad]
        translational_stiffness=(100 100 100) [N/m] rotational_damping=(20 20 20) [Nm/(rad/s)]
        translational_damping=(100 100 100) [N/(m/s)]
    BushingForce sup_thigh_r_bushing: socket_frame1=H3_sup_thigh_girth_r_cuff socket_frame2=sup_femur_r_cuff
      PhysicalOffsetFrame H3_sup_thigh_girth_r_cuff: socket_parent=/bodyset/H3_sup_thigh_girth_r
          translation=(-0.0558624 0.00020901 -0.0802471)
      PhysicalOffsetFrame sup_femur_r_cuff: socket_parent=/bodyset/femur_r translation=(-0.05 -0.12 0.02)
    BushingForce inf_thigh_r_bushing: socket_frame1=H3_inf_thigh_girth_r_cuff socket_frame2=inf_femur_r_cuff
      PhysicalOffsetFrame H3_inf_thigh_girth_r_cuff: socket_parent=/bodyset/H3_inf_thigh_girth_r
          translation=(-0.0330622 0.00350986 -0.0716)
      PhysicalOffsetFrame inf_femur_r_cuff: socket_parent=/bodyset/femur_r translation=(-0.034 -0.29 0.02)
    BushingForce sup_tibia_r_bushing: socket_frame1=H3_sup_shank_girth_r_cuff socket_frame2=sup_tibia_r_cuff
      PhysicalOffsetFrame H3_sup_shank_girth_r_cuff: socket_parent=/bodyset/H3_sup_shank_girth_r
          translation=(-0.0296336 0.00073351 -0.079754)
      PhysicalOffsetFrame sup_tibia_r_cuff: socket_parent=/bodyset/tibia_r translation=(-0.03 -0.12 0)
    BushingForce inf_tibia_r_bushing: socket_frame1=H3_inf_shank_girth_r_cuff socket_frame2=inf_tibia_r_cuff
      PhysicalOffsetFrame H3_inf_shank_girth_r_cuff: socket_parent=/bodyset/H3_inf_shank_girth_r
          translation=(-0.0249014 0.00155243 -0.0585038)
      PhysicalOffsetFrame inf_tibia_r_cuff: socket_parent=/bodyset/tibia_r translation=(-0.025 -0.34 0.01)
    BushingForce foot_r_bushing: socket_frame1=H3_foot_r_cuff socket_frame2=calcn_r_cuff
      PhysicalOffsetFrame H3_foot_r_cuff: socket_parent=/bodyset/H3_foot_r
          translation=(0.0511553 0.00128208 -0.0586519)
      PhysicalOffsetFrame calcn_r_cuff: socket_parent=/bodyset/calcn_r translation=(0.1 -0.01 0)
    BushingForce sup_thigh_l_bushing: socket_frame1=H3_sup_thigh_girth_l_cuff socket_frame2=sup_femur_l_cuff
      PhysicalOffsetFrame H3_sup_thigh_girth_l_cuff: socket_parent=/bodyset/H3_sup_thigh_girth_l
          translation=(-0.0558624 0.00020901 0.0802471)
      PhysicalOffsetFrame sup_femur_l_cuff: socket_parent=/bodyset/femur_l translation=(-0.05 -0.12 -0.02)
    BushingForce inf_thigh_l_bushing: socket_frame1=H3_inf_thigh_girth_l_cuff socket_frame2=inf_femur_l_cuff
      PhysicalOffsetFrame H3_inf_thigh_girth_l_cuff: socket_parent=/bodyset/H3_inf_thigh_girth_l
          translation=(-0.0330622 0.00350986 0.0716)
      PhysicalOffsetFrame inf_femur_l_cuff: socket_parent=/bodyset/femur_l translation=(-0.034 -0.29 -0.02)
    BushingForce sup_tibia_l_bushing: socket_frame1=H3_sup_shank_girth_l_cuff socket_frame2=sup_tibia_l_cuff
      PhysicalOffsetFrame H3_sup_shank_girth_l_cuff: socket_parent=/bodyset/H3_sup_shank_girth_l
          translation=(-0.0296336 0.00073351 0.079754)
      PhysicalOffsetFrame sup_tibia_l_cuff: socket_parent=/bodyset/tibia_l translation=(-0.03 -0.12 0)
    BushingForce inf_tibia_l_bushing: socket_frame1=H3_inf_shank_girth_l_cuff socket_frame2=inf_tibia_l_cuff
      PhysicalOffsetFrame H3_inf_shank_girth_l_cuff: socket_parent=/bodyset/H3_inf_shank_girth_l
          translation=(-0.0249014 0.00155243 0.0585038)
      PhysicalOffsetFrame inf_tibia_l_cuff: socket_parent=/bodyset/tibia_l translation=(-0.025 -0.34 -0.01)
    BushingForce foot_l_bushing: socket_frame1=H3_foot_l_cuff socket_frame2=calcn_l_cuff
      PhysicalOffsetFrame H3_foot_l_cuff: socket_parent=/bodyset/H3_foot_l translation=(0.0511553 0.00128208 0.0586519)
      PhysicalOffsetFrame calcn_l_cuff: socket_parent=/bodyset/calcn_l translation=(0.1 -0.01 0)
    CoordinateActuator H3_hip_motor_r: coordinate=H3_hip_flexion_r optimal_force=1
    CoordinateActuator H3_knee_motor_r: coordinate=H3_knee_angle_r optimal_force=1
    CoordinateActuator H3_ankle_motor_r: coordinate=H3_ankle_angle_r optimal_force=1
    CoordinateActuator H3_hip_motor_l: coordinate=H3_hip_flexion_l optimal_force=1
    CoordinateActuator H3_knee_motor_l: coordinate=H3_knee_angle_l optimal_force=1
    CoordinateActuator H3_ankle_motor_l: coordinate=H3_ankle_angle_l optimal_force=1
  MarkerSet:
    Marker reference: ground (0 0 0)
    Marker H3_sup_thigh_r_bushing: H3_sup_thigh_girth_r (-0.05586239 0.0002090098 -0.08024709)
    Marker sup_femur_r_bushing: femur_r (-0.05 -0.12 0.02)
    Marker H3_inf_thigh_r_bushing: H3_inf_thigh_girth_r (-0.03306223 0.003509863 -0.07159998)
    Marker inf_femur_r_bushing: femur_r (-0.034 -0.29 0.02)
    Marker H3_sup_shank_r_bushing: H3_sup_shank_girth_r (-0.02963358 0.0007335105 -0.07975403)
    Marker sup_tibia_r_bushing: tibia_r (-0.03 -0.12 0)
    Marker H3_inf_shank_r_bushing: H3_inf_shank_girth_r (-0.02490136 0.001552427 -0.05850382)
    Marker inf_tibia_r_bushing: tibia_r (-0.025 -0.34 0.01)
    Marker H3_foot_r_bushing: H3_foot_r (0.05115526 0.001282079 -0.05865189)
    Marker foot_r_bushing: calcn_r (0.1 -0.01 0)
    Marker H3_sup_thigh_l_bushing: H3_sup_thigh_girth_l (-0.05586239 0.0002090098 0.08024709)
    Marker sup_femur_l_bushing: femur_l (-0.05 -0.12 -0.02)
    Marker H3_inf_thigh_l_bushing: H3_inf_thigh_girth_l (-0.03306223 0.003509863 0.07159998)
    Marker inf_femur_l_bushing: femur_l (-0.034 -0.29 -0.02)
    Marker H3_sup_shank_l_bushing: H3_sup_shank_girth_l (-0.02963358 0.0007335105 0.07975403)
    Marker sup_tibia_l_bushing: tibia_l (-0.03 -0.12 0)
    Marker H3_inf_shank_l_bushing: H3_inf_shank_girth_l (-0.02490136 0.001552427 0.05850382)
    Marker inf_tibia_l_bushing: tibia_l (-0.025 -0.34 -0.01)
    Marker H3_foot_l_bushing: H3_foot_l (0.05115526 0.001282079 0.05865189)
    Marker foot_l_bushing: calcn_l (0.1 -0.01 0)
