# OpenSim document version 40000
Model model_scaled:
  gravity: 0 -9.80665 0
  length_units: meters
  force_units: N
  credits:
    Delp S.L., Loan J.P., Hoy M.G., Zajac F.E., Topp E.L., Rosen J.M., Thelen D.G., Anderson F.C., Seth A. Notes: 3D, 23 DOF gait model created by D.G. Thelen, Univ. of Wisconsin-Madison, and Ajay Seth, Frank C. Anderson, and Scott L. Delp, Stanford University. Lower extremity joint defintions based on Delp et al. (1990). Low back joint and anthropometry based on Anderson and Pandy (1999, 2001). Planar knee model of Yamaguchi and Zajac (1989). Seth replaced tibia translation constraints with a CustomJoint for the knee and removed the patella to eliminate all kinematic constraints; insertions of the quadrucepts are handled with moving points in the tibia frame as defined by Delp 1990. License: Creative Commons (CCBY 3.0). You are free to distribute, remix, tweak, and build upon this work, even commercially, as long as you credit us for the original creation. http://creativecommons.org/licenses/by/3.0/ More Information: http://simtk-confluence.stanford.edu:8080/display/OpenSim/Gait+2392+and+2354+Models
  publications:
    Delp, S.L., Loan, J.P., Hoy, M.G., Zajac, F.E., Topp E.L., Rosen, J.M.: An interactive graphics-based model of the lower extremity to study orthopaedic surgical procedures, IEEE Transactions on Biomedical Engineering, vol. 37, pp. 757-767, 1990. Yamaguchi G.T., Zajac F.E.: A planar model of the knee joint to characterize the knee extensor mechanism." J . Biomecl7. vol. 21. pp. 1-10. 1989. Anderson F.C., Pandy M.G.: A dynamic optimization solution for vertical jumping in three dimensions. Computer Methods in Biomechanics and Biomedical Engineering 2:201-231, 1999. Anderson F.C., Pandy M.G.: Dynamic optimization of human walking. Journal of Biomechanical Engineering 123:381-390, 2001.
  Ground: meshes=treadmill.vtp
  BodySet:
    Body pelvis: mass=13.00467 [kg] mass_center=(-0.08441119 0 0) inertia=(0.1618151 0.1371021 0.09113905 0 0 0)
        meshes=(sacrum.vtp pelvis.vtp l_pelvis.vtp)
    Body femur_r: mass=10.27101 mass_center=(0 -0.1679661 0) inertia=(0.1443413 0.03783705 0.1522106 0 0 0)
        meshes=femur_r.vtp
    Body tibia_r: mass=4.093982 mass_center=(0 -0.1966083 0) inertia=(0.06171778 0.006245251 0.06257497 0 0 0)
        meshes=(tibia_r.vtp fibula.vtp)
    Body talus_r: mass=0.1104243 mass_center=(0 0 0) inertia=(0.001224559 0.001224559 0.001224559 0 0 0)
        meshes=talus.vtp
    Body calcn_r: mass=1.380304 mass_center=(0.1014705 0.03044116 0)
        inertia=(0.001591742 0.004434139 0.004661531 0 0 0) meshes=foot.vtp
    Body toes_r: mass=0.2391791 mass_center=(0.03510881 0.006088232 -0.01775734)
        inertia=(0.0001136959 0.0002273917 0.0001136959 0 0 0) meshes=bofoot.vtp
    Body femur_l: mass=10.27101 mass_center=(0 -0.1679661 0) inertia=(0.1443413 0.03783705 0.1522106 0 0 0)
        meshes=femur_l.vtp
    Body tibia_l: mass=4.093982 mass_center=(0 -0.1966083 0) inertia=(0.06171778 0.006245251 0.06257497 0 0 0)
        meshes=(tibia_l.vtp l_fibula.vtp)
    Body talus_l: mass=0.1104243 mass_center=(0 0 0) inertia=(0.001224559 0.001224559 0.001224559 0 0 0)
        meshes=l_talus.vtp
    Body calcn_l: mass=1.380304 mass_center=(0.1014705 0.03044116 0)
        inertia=(0.001591742 0.004434139 0.004661531 0 0 0) meshes=l_foot.vtp
    Body toes_l: mass=0.2391791 mass_center=(0.03510881 0.006088232 0.01775734)
        inertia=(0.0001136959 0.0002273917 0.0001136959 0 0 0) meshes=l_bofoot.vtp
    Body torso: mass=37.80553 mass_center=(-0.03212195 0.3426341 0) inertia=(1.866684 0.956446 1.81212 0 0 0)
        meshes=(hat_spine.vtp hat_jaw.vtp hat_skull.vtp hat_ribs.vtp)
  JointSet:
    CustomJoint ground_pelvis: socket_parent_frame=ground_offset socket_child_frame=pelvis_offset
      Coordinate pelvis_tilt: default_value=0 range=(-1.570796 1.570796) clamped=false
      Coordinate pelvis_list: default_value=0 range=(-1.570796 1.570796) clamped=false
      Coordinate pelvis_rotation: default_value=0 range=(-1.570796 1.570796) clamped=false
      Coordinate pelvis_tx: default_value=0 range=(-5 5) clamped=false
      Coordinate pelvis_ty: default_value=0.95 range=(-1 2) clamped=false
      Coordinate pelvis_tz: default_value=0 range=(-3 3) clamped=false
      PhysicalOffsetFrame ground_offset: socket_parent=/ground translation=(0 0 0) [meters]
      PhysicalOffsetFrame pelvis_offset: socket_parent=/bodyset/pelvis translation=(0 0 0)
      SpatialTransform:
        TransformAxis rotation1: coordinates=pelvis_tilt axis=(0 0 1) LinearFunction(coefficients=1 0)
        TransformAxis rotation2: coordinates=pelvis_list axis=(1 0 0) LinearFunction(coefficients=1 0)
        TransformAxis rotation3: coordinates=pelvis_rotation axis=(0 1 0) LinearFunction(coefficients=1 0)
        TransformAxis translation1: coordinates=pelvis_tx axis=(1 0 0) LinearFunction(coefficients=1 0)
        TransformAxis translation2: coordinates=pelvis_ty axis=(0 1 0) LinearFunction(coefficients=1 0)
        TransformAxis translation3: coordinates=pelvis_tz axis=(0 0 1) LinearFunction(coefficients=1 0)
    CustomJoint hip_r: socket_parent_frame=pelvis_offset socket_child_frame=femur_r_offset
      Coordinate hip_flexion_r: default_value=0 range=(-2.094395 2.094395) clamped=false
      Coordinate hip_adduction_r: default_value=0 range=(-2.094395 2.094395) clamped=false
      Coordinate hip_rotation_r: default_value=0 range=(-2.094395 2.094395) clamped=false
      PhysicalOffsetFrame pelvis_offset: socket_parent=/bodyset/pelvis translation=(-0.08441119 -0.07891909 0.09969355)
      PhysicalOffsetFrame femur_r_offset: socket_parent=/bodyset/femur_r translation=(0 0 0)
      SpatialTransform: axes_held_at_zero=(translation1 translation2 translation3)
        TransformAxis rotation1: coordinates=hip_flexion_r axis=(0 0 1) LinearFunction(coefficients=1 0)
        TransformAxis rotation2: coordinates=hip_adduction_r axis=(1 0 0) LinearFunction(coefficients=1 0)
        TransformAxis rotation3: coordinates=hip_rotation_r axis=(0 1 0) LinearFunction(coefficients=1 0)
    CustomJoint knee_r: socket_parent_frame=femur_r_offset socket_child_frame=tibia_r_offset
      Coordinate knee_angle_r: default_value=0 range=(-2.094395 0.1745329) clamped=false
      PhysicalOffsetFrame femur_r_offset: socket_parent=/bodyset/femur_r translation=(0 0 0)
      PhysicalOffsetFrame tibia_r_offset: socket_parent=/bodyset/tibia_r translation=(0 0 0)
      SpatialTransform: axes_held_at_zero=(rotation2 rotation3 translation3)
        TransformAxis rotation1: coordinates=knee_angle_r axis=(0 0 1) LinearFunction(coefficients=1 0)
        TransformAxis translation1: coordinates=knee_angle_r axis=(1 0 0)
          MultiplierFunction: scale=0.9880359
            SimmSpline: x=(-2.0944 -1.74533 -1.39626 -1.0472 -0.698132 -0.349066 -0.174533 0.197344 0.337395 0.490178 1.52146 2.0944)
                y=(-0.0032 0.00179 0.00411 0.0041 0.00212 -0.001 -0.0031 -0.005227 -0.005435 -0.005574 -0.005435 -0.00525)
        TransformAxis translation2: coordinates=knee_angle_r axis=(0 1 0)
          MultiplierFunction: scale=0.9880359
            SimmSpline: x=(-2.0944 -1.22173 -0.523599 -0.349066 -0.174533 0.159149 2.0944)
                y=(-0.4226 -0.4082 -0.399 -0.3976 -0.3966 -0.395264 -0.396)
    CustomJoint ankle_r: socket_parent_frame=tibia_r_offset socket_child_frame=talus_r_offset
      Coordinate ankle_angle_r: default_value=0 range=(-1.570796 1.570796) clamped=false
      PhysicalOffsetFrame tibia_r_offset: socket_parent=/bodyset/tibia_r translation=(0 -0.4528204 0)
      PhysicalOffsetFrame talus_r_offset: socket_parent=/bodyset/talus_r translation=(0 0 0)
      SpatialTransform: axes_held_at_zero=(rotation2 rotation3 translation1 translation2 translation3)
        TransformAxis rotation1: coordinates=ankle_angle_r axis=(-0.1050135 -0.1740224 0.9791263)
            LinearFunction(coefficients=1 0)
    CustomJoint subtalar_r: socket_parent_frame=talus_r_offset socket_child_frame=calcn_r_offset
      Coordinate subtalar_angle_r: default_value=0 range=(-1.570796 1.570796) clamped=false
      PhysicalOffsetFrame talus_r_offset: socket_parent=/bodyset/talus_r
          translation=(-0.05135825 -0.04417631 0.008340319)
      PhysicalOffsetFrame calcn_r_offset: socket_parent=/bodyset/calcn_r translation=(0 0 0)
      SpatialTransform: axes_held_at_zero=(rotation2 rotation3 translation1 translation2 translation3)
        TransformAxis rotation1: coordinates=subtalar_angle_r axis=(0.7871796 0.6047475 -0.1209495)
            LinearFunction(coefficients=1 0)
    CustomJoint mtp_r: socket_parent_frame=calcn_r_offset socket_child_frame=toes_r_offset
      Coordinate mtp_angle_r: default_value=0 range=(-1.570796 1.570796) clamped=false locked=true
      PhysicalOffsetFrame calcn_r_offset: socket_parent=/bodyset/calcn_r
          translation=(0.1814293 -0.002029411 0.001095882)
      PhysicalOffsetFrame toes_r_offset: socket_parent=/bodyset/toes_r translation=(0 0 0)
      SpatialTransform: axes_held_at_zero=(rotation2 rotation3 translation1 translation2 translation3)
        TransformAxis rotation1: coordinates=mtp_angle_r axis=(-0.5809544 0 0.8139361) LinearFunction(coefficients=1 0)
    CustomJoint hip_l: socket_parent_frame=pelvis_offset socket_child_frame=femur_l_offset
      Coordinate hip_flexion_l: default_value=0 range=(-2.094395 2.094395) clamped=false
      Coordinate hip_adduction_l: default_value=0 range=(-2.094395 2.094395) clamped=false
      Coordinate hip_rotation_l: default_value=0 range=(-2.094395 2.094395) clamped=false
      PhysicalOffsetFrame pelvis_offset: socket_parent=/bodyset/pelvis
          translation=(-0.08441119 -0.07891909 -0.09969355)
      PhysicalOffsetFrame femur_l_offset: socket_parent=/bodyset/femur_l translation=(0 0 0)
      SpatialTransform: axes_held_at_zero=(translation1 translation2 translation3)
        TransformAxis rotation1: coordinates=hip_flexion_l axis=(0 0 1) LinearFunction(coefficients=1 0)
        TransformAxis rotation2: coordinates=hip_adduction_l axis=(-1 0 0) LinearFunction(coefficients=1 0)
        TransformAxis rotation3: coordinates=hip_rotation_l axis=(0 -1 0) LinearFunction(coefficients=1 0)
    CustomJoint knee_l: socket_parent_frame=femur_l_offset socket_child_frame=tibia_l_offset
      Coordinate knee_angle_l: default_value=0 range=(-2.094395 0.1745329) clamped=false
      PhysicalOffsetFrame femur_l_offset: socket_parent=/bodyset/femur_l translation=(0 0 0)
      PhysicalOffsetFrame tibia_l_offset: socket_parent=/bodyset/tibia_l translation=(0 0 0)
      SpatialTransform: axes_held_at_zero=(rotation2 rotation3 translation3)
        TransformAxis rotation1: coordinates=knee_angle_l axis=(0 0 1) LinearFunction(coefficients=1 0)
        TransformAxis translation1: coordinates=knee_angle_l axis=(1 0 0)
          MultiplierFunction: scale=0.9880359
            SimmSpline: x=(-2.0944 -1.74533 -1.39626 -1.0472 -0.698132 -0.349066 -0.174533 0.197344 0.337395 0.490178 1.52146 2.0944)
                y=(-0.0032 0.00179 0.00411 0.0041 0.00212 -0.001 -0.0031 -0.005227 -0.005435 -0.005574 -0.005435 -0.00525)
        TransformAxis translation2: coordinates=knee_angle_l axis=(0 1 0)
          MultiplierFunction: scale=0.9880359
            SimmSpline: x=(-2.0944 -1.22173 -0.523599 -0.349066 -0.174533 0.159149 2.0944)
                y=(-0.4226 -0.4082 -0.399 -0.3976 -0.3966 -0.395264 -0.396)
    CustomJoint ankle_l: socket_parent_frame=tibia_l_offset socket_child_frame=talus_l_offset
      Coordinate ankle_angle_l: default_value=0 range=(-1.570796 1.570796) clamped=false
      PhysicalOffsetFrame tibia_l_offset: socket_parent=/bodyset/tibia_l translation=(0 -0.4528204 0)
      PhysicalOffsetFrame talus_l_offset: socket_parent=/bodyset/talus_l translation=(0 0 0)
      SpatialTransform: axes_held_at_zero=(rotation2 rotation3 translation1 translation2 translation3)
        TransformAxis rotation1: coordinates=ankle_angle_l axis=(0.1050135 0.1740224 0.9791263)
            LinearFunction(coefficients=1 0)
    CustomJoint subtalar_l: socket_parent_frame=talus_l_offset socket_child_frame=calcn_l_offset
      Coordinate subtalar_angle_l: default_value=0 range=(-1.570796 1.570796) clamped=false
      PhysicalOffsetFrame talus_l_offset: socket_parent=/bodyset/talus_l
          translation=(-0.05135825 -0.04417631 -0.008340319)
      PhysicalOffsetFrame calcn_l_offset: socket_parent=/bodyset/calcn_l translation=(0 0 0)
      SpatialTransform: axes_held_at_zero=(rotation2 rotation3 translation1 translation2 translation3)
        TransformAxis rotation1: coordinates=subtalar_angle_l axis=(-0.7871796 -0.6047475 -0.1209495)
            LinearFunction(coefficients=1 0)
    CustomJoint mtp_l: socket_parent_frame=calcn_l_offset socket_child_frame=toes_l_offset
      Coordinate mtp_angle_l: default_value=0 range=(-1.570796 1.570796) clamped=false locked=true
      PhysicalOffsetFrame calcn_l_offset: socket_parent=/bodyset/calcn_l
          translation=(0.1814293 -0.002029411 -0.001095882)
      PhysicalOffsetFrame toes_l_offset: socket_parent=/bodyset/toes_l translation=(0 0 0)
      SpatialTransform: axes_held_at_zero=(rotation2 rotation3 translation1 translation2 translation3)
        TransformAxis rotation1: coordinates=mtp_angle_l axis=(0.5809544 0 0.8139361) LinearFunction(coefficients=1 0)
    CustomJoint back: socket_parent_frame=pelvis_offset socket_child_frame=torso_offset
      Coordinate lumbar_extension: default_value=0 range=(-1.570796 1.570796) clamped=false
      Coordinate lumbar_bending: default_value=0 range=(-1.570796 1.570796) clamped=false
      Coordinate lumbar_rotation: default_value=0 range=(-1.570796 1.570796) clamped=false
      PhysicalOffsetFrame pelvis_offset: socket_parent=/bodyset/pelvis translation=(-0.1202292 0.09730568 0)
      PhysicalOffsetFrame torso_offset: socket_parent=/bodyset/torso translation=(0 0 0)
      SpatialTransform: axes_held_at_zero=(translation1 translation2 translation3)
        TransformAxis rotation1: coordinates=lumbar_extension axis=(0 0 1) LinearFunction(coefficients=1 0)
        TransformAxis rotation2: coordinates=lumbar_bending axis=(1 0 0) LinearFunction(coefficients=1 0)
        TransformAxis rotation3: coordinates=lumbar_rotation axis=(0 1 0) LinearFunction(coefficients=1 0)
  ForceSet:
    ObjectGroup R_hip_abd
    ObjectGroup R_hip_flex
    ObjectGroup R_hip_inrot
    ObjectGroup R_hip_exrot
    ObjectGroup R_hip_ext
    ObjectGroup R_hip_add
    ObjectGroup R_knee_bend
    ObjectGroup R_knee_ext
    ObjectGroup R_ankle_pf
    ObjectGroup R_inverter
    ObjectGroup R_ankle_df
    ObjectGroup R_everter
    ObjectGroup L_hip_abd
    ObjectGroup L_hip_flex
    ObjectGroup L_hip_inrot
    ObjectGroup L_hip_exrot
    ObjectGroup L_hip_ext
    ObjectGroup L_hip_add
    ObjectGroup L_knee_bend
    ObjectGroup L_knee_ext
    ObjectGroup L_ankle_pf
    ObjectGroup L_inverter
    ObjectGroup L_ankle_df
    ObjectGroup L_everter
    ObjectGroup back_ext
    ObjectGroup back_rlb
    ObjectGroup back_introt
    ObjectGroup back_llb
    ObjectGroup back_extrot
    ObjectGroup back_flex
  MarkerSet:
    Marker Chest: torso (0.1425179 0.2884948 -0.0004374298)
    Marker R_Acromium: torso (0.003657615 0.4277268 0.1768888)
    Marker L_Acromium: torso (0.00413672 0.4319151 -0.1748773)
    Marker R_ASIS: pelvis (0.02039794 0.004417263 0.1357906)
    Marker L_ASIS: pelvis (0.01551148 0.009414402 -0.1550145) fixed=true
    Marker V_Sacral: pelvis (-0.2131297 0.02924888 -0.01467624)
    Marker R_Knee_Med: femur_r (0.002205539 -0.4024633 -0.08359817)
    Marker R_Knee_Lat: femur_r (0.01522531 -0.4091672 0.05069759)
    Marker L_Knee_Med: femur_l (0.005643496 -0.3933346 0.0852836)
    Marker L_Knee_Lat: femur_l (0.01156712 -0.3838766 -0.05443241)
    Marker R_Thigh_Upper: femur_r (0.1137801 -0.1998047 0.01360817)
    Marker R_Thigh_Front: femur_r (0.08983341 -0.3097604 -0.03905374)
    Marker R_Thigh_Rear: femur_r (0.06869122 -0.3107789 0.03208835)
    Marker L_Thigh_Upper: femur_l (0.108795 -0.1846134 -0.01810774)
    Marker L_Thigh_Front: femur_l (0.0894866 -0.2896891 0.03705026)
    Marker L_Thigh_Rear: femur_l (0.06385436 -0.2995374 -0.0385215)
    Marker R_Ankle_Med: tibia_r (0.002038628 -0.4141729 -0.03927168)
    Marker R_Ankle_Lat: tibia_r (-0.02025665 -0.4329417 0.06156175)
    Marker L_Ankle_Lat: tibia_l (-0.01493792 -0.4421542 -0.05617652)
    Marker L_Ankle_Med: tibia_l (0.0008491917 -0.4044695 0.03707812)
    Marker R_Shank_Upper: tibia_r (0.05494308 -0.1468963 0.008096882)
    Marker R_Shank_Front: tibia_r (0.03162629 -0.2639713 -0.01443643)
    Marker R_Shank_Rear: tibia_r (0.03007037 -0.261599 0.04891658)
    Marker L_Shank_Upper: tibia_l (0.05042253 -0.1641187 -0.01937745)
    Marker L_Shank_Front: tibia_l (0.03179565 -0.2772879 0.01655407)
    Marker L_Shank_Rear: tibia_l (0.01589659 -0.267102 -0.05523655)
    Marker R_Heel: calcn_r (-0.02643097 0.03573518 0.003266201)
    Marker R_MTP1: calcn_r (0.1899708 0.03737812 -0.03083348)
    Marker R_MTP5: calcn_r (0.1636835 0.0155293 0.05106648)
    Marker L_Heel: calcn_l (-0.01514848 0.04440838 0.005853268)
    Marker L_MTP1: calcn_l (0.1757479 0.03560228 0.03251875)
    Marker L_MTP5: calcn_l (0.1595109 0.0202558 -0.05528426)
    Marker RHJC: pelvis (-0.05696923 -0.07842954 0.1017933)
    Marker LHJC: pelvis (-0.06160566 -0.08327363 -0.08843721)
    Marker RKJC: tibia_r (0.01383993 -0.01300429 -0.01645029)
    Marker LKJC: tibia_l (0.01230425 0.003742218 0.0154256)
    Marker RAJC: talus_r (-0.007999588 0.02952286 0.0113102)
    Marker LAJC: talus_l (-0.004293289 0.02991322 -0.009916184)
    Marker R_Pelvis: pelvis (-0.03583225 0.04112384 0.1969761)
    Marker L_Pelvis: pelvis (-0.05263482 0.04129094 -0.2038827)
