# OpenSim document version 40000
Model model_scaled:
  SmoothSphereHalfSpaceForce [values shared by the 10 below unless stated]: dissipation=2 [s/m] static_friction=0.8
      dynamic_friction=0.8 viscous_friction=0.5 transition_velocity=0.2 [m/s] hertz_smoothing=300
      hunt_crossley_smoothing=50 socket_half_space=/contactgeometryset/floor stiffness=3067776000 [N/m^2]
  SmoothSphereHalfSpaceForce chair_r: appliesForce=false socket_sphere=/contactgeometryset/butt_r
      socket_half_space=/contactgeometryset/chair stiffness=3067776
  SmoothSphereHalfSpaceForce chair_l: appliesForce=false socket_sphere=/contactgeometryset/butt_l
      socket_half_space=/contactgeometryset/chair stiffness=3067776
  SmoothSphereHalfSpaceForce r_1: socket_sphere=/contactgeometryset/r_1
  SmoothSphereHalfSpaceForce r_2: socket_sphere=/contactgeometryset/r_2
  SmoothSphereHalfSpaceForce r_3: socket_sphere=/contactgeometryset/r_3
  SmoothSphereHalfSpaceForce r_4: socket_sphere=/contactgeometryset/r_4
  SmoothSphereHalfSpaceForce l_1: socket_sphere=/contactgeometryset/l_1
  SmoothSphereHalfSpaceForce l_2: socket_sphere=/contactgeometryset/l_2
  SmoothSphereHalfSpaceForce l_3: socket_sphere=/contactgeometryset/l_3
  SmoothSphereHalfSpaceForce l_4: socket_sphere=/contactgeometryset/l_4
  ActivationCoordinateActuator [values shared by the 7 below unless stated]: min_control=-1 max_control=1
      optimal_force=200 activation_time_constant=0.01
  ActivationCoordinateActuator lumbarAct: coordinate=lumbar
  ActivationCoordinateActuator r_hip_act: coordinate=hip_flexion_r
  ActivationCoordinateActuator l_hip_act: coordinate=hip_flexion_l
  ActivationCoordinateActuator r_knee_act: coordinate=knee_angle_r
  ActivationCoordinateActuator l_knee_act: coordinate=knee_angle_l
  ActivationCoordinateActuator r_ankle_act: coordinate=ankle_angle_r
  ActivationCoordinateActuator l_ankle_act: coordinate=ankle_angle_l
  Ground
  BodySet:
    Body pelvis: mass=14.49316 [kg] mass_center=(-0.08355476 0 0) inertia=(0.2022124 0.2022124 0.09952004 0 0 0)
        meshes=(r_pelvis.vtp l_pelvis.vtp sacrum.vtp)
    Body femur_l: mass=11.44661 mass_center=(0 -0.1710229 0) inertia=(0.16677 0.04371642 0.1758621 0 0 0)
        meshes=femur_l.vtp
    Body femur_r: mass=11.44661 mass_center=(0 -0.1710229 0) inertia=(0.16677 0.04371642 0.1758621 0 0 0)
        meshes=femur_r.vtp
    Body tibia_l: mass=4.56257 mass_center=(0 -0.1968515 0) inertia=(0.06895204 0.006977289 0.0699097 0 0 0)
        meshes=(tibia_l.vtp l_fibula.vtp)
    Body tibia_r: mass=4.56257 mass_center=(0 -0.1968515 0) inertia=(0.06895204 0.006977289 0.0699097 0 0 0)
        meshes=(tibia_r.vtp r_fibula.vtp)
    Body talus_l: mass=0.1230633 mass_center=(0 0 0) inertia=(0.001430528 0.001430528 0.001430528 0 0 0)
        meshes=l_talus.vtp
    Body talus_r: mass=0.1230633 mass_center=(0 0 0) inertia=(0.001430528 0.001430528 0.001430528 0 0 0)
        meshes=r_talus.vtp
    Body calcn_l: mass=1.538291 mass_center=(0.1078162 0.03234482 0) inertia=(0.00200274 0.005579061 0.005865166 0 0 0)
        meshes=l_foot.vtp
    Body calcn_r: mass=1.538291 mass_center=(0.1078162 0.03234482 0) inertia=(0.00200274 0.005579061 0.005865166 0 0 0)
        meshes=r_foot.vtp
    Body toes_l: mass=0.266555 mass_center=(0.03730443 0.006468977 0.01886786)
        inertia=(0.0001430528 0.0002861057 0.0001430528 0 0 0) meshes=l_bofoot.vtp
    Body toes_r: mass=0.266555 mass_center=(0.03730443 0.006468977 -0.01886786)
        inertia=(0.0001430528 0.0002861057 0.0001430528 0 0 0) meshes=r_bofoot.vtp
    Body block_l: mass=10000 mass_center=(0 0 0) inertia=(0.33 33.66 33.33 0 0 0) meshes=block.vtp
    Body block_r: mass=10000 mass_center=(0 0 0) inertia=(0.33 33.66 33.33 0 0 0) meshes=block.vtp
    Body torso: mass=42.13267 mass_center=(-0.0298859 0.3187832 0) inertia=(1.810467 0.9420373 1.810467 0 0 0)
        meshes=(hat_spine.vtp hat_jaw.vtp hat_skull.vtp hat_ribs.vtp)
    Body chair: mass=1 mass_center=(0 0 0) inertia=(1 1 1 0 0 0)
  JointSet:
    PlanarJoint groundPelvis: socket_parent_frame=ground_offset socket_child_frame=pelvis_offset
      Coordinate pelvis_tilt: default_value=0 range=(-1.570796 1.570796) locked=true
      Coordinate pelvis_tx: default_value=0 range=(-5 5) locked=true
      Coordinate pelvis_ty: range=(-3 3)
      PhysicalOffsetFrame ground_offset: socket_parent=/ground translation=(0 0 0) [meters]
      PhysicalOffsetFrame pelvis_offset: socket_parent=/bodyset/pelvis translation=(0 0 0)
    PinJoint hip_l: socket_parent_frame=pelvis_offset socket_child_frame=femur_l_offset
      Coordinate hip_flexion_l: range=(-1.047198 2.094395)
      PhysicalOffsetFrame pelvis_offset: socket_parent=/bodyset/pelvis translation=(-0.08355476 -0.07811839 -0.1081469)
      PhysicalOffsetFrame femur_l_offset: socket_parent=/bodyset/femur_l translation=(0 0 0)
    PinJoint hip_r: socket_parent_frame=pelvis_offset socket_child_frame=femur_r_offset
      Coordinate hip_flexion_r: default_value=0 range=(-1.047198 2.094395) locked=true
      PhysicalOffsetFrame pelvis_offset: socket_parent=/bodyset/pelvis translation=(-0.08355476 -0.07811839 0.1081469)
      PhysicalOffsetFrame femur_r_offset: socket_parent=/bodyset/femur_r translation=(0 0 0)
    PinJoint knee_l: socket_parent_frame=femur_l_offset socket_child_frame=tibia_l_offset
      Coordinate knee_angle_l: range=(-2.094395 0.1745329)
      PhysicalOffsetFrame femur_l_offset: socket_parent=/bodyset/femur_l translation=(-0.004526928 -0.3982016 0)
      PhysicalOffsetFrame tibia_l_offset: socket_parent=/bodyset/tibia_l translation=(0 0 0)
    PinJoint knee_r: socket_parent_frame=femur_r_offset socket_child_frame=tibia_r_offset
      Coordinate knee_angle_r: default_value=0 range=(-2.094395 0.1745329) locked=true
      PhysicalOffsetFrame femur_r_offset: socket_parent=/bodyset/femur_r translation=(-0.004526928 -0.3982016 0)
      PhysicalOffsetFrame tibia_r_offset: socket_parent=/bodyset/tibia_r translation=(0 0 0)
    PinJoint ankle_l: socket_parent_frame=tibia_l_offset socket_child_frame=talus_l_offset
      Coordinate ankle_angle_l: range=(-0.6981317 0.5235988)
      PhysicalOffsetFrame tibia_l_offset: socket_parent=/bodyset/tibia_l translation=(0 -0.4533802 0)
      PhysicalOffsetFrame talus_l_offset: socket_parent=/bodyset/talus_l translation=(0 0 0)
    PinJoint ankle_r: socket_parent_frame=tibia_r_offset socket_child_frame=talus_r_offset
      Coordinate ankle_angle_r: default_value=0 range=(-0.6981317 0.5235988) locked=true
      PhysicalOffsetFrame tibia_r_offset: socket_parent=/bodyset/tibia_r translation=(0 -0.4533802 0)
      PhysicalOffsetFrame talus_r_offset: socket_parent=/bodyset/talus_r translation=(0 0 0)
    WeldJoint subtalar_l: socket_parent_frame=talus_l_offset socket_child_frame=calcn_l_offset
      PhysicalOffsetFrame talus_l_offset: socket_parent=/bodyset/talus_l
          translation=(-0.05258196 -0.0452289 -0.008539043)
      PhysicalOffsetFrame calcn_l_offset: socket_parent=/bodyset/calcn_l translation=(0 0 0)
    WeldJoint subtalar_r: socket_parent_frame=talus_r_offset socket_child_frame=calcn_r_offset
      PhysicalOffsetFrame talus_r_offset: socket_parent=/bodyset/talus_r
          translation=(-0.05258196 -0.0452289 0.008539043)
      PhysicalOffsetFrame calcn_r_offset: socket_parent=/bodyset/calcn_r translation=(0 0 0)
    WeldJoint mtp_l: socket_parent_frame=calcn_l_offset socket_child_frame=toes_l_offset
      PhysicalOffsetFrame calcn_l_offset: socket_parent=/bodyset/calcn_l
          translation=(0.1927754 -0.002156324 -0.001164415)
      PhysicalOffsetFrame toes_l_offset: socket_parent=/bodyset/toes_l translation=(0 0 0)
    WeldJoint mtp_r: socket_parent_frame=calcn_r_offset socket_child_frame=toes_r_offset
      PhysicalOffsetFrame calcn_r_offset: socket_parent=/bodyset/calcn_r
          translation=(0.1927754 -0.002156324 0.001164415)
      PhysicalOffsetFrame toes_r_offset: socket_parent=/bodyset/toes_r translation=(0 0 0)
    WeldJoint foot_block_l: socket_parent_frame=calcn_l_offset socket_child_frame=block_l_offset
      PhysicalOffsetFrame calcn_l_offset: socket_parent=/bodyset/calcn_l translation=(0 0 0)
      PhysicalOffsetFrame block_l_offset: socket_parent=/bodyset/block_l translation=(0 0.05 0)
    WeldJoint foot_block_r: socket_parent_frame=calcn_r_offset socket_child_frame=block_r_offset
      PhysicalOffsetFrame calcn_r_offset: socket_parent=/bodyset/calcn_r translation=(0 0 0)
      PhysicalOffsetFrame block_r_offset: socket_parent=/bodyset/block_r translation=(0 0.05 0)
    PinJoint lumbar: socket_parent_frame=pelvis_offset socket_child_frame=torso_offset
      Coordinate lumbar: default_value=0 range=(-1.570796 1.570796) locked=true
      PhysicalOffsetFrame pelvis_offset: socket_parent=/bodyset/pelvis translation=(-0.1190094 0.09631843 0)
      PhysicalOffsetFrame torso_offset: socket_parent=/bodyset/torso translation=(0 0 0)
    WeldJoint ground_chair: socket_parent_frame=ground_offset socket_child_frame=chair_offset
      PhysicalOffsetFrame ground_offset: socket_parent=/ground translation=(0 0.545 0)
      PhysicalOffsetFrame chair_offset: socket_parent=/bodyset/chair translation=(0 0 0)
  ConstraintSet:
    CoordinateCouplerConstraint hip: independent_coordinate_names=hip_flexion_r dependent_coordinate_name=hip_flexion_l
        coupled_coordinates_function=LinearFunction(coefficients=1 0)
    CoordinateCouplerConstraint knee: independent_coordinate_names=knee_angle_r dependent_coordinate_name=knee_angle_l
        coupled_coordinates_function=LinearFunction(coefficients=1 0)
    CoordinateCouplerConstraint ankle: independent_coordinate_names=ankle_angle_r
        dependent_coordinate_name=ankle_angle_l coupled_coordinates_function=LinearFunction(coefficients=1 0)
  MarkerSet:
    Marker Clavical: torso (0.04942436 0.3635376 0.002163766) fixed=true
    Marker R_Acromium: torso (-0.04955611 0.3979769 0.1374529)
    Marker L_Acromium: torso (-0.0525552 0.3982801 -0.1609807)
    Marker Sternum: torso (0.1015373 0.2767095 -0.02332701)
    Marker Torso: torso (0.06760921 0.3162703 -0.1289467)
    Marker R_Pelvis: pelvis (-0.1232088 0.02277247 0.1952734)
    Marker R_ASIS: pelvis (0.02055173 0.005169059 0.1594119) fixed=true
    Marker V_Sacral: pelvis (-0.2483525 0.003255513 0.0008556303) fixed=true
    Marker L_Pelvis: pelvis (-0.09246806 0.01361249 -0.2133798)
    Marker L_ASIS: pelvis (0.02055173 0.005169059 -0.1594119) fixed=true
    Marker R_Thigh: femur_r (0.0959375 -0.2852995 -0.01314124)
    Marker R_Thigh_Lat: femur_r (0.0004357783 -0.4112297 0.05288156) fixed=true
    Marker R_Thigh_Med: femur_r (0.005979165 -0.403788 -0.05404532) fixed=true
    Marker R_Shank: tibia_r (-0.02625634 -0.2101994 0.07607067)
    Marker R_Shank_Lat: tibia_r (0.001775907 -0.4363594 0.06430188) fixed=true
    Marker R_Shank_Med: tibia_r (-0.002253128 -0.4243235 -0.03828191) fixed=true
    Marker R_Toe: calcn_r (0.1968281 0.02594597 -0.03159126) fixed=true
    Marker R_Heel: calcn_r (-0.0287268 0.01335721 -0.005931308) fixed=true
    Marker RHJC: femur_r (0.003774439 -0.00405471 0.003334018) fixed=true
    Marker RKJC: tibia_r (0.01603709 -0.01315379 0.0001383575) fixed=true
    Marker RAJC: calcn_r (0.05412663 0.07258757 0.002030461) fixed=true
  ContactGeometrySet:
    ContactSphere heel_r: socket_frame=/bodyset/calcn_r location=(0.03130753 0.01043584 0) radius=0.035
    ContactSphere heel_l: socket_frame=/bodyset/calcn_l location=(0.03130753 0.01043584 0) radius=0.035
    ContactSphere front_r: socket_frame=/bodyset/calcn_r location=(0.1774093 -0.01565376 0.005217921) radius=0.015
    ContactSphere front_l: socket_frame=/bodyset/calcn_l location=(0.1774093 -0.01565376 -0.005217921) radius=0.015
    ContactSphere r_1: socket_frame=/bodyset/block_r location=(-0.999 0 -0.074) radius=0.005
    ContactSphere r_2: socket_frame=/bodyset/block_r location=(-0.999 0 0.074) radius=0.005
    ContactSphere r_3: socket_frame=/bodyset/block_r location=(0.999 0 -0.074) radius=0.005
    ContactSphere r_4: socket_frame=/bodyset/block_r location=(0.999 0 0.074) radius=0.005
    ContactSphere l_1: socket_frame=/bodyset/block_l location=(-0.999 0 -0.074) radius=0.005
    ContactSphere l_2: socket_frame=/bodyset/block_l location=(-0.999 0 0.074) radius=0.005
    ContactSphere l_3: socket_frame=/bodyset/block_l location=(0.999 0 -0.074) radius=0.005
    ContactSphere l_4: socket_frame=/bodyset/block_l location=(0.999 0 0.074) radius=0.005
    ContactHalfSpace floor: socket_frame=/ground orientation=(0 0 -1.570796)
    ContactHalfSpace chair: socket_frame=/bodyset/chair orientation=(0 0 -1.570796)
    ContactSphere butt_r: socket_frame=/bodyset/pelvis location=(-0.125 -0.1 0.05) radius=0.035
    ContactSphere butt_l: socket_frame=/bodyset/pelvis location=(-0.125 -0.1 -0.05) radius=0.035
