# OpenSim document version 40000
InverseKinematicsTool:
  time_range: 13.6 15.7
  output_motion_file: D:\OneDrive - University of Edinburgh\Projects\Ergonomics\IOC Framework\Sit To Stand Pertubation Testing\S0\Processed\unperturbed\ik\3.mot
  marker_file: S0/Processed/unperturbed/3.trc
  IKTaskSet:
    IKMarkerTask Clavical: apply=true weight=1
    IKMarkerTask R_Acromium: apply=true weight=1
    IKMarkerTask L_Acromium: apply=true weight=1
    IKMarkerTask Sternum: apply=true weight=1
    IKMarkerTask Torso: apply=true weight=1
    IKMarkerTask R_Pelvis: apply=true weight=1
    IKMarkerTask R_ASIS: apply=true weight=1
    IKMarkerTask V_Sacral: apply=true weight=1
    IKMarkerTask L_Pelvis: apply=true weight=1
    IKMarkerTask L_ASIS: apply=true weight=1
    IKMarkerTask R_Thigh: apply=true weight=1
    IKMarkerTask R_Thigh_Lat: apply=true weight=1
    IKMarkerTask R_Thigh_Med: apply=true weight=1
    IKMarkerTask R_Shank: apply=true weight=1
    IKMarkerTask R_Shank_Lat: apply=true weight=1
    IKMarkerTask R_Shank_Med: apply=true weight=1
    IKMarkerTask R_Toe: apply=true weight=1
    IKMarkerTask R_Heel: apply=true weight=1
    IKMarkerTask RHJC: apply=false weight=1
    IKMarkerTask RKJC: apply=false weight=1
    IKMarkerTask RAJC: apply=false weight=1
