# OpenSim document version 40000
Model model_scaled:
  SmoothSphereHalfSpaceForce chair_r: socket_sphere=/contactgeometryset/butt_r
      socket_half_space=/contactgeometryset/chair stiffness=3067776 [N/m^2] dissipation=2 [s/m] static_friction=0.8
      dynamic_friction=0.8 viscous_friction=0.5 transition_velocity=0.2 [m/s] hertz_smoothing=300
      hunt_crossley_smoothing=50
  SmoothSphereHalfSpaceForce chair_l: socket_sphere=/contactgeometryset/butt_l
      socket_half_space=/contactgeometryset/chair stiffness=3067776 dissipation=2 static_friction=0.8
      dynamic_friction=0.8 viscous_friction=0.5 transition_velocity=0.2 hertz_smoothing=300 hunt_crossley_smoothing=50
  ActivationCoordinateActuator lumbarAct: min_control=-1 max_control=1 coordinate=lumbar optimal_force=200
      activation_time_constant=0.01
  ActivationCoordinateActuator r_hip_act: min_control=-1 max_control=1 coordinate=hip_flexion_r optimal_force=200
      activation_time_constant=0.01
  ActivationCoordinateActuator r_knee_act: min_control=-1 max_control=1 coordinate=knee_angle_r optimal_force=200
      activation_time_constant=0.01
  ActivationCoordinateActuator r_ankle_act: min_control=-1 max_control=1 coordinate=ankle_angle_r optimal_force=200
      activation_time_constant=0.01
  Ground
  BodySet:
    Body pelvis: mass=7.56777 [kg] mass_center=(-0.07104835 0 0) inertia=(0.08190913 0.08190913 0.03757344 0 0 0)
        meshes=(r_pelvis.vtp l_pelvis.vtp sacrum.vtp)
    Body femur_r: mass=11.95395 mass_center=(0 -0.1683449 0) inertia=(0.1687502 0.04423548 0.1779501 0 0 0)
        meshes=femur_r.vtp
    Body tibia_r: mass=4.764797 mass_center=(0 -0.1748109 0) inertia=(0.05678602 0.005746204 0.05757472 0 0 0)
        meshes=(tibia_r.vtp r_fibula.vtp)
    Body talus_r: mass=0.1285178 mass_center=(0 0 0) inertia=(0.001373296 0.001373296 0.001373296 0 0 0)
        meshes=r_talus.vtp
    Body calcn_r: mass=1.606472 mass_center=(0.1033714 0.03101139 0)
        inertia=(0.001922615 0.005355855 0.005630514 0 0 0) meshes=r_foot.vtp
    Body toes_r: mass=0.2783695 mass_center=(0.03576653 0.006202289 -0.01809002)
        inertia=(0.0001373296 0.0002746592 0.0001373296 0 0 0) meshes=r_bofoot.vtp
    Body torso: mass=44.00012 mass_center=(-0.02700498 0.2880534 0) inertia=(1.543763 0.8032635 1.543763 0 0 0)
        meshes=(hat_spine.vtp hat_jaw.vtp hat_skull.vtp hat_ribs.vtp)
    Body chair: mass=0 mass_center=(0 0 0) inertia=(0 0 0 0 0 0)
  JointSet:
    WeldJoint ground_foot: socket_parent_frame=ground_offset socket_child_frame=foot_offset
      PhysicalOffsetFrame ground_offset: socket_parent=/ground translation=(0 0 0) [meters]
      PhysicalOffsetFrame foot_offset: socket_parent=/bodyset/calcn_r translation=(0 0 0)
    PinJoint hip_r: socket_parent_frame=pelvis_offset socket_child_frame=femur_r_offset
      Coordinate hip_flexion_r: default_value=1.12469 range=(-1.047198 2.094395)
      PhysicalOffsetFrame pelvis_offset: socket_parent=/bodyset/pelvis translation=(-0.07104835 -0.06642569 0.09630224)
      PhysicalOffsetFrame femur_r_offset: socket_parent=/bodyset/femur_r translation=(0 0 0)
    PinJoint knee_r: socket_parent_frame=femur_r_offset socket_child_frame=tibia_r_offset
      Coordinate knee_angle_r: default_value=-1.298787 range=(-2.094395 0.1745329)
      PhysicalOffsetFrame femur_r_offset: socket_parent=/bodyset/femur_r translation=(-0.004456041 -0.3919663 0)
      PhysicalOffsetFrame tibia_r_offset: socket_parent=/bodyset/tibia_r translation=(0 0 0)
    PinJoint ankle_r: socket_parent_frame=tibia_r_offset socket_child_frame=talus_r_offset
      Coordinate ankle_angle_r: default_value=0.05127777 range=(-0.6981317 0.5235988)
      PhysicalOffsetFrame tibia_r_offset: socket_parent=/bodyset/tibia_r translation=(0 -0.4026172 0)
      PhysicalOffsetFrame talus_r_offset: socket_parent=/bodyset/talus_r translation=(0 0 0)
    WeldJoint subtalar_r: socket_parent_frame=talus_r_offset socket_child_frame=calcn_r_offset
      PhysicalOffsetFrame talus_r_offset: socket_parent=/bodyset/talus_r
          translation=(-0.05041424 -0.04336431 0.008187016)
      PhysicalOffsetFrame calcn_r_offset: socket_parent=/bodyset/calcn_r translation=(0 0 0)
    WeldJoint mtp_r: socket_parent_frame=calcn_r_offset socket_child_frame=toes_r_offset
      PhysicalOffsetFrame calcn_r_offset: socket_parent=/bodyset/calcn_r
          translation=(0.1848281 -0.002067428 0.001116411)
      PhysicalOffsetFrame toes_r_offset: socket_parent=/bodyset/toes_r translation=(0 0 0)
    PinJoint lumbar: socket_parent_frame=pelvis_offset socket_child_frame=torso_offset
      Coordinate lumbar: default_value=-0.2588498 range=(-1.570796 1.570796)
      PhysicalOffsetFrame pelvis_offset: socket_parent=/bodyset/pelvis translation=(-0.1011962 0.08190156 0)
      PhysicalOffsetFrame torso_offset: socket_parent=/bodyset/torso translation=(0 0 0)
    WeldJoint ground_chair: socket_parent_frame=ground_offset socket_child_frame=chair_offset
      PhysicalOffsetFrame ground_offset: socket_parent=/ground translation=(0 0.445 0)
      PhysicalOffsetFrame chair_offset: socket_parent=/bodyset/chair translation=(0 0 0)
  MarkerSet:
    Marker Clavical: torso (0.04465998 0.3284936 0.001955185) fixed=true
    Marker R_Acromium: torso (-0.01842519 0.3729652 0.1063839)
    Marker L_Acromium: torso (-0.01842483 0.3729651 -0.1063843)
    Marker Sternum: torso (0.09595613 0.2095957 0.0003315883)
    Marker Torso: torso (0.05791119 0.3127982 -0.05597645)
    Marker R_Pelvis: pelvis (-0.0687846 0.004395359 0.1830103)
    Marker R_ASIS: pelvis (0.01747556 0.004395358 0.1419525) fixed=true
    Marker V_Sacral: pelvis (-0.2111793 0.00276823 0.0007619182) fixed=true
    Marker L_Pelvis: pelvis (-0.06878457 0.004395358 -0.1830101)
    Marker L_ASIS: pelvis (0.01747556 0.004395358 -0.1419525) fixed=true
    Marker R_Thigh: femur_r (0.09169814 -0.267615 0.01074714)
    Marker R_Thigh_Lat: femur_r (0.0004289546 -0.4047904 0.0520535) fixed=true
    Marker R_Thigh_Med: femur_r (0.005885539 -0.3974652 -0.05319903) fixed=true
    Marker R_Shank: tibia_r (0.00183665 -0.2197133 0.0561176)
    Marker R_Shank_Lat: tibia_r (0.001577066 -0.3875021 0.05710227) fixed=true
    Marker R_Shank_Med: tibia_r (-0.002000855 -0.3768138 -0.03399565) fixed=true
    Marker R_Toe: calcn_r (0.1887138 0.02487633 -0.03028889) fixed=true
    Marker R_Heel: calcn_r (-0.02754252 0.01280655 -0.005686786) fixed=true
    Marker RHJC: femur_r (0.003715336 -0.003991218 0.003281811) fixed=true
    Marker RKJC: tibia_r (0.01424148 -0.01168102 0.0001228662) fixed=true
    Marker RAJC: calcn_r (0.05189523 0.06959511 0.001946755) fixed=true
  ContactGeometrySet:
    ContactSphere heel_r: socket_frame=/bodyset/calcn_r location=(0.03130753 0.01043584 0) radius=0.035
    ContactSphere front_r: socket_frame=/bodyset/calcn_r location=(0.1774093 -0.01565376 0.005217921) radius=0.015
    ContactHalfSpace floor: socket_frame=/ground orientation=(0 0 -1.570796)
    ContactHalfSpace chair: socket_frame=/bodyset/chair orientation=(0 0 -1.570796)
    ContactSphere butt_r: socket_frame=/bodyset/pelvis location=(-0.125 -0.16 0.05) radius=0.035
    ContactSphere butt_l: socket_frame=/bodyset/pelvis location=(-0.125 -0.16 -0.05) radius=0.035
