# OpenSim document version 40000
ScaleTool model_scaled:
  mass: 92.5 [kg]
  height: 1803.4
  age: 99
  notes: This is an example setup file for scale.exe.
  ModelScaler:
    apply: true
    scaling_order: measurements manualScale
    marker_file: ../s2/static.trc
    time_range: 0 2.05
    preserve_mass_distribution: true
    output_model_file: C:\Users\danie\Documents\GitHub\opensim-matlab\Defaults\Scale\model_scaledOnly.osim
    MeasurementSet gait2354:
      Measurement torso: apply=true
        MarkerPair: markers=(Clavical V_Sacral)
        BodyScale torso: axes=(X Y Z)
      Measurement pelvis_z: apply=true
        MarkerPair: markers=(R_ASIS L_ASIS)
        BodyScale pelvis: axes=Z
      Measurement thigh: apply=true
        MarkerPair: markers=(RHJC RKJC)
        BodyScale femur_r: axes=(X Y Z)
      Measurement shank: apply=true
        MarkerPair: markers=(RKJC RAJC)
        BodyScale tibia_r: axes=(X Y Z)
      Measurement foot: apply=true
        MarkerPair: markers=(R_Heel R_Toe)
        BodyScale talus_r: axes=(X Y Z)
        BodyScale calcn_r: axes=(X Y Z)
        BodyScale toes_r: axes=(X Y Z)
      Measurement pelvis_x: apply=true
        MarkerPair: markers=(R_ASIS V_Sacral)
        BodyScale pelvis: axes=(X Y)
    ScaleSet gait2354_Scale:
      Scale: scales=(1.14724 1.14724 1.14724) segment=femur_r apply=false
      Scale: scales=(0.988523 0.988523 0.988523) segment=tibia_r apply=false
  MarkerPlacer:
    apply: false
    marker_file: /Users/daniel/Documents/GitHub/ergonomics/Scripts/19_AutomatedIOC/settings/S0/Processed/2D_Symmetric_STS Cal 01.trc
    time_range: 17.27 17.62
    output_model_file: C:\Users\danie\Documents\GitHub\opensim-matlab\Defaults\Scale\model_scaled_simbody.osim
    max_marker_movement: -1
    IKTaskSet gait2354_Scale:
      IKMarkerTask Clavical: apply=true weight=1
      IKMarkerTask R_Acromium: apply=false weight=1000
      IKMarkerTask L_Acromium: apply=false weight=1000
      IKMarkerTask R_ASIS: apply=true weight=1
      IKMarkerTask V_Sacral: apply=true weight=1
      IKMarkerTask L_ASIS: apply=true weight=1
      IKMarkerTask R_Thigh_Lat: apply=true weight=1
      IKMarkerTask R_Thigh_Med: apply=true weight=1
      IKMarkerTask R_Shank_Lat: apply=true weight=1
      IKMarkerTask R_Shank_Med: apply=true weight=1
      IKMarkerTask R_Toe: apply=true weight=1
      IKMarkerTask R_Heel: apply=true weight=1
      IKMarkerTask RHJC: apply=false weight=1000
      IKMarkerTask RKJC: apply=false weight=1000
      IKMarkerTask RAJC: apply=false weight=1000
      IKCoordinateTask hip_flexion_r: apply=false weight=1 value_type=default_value value=0
      IKCoordinateTask knee_angle_r: apply=false weight=1 value_type=default_value value=0
      IKCoordinateTask ankle_angle_r: apply=false weight=1 value_type=manual_value value=0
      IKCoordinateTask lumbar: apply=false weight=1 value_type=default_value value=0
