# OpenSim document version 40000
Model 2D_gait-scaled:
  SmoothSphereHalfSpaceForce chair_r: socket_sphere=/contactgeometryset/butt_r
      socket_half_space=/contactgeometryset/chair stiffness=3067776 [N/m^2] dissipation=2 [s/m] static_friction=0.8
      dynamic_friction=0.8 viscous_friction=0.5 transition_velocity=0.2 [m/s] hertz_smoothing=300
      hunt_crossley_smoothing=50
  SmoothSphereHalfSpaceForce chair_l: socket_sphere=/contactgeometryset/butt_l
      socket_half_space=/contactgeometryset/chair stiffness=3067776 dissipation=2 static_friction=0.8
      dynamic_friction=0.8 viscous_friction=0.5 transition_velocity=0.2 hertz_smoothing=300 hunt_crossley_smoothing=50
  ActivationCoordinateActuator [values shared by the 12 below unless stated]: min_control=-1 max_control=1
      activation_time_constant=0.01 optimal_force=200
  ActivationCoordinateActuator lumbarAct: coordinate=lumbar optimal_force=20
  ActivationCoordinateActuator r_hip_act: coordinate=hip_flexion_r optimal_force=20
  ActivationCoordinateActuator r_knee_act: coordinate=knee_angle_r optimal_force=20
  ActivationCoordinateActuator r_ankle_act: coordinate=ankle_angle_r
  ActivationCoordinateActuator lumbar_hAct: coordinate=lumbar_h
  ActivationCoordinateActuator r_hip_h_act: coordinate=hip_flexion_r_h
  ActivationCoordinateActuator r_knee_h_act: coordinate=knee_angle_r_h
  ActivationCoordinateActuator r_ankle_h_act: coordinate=ankle_angle_r_h
  ActivationCoordinateActuator r_shoulder_act: coordinate=arm_flex_r
  ActivationCoordinateActuator r_elbow_act: coordinate=elbow_flex_r
  ActivationCoordinateActuator l_h_shoulder_act: coordinate=arm_flex_l_h
  ActivationCoordinateActuator l_h_elbow_act: coordinate=elbow_flex_l_h
  Ground
  BodySet:
    Body pelvis: mass=9.714334 [kg] mass_center=(-0.0682778 0 0) inertia=(0.08149288 0.08149288 0.04454276 0 0 0)
        meshes=(r_pelvis.vtp l_pelvis.vtp sacrum.vtp)
    Body femur_r: mass=15.34464 mass_center=(0 -0.170467 0) inertia=(0.2221109 0.05822326 0.2342201 0 0 0)
        meshes=femur_r.vtp
    Body tibia_r: mass=6.11631 mass_center=(0 -0.180489 0) inertia=(0.0777054 0.007863046 0.07878464 0 0 0)
        meshes=(tibia_r.vtp r_fibula.vtp)
    Body talus_r: mass=0.1649713 mass_center=(0 0 0) inertia=(0.001377935 0.001377935 0.001377935 0 0 0)
        meshes=r_talus.vtp
    Body calcn_r: mass=2.062141 mass_center=(0.0913924 0.0274177 0) inertia=(0.00192911 0.005373948 0.005649535 0 0 0)
        meshes=r_foot.vtp
    Body toes_r: mass=0.3573278 mass_center=(0.0316218 0.00548355 -0.0159937)
        inertia=(0.0001377935 0.0002755871 0.0001377935 0 0 0) meshes=r_bofoot.vtp
    Body torso: mass=28.2658 mass_center=(-0.03 0.336366 0) inertia=(1.77913 1.00463 1.77913 0 0 0)
        meshes=(hat_spine.vtp hat_jaw.vtp hat_skull.vtp hat_ribs_scap.vtp)
    Body humerus_r: mass=2.14154 mass_center=(0 -0.164502 0) inertia=(0.0125869 0.00434208 0.0141284 0 0 0)
        meshes=humerus_rv.vtp
    Body ulna_r: mass=0.6400913 mass_center=(0 -0.120525 0) inertia=(0.00312091 0.000651155 0.00338537 0 0 0)
        meshes=ulna_rv.vtp
    Body radius_r: mass=0.6400913 mass_center=(0 -0.120525 0) inertia=(0.00312091 0.000651155 0.00338537 0 0 0)
        meshes=radius_rv.vtp
    Body hand_r: mass=0.4820441 mass_center=(0 -0.068095 0) inertia=(0.000939854 0.000576346 0.00141189 0 0 0)
        meshes=(pisiform_rvs.vtp lunate_rvs.vtp scaphoid_rvs.vtp triquetrum_rvs.vtp hamate_rvs.vtp capitate_rvs.vtp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)
    Body pelvis_h: mass=9.714334 mass_center=(-0.0682778 0 0) inertia=(0.08149288 0.08149288 0.04454276 0 0 0)
        meshes=(r_pelvis.vtp l_pelvis.vtp sacrum.vtp)
    Body femur_r_h: mass=15.34464 mass_center=(0 -0.170467 0) inertia=(0.2221109 0.05822326 0.2342201 0 0 0)
        meshes=femur_r.vtp
    Body tibia_r_h: mass=6.11631 mass_center=(0 -0.180489 0) inertia=(0.0777054 0.007863046 0.07878464 0 0 0)
        meshes=(tibia_r.vtp r_fibula.vtp)
    Body talus_r_h: mass=0.1649713 mass_center=(0 0 0) inertia=(0.001377935 0.001377935 0.001377935 0 0 0)
        meshes=r_talus.vtp
    Body calcn_r_h: mass=2.062141 mass_center=(0.0913924 0.0274177 0)
        inertia=(0.00192911 0.005373948 0.005649535 0 0 0) meshes=r_foot.vtp
    Body toes_r_h: mass=0.3573278 mass_center=(0.0316218 0.00548355 -0.0159937)
        inertia=(0.0001377935 0.0002755871 0.0001377935 0 0 0) meshes=r_bofoot.vtp
    Body torso_h: mass=28.2658 mass_center=(-0.03 0.336366 0) inertia=(1.77913 1.00463 1.77913 0 0 0)
        meshes=(hat_spine.vtp hat_jaw.vtp hat_skull.vtp hat_ribs_scap.vtp)
    Body humerus_l_h: mass=2.14154 mass_center=(0 -0.164502 0) inertia=(0.0125869 0.00434208 0.0141284 0 0 0)
        meshes=humerus_lv.vtp
    Body ulna_l_h: mass=0.6400913 mass_center=(0 -0.120525 0) inertia=(0.00312091 0.000651155 0.00338537 0 0 0)
        meshes=ulna_lv.vtp
    Body radius_l_h: mass=0.6400913 mass_center=(0 -0.120525 0) inertia=(0.00312091 0.000651155 0.00338537 0 0 0)
        meshes=radius_lv.vtp
    Body hand_l_h: mass=0.4820441 mass_center=(0 -0.068095 0) inertia=(0.000939854 0.000576346 0.00141189 0 0 0)
        meshes=(pisiform_lvs.vtp lunate_lvs.vtp scaphoid_lvs.vtp triquetrum_lvs.vtp hamate_lvs.vtp capitate_lvs.vtp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)
    Body chair: mass=0 mass_center=(0 0 0) inertia=(0 0 0 0 0 0)
    Body APO_backpack: mass=1.8442 mass_center=(-0.2233 -0.0001427 0.01862)
        inertia=(0.00965565 0.108189 0.115273 5.97356e-7 -0.00187078 1.11075e-5) meshes=backpack_2.STL
    Body APO_group_r: mass=2.628306 mass_center=(-0.04727 0.08198 -0.1371)
        inertia=(0.0387538 0.0335761 0.0161102 0.00398296 -0.0064406 0.0163726) meshes=group_dx.stl
    Body APO_r_link: mass=2.482359 mass_center=(-0.026978 0.1463 0.02941)
        inertia=(0.00365323 0.000580301 0.00352869 0.000711317 0.000207632 -0.000763969) meshes=link_dx.STL
  JointSet:
    WeldJoint groundFoot: socket_parent_frame=ground_offset socket_child_frame=foot_offset
      PhysicalOffsetFrame ground_offset: socket_parent=/ground translation=(0 0 0) [meters]
      PhysicalOffsetFrame foot_offset: socket_parent=/bodyset/calcn_r translation=(0 0 0)
    WeldJoint groundFoot_h: socket_parent_frame=ground_offset_h socket_child_frame=foot_offset_h
      PhysicalOffsetFrame ground_offset_h: socket_parent=/ground translation=(0.75 0 -0.19)
          orientation=(0 3.14159 0) [radians]
      PhysicalOffsetFrame foot_offset_h: socket_parent=/bodyset/calcn_r_h translation=(0 0 0)
    PinJoint hip_r: socket_parent_frame=pelvis_offset socket_child_frame=femur_r_offset
      Coordinate hip_flexion_r: default_value=0.9715899 range=(-1.047198 2.094395)
      PhysicalOffsetFrame pelvis_offset: socket_parent=/bodyset/pelvis translation=(-0.0682778 -0.0638354 0.08233069)
      PhysicalOffsetFrame femur_r_offset: socket_parent=/bodyset/femur_r translation=(0 0 0)
    PinJoint knee_r: socket_parent_frame=femur_r_offset socket_child_frame=tibia_r_offset
      Coordinate knee_angle_r: default_value=-1.251488 range=(-2.094395 0.1745329)
      PhysicalOffsetFrame femur_r_offset: socket_parent=/bodyset/femur_r translation=(-0.004512212 -0.3969072 0)
      PhysicalOffsetFrame tibia_r_offset: socket_parent=/bodyset/tibia_r translation=(0 0 0)
    PinJoint ankle_r: socket_parent_frame=tibia_r_offset socket_child_frame=talus_r_offset
      Coordinate ankle_angle_r: default_value=0.07882081 range=(-0.6981317 0.5235988)
      PhysicalOffsetFrame tibia_r_offset: socket_parent=/bodyset/tibia_r translation=(0 -0.4156948 0)
      PhysicalOffsetFrame talus_r_offset: socket_parent=/bodyset/talus_r translation=(0 0 0)
    WeldJoint subtalar_r: socket_parent_frame=talus_r_offset socket_child_frame=calcn_r_offset
      PhysicalOffsetFrame talus_r_offset: socket_parent=/bodyset/talus_r
          translation=(-0.04457209 -0.03833913 0.007238281)
      PhysicalOffsetFrame calcn_r_offset: socket_parent=/bodyset/calcn_r translation=(0 0 0)
    WeldJoint mtp_r: socket_parent_frame=calcn_r_offset socket_child_frame=toes_r_offset
      PhysicalOffsetFrame calcn_r_offset: socket_parent=/bodyset/calcn_r
          translation=(0.1634097 -0.001827849 0.0009870383)
      PhysicalOffsetFrame toes_r_offset: socket_parent=/bodyset/toes_r translation=(0 0 0)
    PinJoint lumbar: socket_parent_frame=pelvis_offset socket_child_frame=torso_offset
      Coordinate lumbar: default_value=-0.3963119 range=(-1.570796 1.570796)
      PhysicalOffsetFrame pelvis_offset: socket_parent=/bodyset/pelvis translation=(-0.09724999 0.07870779 0)
      PhysicalOffsetFrame torso_offset: socket_parent=/bodyset/torso translation=(0 0 0)
    PinJoint hip_r_h: socket_parent_frame=pelvis_offset_h socket_child_frame=femur_r_offset_h
      Coordinate hip_flexion_r_h: default_value=0 range=(-1.047198 2.094395)
      PhysicalOffsetFrame pelvis_offset_h: socket_parent=/bodyset/pelvis_h
          translation=(-0.0682778 -0.0638354 0.08233069)
      PhysicalOffsetFrame femur_r_offset_h: socket_parent=/bodyset/femur_r_h translation=(0 0 0)
    PinJoint knee_r_h: socket_parent_frame=femur_r_offset_h socket_child_frame=tibia_r_offset_h
      Coordinate knee_angle_r_h: default_value=0 range=(-2.094395 0.1745329)
      PhysicalOffsetFrame femur_r_offset_h: socket_parent=/bodyset/femur_r_h translation=(-0.004512212 -0.3969072 0)
      PhysicalOffsetFrame tibia_r_offset_h: socket_parent=/bodyset/tibia_r_h translation=(0 0 0)
    PinJoint ankle_r_h: socket_parent_frame=tibia_r_offset_h socket_child_frame=talus_r_offset_h
      Coordinate ankle_angle_r_h: default_value=0 range=(-0.6981317 0.5235988)
      PhysicalOffsetFrame tibia_r_offset_h: socket_parent=/bodyset/tibia_r_h translation=(0 -0.4156948 0)
      PhysicalOffsetFrame talus_r_offset_h: socket_parent=/bodyset/talus_r_h translation=(0 0 0)
    WeldJoint subtalar_r_h: socket_parent_frame=talus_r_offset_h socket_child_frame=calcn_r_offset_h
      PhysicalOffsetFrame talus_r_offset_h: socket_parent=/bodyset/talus_r_h
          translation=(-0.04457209 -0.03833913 0.007238281)
      PhysicalOffsetFrame calcn_r_offset_h: socket_parent=/bodyset/calcn_r_h translation=(0 0 0)
    WeldJoint mtp_r_h: socket_parent_frame=calcn_r_offset_h socket_child_frame=toes_r_offset_h
      PhysicalOffsetFrame calcn_r_offset_h: socket_parent=/bodyset/calcn_r_h
          translation=(0.1634097 -0.001827849 0.0009870383)
      PhysicalOffsetFrame toes_r_offset_h: socket_parent=/bodyset/toes_r_h translation=(0 0 0)
    PinJoint lumbar_h: socket_parent_frame=pelvis_offset_h socket_child_frame=torso_offset_h
      Coordinate lumbar_h: default_value=0 range=(-1.570796 1.570796)
      PhysicalOffsetFrame pelvis_offset_h: socket_parent=/bodyset/pelvis_h translation=(-0.09724999 0.07870779 0)
      PhysicalOffsetFrame torso_offset_h: socket_parent=/bodyset/torso_h translation=(0 0 0)
    WeldJoint ground_chair: socket_parent_frame=ground_offset socket_child_frame=chair_offset
      PhysicalOffsetFrame ground_offset: socket_parent=/ground translation=(0 0.537 0)
      PhysicalOffsetFrame chair_offset: socket_parent=/bodyset/chair translation=(0 0 0)
    PinJoint acromial_r: socket_parent_frame=torso_offset socket_child_frame=humerus_r_offset
      Coordinate arm_flex_r: default_value=1.047198 range=(-1.570796 1.570796) clamped=true
      PhysicalOffsetFrame torso_offset: socket_parent=/bodyset/torso translation=(0.003155 0.3905 0.214548)
      PhysicalOffsetFrame humerus_r_offset: socket_parent=/bodyset/humerus_r translation=(0 0 0)
    PinJoint elbow_r: socket_parent_frame=humerus_r_offset socket_child_frame=ulna_r_offset
      Coordinate elbow_flex_r: default_value=0.7853982 range=(0 2.618) clamped=true
      PhysicalOffsetFrame humerus_r_offset: socket_parent=/bodyset/humerus_r translation=(0.013144 -0.286273 -0.009595)
          orientation=(-0.0228627 0.228018 0.0051689)
      PhysicalOffsetFrame ulna_r_offset: socket_parent=/bodyset/ulna_r translation=(0 0 0)
          orientation=(-0.0228627 0.228018 0.0051689)
    WeldJoint radioulnar_r: socket_parent_frame=ulna_r_offset socket_child_frame=radius_r_offset
      PhysicalOffsetFrame ulna_r_offset: socket_parent=/bodyset/ulna_r translation=(-0.006727 -0.013007 0.026083)
          orientation=(-1.56884 0.056428 1.53614)
      PhysicalOffsetFrame radius_r_offset: socket_parent=/bodyset/radius_r translation=(0 0 0)
          orientation=(-1.56884 0.056428 1.53614)
    WeldJoint radius_hand_r: socket_parent_frame=radius_r_offset socket_child_frame=hand_r_offset
      PhysicalOffsetFrame radius_r_offset: socket_parent=/bodyset/radius_r translation=(-0.008797 -0.235841 0.01361)
          orientation=(-1.5708 0 -1.5708)
      PhysicalOffsetFrame hand_r_offset: socket_parent=/bodyset/hand_r translation=(0 0 0)
          orientation=(-1.5708 0 -1.5708)
    PinJoint acromial_l_h: socket_parent_frame=torso_offset socket_child_frame=humerus_l_offset
      Coordinate arm_flex_l_h: default_value=0.5235988 range=(-1.570796 1.570796) clamped=true
      PhysicalOffsetFrame torso_offset: socket_parent=/bodyset/torso_h translation=(0.003155 0.3905 -0.214548)
      PhysicalOffsetFrame humerus_l_offset: socket_parent=/bodyset/humerus_l_h translation=(0 0 0)
    PinJoint elbow_l_h: socket_parent_frame=humerus_l_offset socket_child_frame=ulna_l_offset
      Coordinate elbow_flex_l_h: default_value=0.3490659 range=(0 2.618) clamped=true
      PhysicalOffsetFrame humerus_l_offset: socket_parent=/bodyset/humerus_l_h
          translation=(0.013144 -0.286273 0.009595) orientation=(0.0228627 -0.228018 0.0051689)
      PhysicalOffsetFrame ulna_l_offset: socket_parent=/bodyset/ulna_l_h translation=(0 0 0)
          orientation=(0.0228627 -0.228018 0.0051689)
    WeldJoint radioulnar_l_h: socket_parent_frame=ulna_l_offset socket_child_frame=radius_l_offset
      PhysicalOffsetFrame ulna_l_offset: socket_parent=/bodyset/ulna_l_h translation=(-0.006727 -0.013007 -0.026083)
          orientation=(1.56884 -0.056428 1.53614)
      PhysicalOffsetFrame radius_l_offset: socket_parent=/bodyset/radius_l_h translation=(0 0 0)
          orientation=(1.56884 -0.056428 1.53614)
    WeldJoint radius_hand_l_h: socket_parent_frame=radius_l_offset socket_child_frame=hand_l_offset
      PhysicalOffsetFrame radius_l_offset: socket_parent=/bodyset/radius_l_h translation=(-0.008797 -0.235841 -0.01361)
          orientation=(1.5708 0 1.5708)
      PhysicalOffsetFrame hand_l_offset: socket_parent=/bodyset/hand_l_h translation=(0 0 0)
          orientation=(1.5708 0 1.5708)
    WeldJoint APO_backpack_torso: socket_parent_frame=torso_offset socket_child_frame=APO_backpack_offset
      PhysicalOffsetFrame torso_offset: socket_parent=/bodyset/torso translation=(-0.11 -0.1 0)
          orientation=(1.57 1.67 3.14)
      PhysicalOffsetFrame APO_backpack_offset: socket_parent=/bodyset/APO_backpack translation=(0 0 0)
    WeldJoint APO_r: socket_parent_frame=APO_backpack_offset socket_child_frame=APO_group_r_offset
      PhysicalOffsetFrame APO_backpack_offset: socket_parent=/bodyset/APO_backpack translation=(0 -0.1 0.16)
          orientation=(0 0 1.57)
      PhysicalOffsetFrame APO_group_r_offset: socket_parent=/bodyset/APO_group_r translation=(0 0 0)
    WeldJoint APO_lower_r: socket_parent_frame=femur_r_offset socket_child_frame=APO_r_link_offset
      PhysicalOffsetFrame femur_r_offset: socket_parent=/bodyset/femur_r translation=(0.025 0.05 0.13)
          orientation=(0 3.141 3.141)
      PhysicalOffsetFrame APO_r_link_offset: socket_parent=/bodyset/APO_r_link translation=(0 0 0)
  ConstraintSet:
    PointConstraint hand_link: socket_body_1=/bodyset/hand_r socket_body_2=/bodyset/hand_l_h
        location_body_1=(-0.00267472 -0.0600522 0.0102656) location_body_2=(-0.00133296 -0.106687 -0.0100205)
  ForceSet:
    PrescribedForce: socket_frame=/bodyset/APO_group_r forceIsGlobal=true
      FunctionSet torqueFunctions: Constant(value=0) Constant(value=0)
        PiecewiseConstantFunction: x=(0 0.015 0.03 0.045 0.06 0.075 0.09 0.105 0.12 0.135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)
            y=(132.6 132.614 132.654 132.722 132.817 132.938 133.085 133.257 133.453 133.674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)
    PrescribedForce: socket_frame=/bodyset/APO_r_link forceIsGlobal=true
      FunctionSet torqueFunctions: Constant(value=0) Constant(value=0)
        PiecewiseConstantFunction: x=(0 0.015 0.03 0.045 0.06 0.075 0.09 0.105 0.12 0.135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)
            y=(-132.6 -132.614 -132.654 -132.722 -132.817 -132.938 -133.085 -133.257 -133.453 -133.674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)
  MarkerSet:
    Marker Clavical: torso (0.0479133 0.3524232 0.002097613) fixed=true
    Marker R_Acromium: torso (-0.0197674 0.4001344 0.1141335)
    Marker L_Acromium: torso (-0.01976701 0.4001342 -0.114134)
    Marker Sternum: torso (0.1029462 0.224864 0.0003557433)
    Marker Torso: torso (0.06212981 0.3355844 -0.06005413)
    Marker R_Pelvis: pelvis (-0.06610233 0.004223961 0.1564591)
    Marker R_ASIS: pelvis (0.0167941 0.00422396 0.121358) fixed=true
    Marker V_Sacral: pelvis (-0.2029443 0.002660282 0.000651379) fixed=true
    Marker L_Pelvis: pelvis (-0.0661023 0.00422396 -0.156459)
    Marker L_ASIS: pelvis (0.0167941 0.00422396 -0.121358) fixed=true
    Marker R_Thigh: femur_r (0.09285405 -0.2709885 0.01088261)
    Marker R_Thigh_Lat: femur_r (0.0004343618 -0.409893 0.05270966) fixed=true
    Marker R_Thigh_Med: femur_r (0.00595973 -0.4024754 -0.05386964) fixed=true
    Marker R_Shank: tibia_r (0.001896307 -0.22685 0.05794039)
    Marker R_Shank_Lat: tibia_r (0.001628292 -0.4000888 0.05895705) fixed=true
    Marker R_Shank_Med: tibia_r (-0.002065846 -0.3890534 -0.03509988) fixed=true
    Marker R_Toe: calcn_r (0.1668451 0.02199359 -0.02677893) fixed=true
    Marker R_Heel: calcn_r (-0.02435081 0.01132249 -0.005027785) fixed=true
    Marker RHJC: femur_r (0.003762169 -0.00404153 0.003323181) fixed=true
    Marker RKJC: tibia_r (0.01470407 -0.01206044 0.0001268571) fixed=true
    Marker RAJC: calcn_r (0.04588146 0.06153023 0.001721159) fixed=true
  ContactGeometrySet:
    ContactSphere heel_r: socket_frame=/bodyset/calcn_r location=(0.03130753 0.01043584 0) radius=0.035
    ContactSphere front_r: socket_frame=/bodyset/calcn_r location=(0.1774093 -0.01565376 0.005217921) radius=0.015
    ContactHalfSpace floor: socket_frame=/ground orientation=(0 0 -1.570796)
    ContactHalfSpace chair: socket_frame=/bodyset/chair orientation=(0 0 -1.570796)
    ContactSphere butt_r: socket_frame=/bodyset/pelvis location=(-0.125 -0.1 0.05) radius=0.035
    ContactSphere butt_l: socket_frame=/bodyset/pelvis location=(-0.125 -0.1 -0.05) radius=0.035
