# OpenSim document version 20302
ForceSet gait2392_CMC:
  PointActuator [values shared by the 6 below unless stated]: point=(0.1014705 0.03044116 0) point_is_global=false
      force_is_global=true
  PointActuator FXR: body=calcn_r direction=(1 0 0) optimal_force=10
  PointActuator FYR: body=calcn_r direction=(0 1 0) optimal_force=20
  PointActuator FZR: body=calcn_r direction=(0 0 1) optimal_force=10
  TorqueActuator [values shared by the 6 below unless stated]: bodyB=ground torque_is_global=true optimal_force=80
  TorqueActuator MXR: bodyA=calcn_r axis=(1 0 0)
  TorqueActuator MYR: bodyA=calcn_r axis=(0 1 0)
  TorqueActuator MZR: bodyA=calcn_r axis=(0 0 1)
  PointActuator FXL: body=calcn_l direction=(1 0 0) optimal_force=10
  PointActuator FYL: body=calcn_l direction=(0 1 0) optimal_force=20
  PointActuator FZL: body=calcn_l direction=(0 0 1) optimal_force=10
  TorqueActuator MXL: bodyA=calcn_l axis=(1 0 0)
  TorqueActuator MYL: bodyA=calcn_l axis=(0 1 0)
  TorqueActuator MZL: bodyA=calcn_l axis=(0 0 1)
  CoordinateActuator hip_flexion_r_reserve: coordinate=hip_flexion_r optimal_force=1
  CoordinateActuator hip_adduction_r_reserve: coordinate=hip_adduction_r optimal_force=1
  CoordinateActuator hip_rotation_r_reserve: coordinate=hip_rotation_r optimal_force=1
  CoordinateActuator knee_angle_r_reserve: coordinate=knee_angle_r optimal_force=1
  CoordinateActuator ankle_angle_r_reserve: coordinate=ankle_angle_r optimal_force=1
  CoordinateActuator subtalar_angle_r_reserve: coordinate=subtalar_angle_r optimal_force=1
  CoordinateActuator hip_flexion_l_reserve: coordinate=hip_flexion_l optimal_force=1
  CoordinateActuator hip_adduction_l_reserve: coordinate=hip_adduction_l optimal_force=1
  CoordinateActuator hip_rotation_l_reserve: coordinate=hip_rotation_l optimal_force=1
  CoordinateActuator knee_angle_l_reserve: coordinate=knee_angle_l optimal_force=1
  CoordinateActuator ankle_angle_l_reserve: coordinate=ankle_angle_l optimal_force=1
  CoordinateActuator subtalar_angle_l_reserve: coordinate=subtalar_angle_l optimal_force=1
  CoordinateActuator lumbar_extension_reserve: coordinate=lumbar_extension optimal_force=1
  CoordinateActuator lumbar_bending_reserve: coordinate=lumbar_bending optimal_force=1
  CoordinateActuator lumbar_rotation_reserve: coordinate=lumbar_rotation optimal_force=1
