# OpenSim document version 20302
rdCMC_TaskSet gait2392_CMC:
  rdCMC_Joint [values shared by the 21 below unless stated]: wrt_body=-1 express_body=-1 active=(true false false)
      kp=(100 1 1) kv=(20 1 1) ka=(1 1 1) r0=(0 0 0) r1=(0 0 0) r2=(0 0 0) limit=0
  rdCMC_Joint pelvis_tz: weight=(0.001 0.001 0.001) coordinate=pelvis_tz
  rdCMC_Joint pelvis_tx: weight=(0.001 0.001 0.001) coordinate=pelvis_tx
  rdCMC_Joint pelvis_ty: weight=(0.001 0.001 0.001) coordinate=pelvis_ty
  rdCMC_Joint pelvis_tilt: weight=(0.001 0.001 0.001) coordinate=pelvis_tilt
  rdCMC_Joint pelvis_list: weight=(0.001 0.001 0.001) coordinate=pelvis_list
  rdCMC_Joint pelvis_rotation: weight=(0.001 0.001 0.001) coordinate=pelvis_rotation
  rdCMC_Joint hip_flexion_r: weight=(1 1 1) coordinate=hip_flexion_r
  rdCMC_Joint hip_adduction_r: weight=(1 1 1) coordinate=hip_adduction_r
  rdCMC_Joint hip_rotation_r: weight=(1 1 1) coordinate=hip_rotation_r
  rdCMC_Joint knee_angle_r: weight=(1 1 1) coordinate=knee_angle_r
  rdCMC_Joint ankle_angle_r: weight=(1 1 1) coordinate=ankle_angle_r
  rdCMC_Joint subtalar_angle_r: weight=(1 1 1) coordinate=subtalar_angle_r
  rdCMC_Joint hip_flexion_l: weight=(1 1 1) coordinate=hip_flexion_l
  rdCMC_Joint hip_adduction_l: weight=(1 1 1) coordinate=hip_adduction_l
  rdCMC_Joint hip_rotation_l: weight=(1 1 1) coordinate=hip_rotation_l
  rdCMC_Joint knee_angle_l: weight=(1 1 1) coordinate=knee_angle_l
  rdCMC_Joint ankle_angle_l: weight=(1 1 1) coordinate=ankle_angle_l
  rdCMC_Joint subtalar_angle_l: weight=(1 1 1) coordinate=subtalar_angle_l
  rdCMC_Joint lumbar_extension: weight=(0.001 0.001 0.001) coordinate=lumbar_extension
  rdCMC_Joint lumbar_bending: weight=(0.001 0.001 0.001) coordinate=lumbar_bending
  rdCMC_Joint lumbar_rotation: weight=(0.001 0.001 0.001) coordinate=lumbar_rotation
