# OpenSim document version 40000
InverseKinematicsTool default:
  results_directory: ./
  model_file: subject01_simbody.osim
  constraint_weight: 20
  accuracy: 1e-5
  marker_file: ../Data/markers.trc
  time_range: 21.04 23.68
  report_errors: true
  output_motion_file: ../OpenSim/IK/gait2392
  IKTaskSet:
    IKMarkerTask R_Acromium: apply=true weight=1
    IKMarkerTask L_Acromium: apply=true weight=1
    IKMarkerTask R_ASIS: apply=false weight=10
    IKMarkerTask L_ASIS: apply=false weight=10
    IKMarkerTask V_Sacral: apply=true weight=10
    IKMarkerTask R_Knee_Lat: apply=true weight=10
    IKMarkerTask L_Knee_Lat: apply=true weight=10
    IKMarkerTask R_Shank_Upper: apply=true weight=1
    IKMarkerTask R_Shank_Front: apply=true weight=1
    IKMarkerTask R_Shank_Rear: apply=true weight=1
    IKMarkerTask L_Shank_Upper: apply=true weight=1
    IKMarkerTask L_Shank_Front: apply=true weight=1
    IKMarkerTask L_Shank_Rear: apply=true weight=1
    IKMarkerTask R_Heel: apply=true weight=10
    IKMarkerTask R_MTP1: apply=true weight=10
    IKMarkerTask R_MTP5: apply=true weight=10
    IKMarkerTask L_Heel: apply=true weight=10
    IKMarkerTask L_MTP1: apply=true weight=10
    IKMarkerTask L_MTP5: apply=true weight=10
    IKMarkerTask R_Pelvis: apply=true weight=10
    IKMarkerTask L_Pelvis: apply=true weight=10
    IKCoordinateTask mtp_angle_r: apply=true weight=1000 value_type=default_value value=0
    IKCoordinateTask mtp_angle_l: apply=true weight=1000 value_type=default_value value=0
