# OpenSim document version 40000
AnalyzeTool model_scaled:
  model_file: ../../../Models/Adjusted/gait2392musc.osim
  replace_force_set: false
  force_set_files: ../../CMC/gait2392/actuators.xml
  results_directory: ../../../OpenSim/SO
  output_precision: 8
  initial_time: 18
  final_time: 21.04
  solve_for_equilibrium_for_auxiliary_states: false
  maximum_number_of_integrator_steps: 20000
  maximum_integrator_step_size: 1
  minimum_integrator_step_size: 1e-8
  integrator_error_tolerance: 1e-5
  external_loads_file: ../../RRA/gait2392/loads.xml
  states_file: ../../../OpenSim/RRA/squat_gait2392/gait2392_states.sto
  lowpass_cutoff_frequency_for_coordinates: -1
  AnalysisSet Analyses:
    StaticOptimization: start_time=18 end_time=21.04 step_interval=1 in_degrees=true use_model_force_set=true
        activation_exponent=2 use_muscle_physiology=true optimizer_convergence_criterion=0.0001
        optimizer_max_iterations=100
