# OpenSim document version 40000
ScaleTool model_scaled:
  mass: 83 [kg]
  height: 1803.4
  age: 99
  notes: This is an example setup file for scale.exe.
  ModelScaler:
    apply: true
    scaling_order: measurements manualScale
    marker_file: D:\Dropbox\Ergonomics Data\10-03-21\Processed Data\Test Cal 01.trc
    time_range: 13.52 14.99
    preserve_mass_distribution: true
    MeasurementSet gait2354:
      Measurement torso: apply=true
        MarkerPair: markers=(R_Acromium V_Sacral)
        BodyScale lumbar5: axes=(X Y Z)
        BodyScale lumbar4: axes=(X Y Z)
        BodyScale lumbar3: axes=(X Y Z)
        BodyScale lumbar2: axes=(X Y Z)
        BodyScale lumbar1: axes=(X Y Z)
        BodyScale torso: axes=(X Y Z)
        BodyScale Abdomen: axes=(X Y Z)
      Measurement pelvis: apply=true
        MarkerPair: markers=(R_ASIS L_ASIS)
        MarkerPair: markers=(R_Pelvis L_Pelvis)
        BodyScale pelvis: axes=(X Y Z)
        BodyScale sacrum: axes=(X Y Z)
      Measurement thigh: apply=true
        MarkerPair: markers=(RHJC RKJC)
        MarkerPair: markers=(LHJC LKJC)
        BodyScale femur_r: axes=(X Y Z)
        BodyScale patella_r: axes=(X Y Z)
        BodyScale femur_l: axes=(X Y Z)
        BodyScale patella_l: axes=(X Y Z)
      Measurement shank: apply=true
        MarkerPair: markers=(RKJC RAJC)
        MarkerPair: markers=(LKJC LAJC)
        BodyScale tibia_r: axes=(X Y Z)
        BodyScale talus_r: axes=(X Y Z)
        BodyScale tibia_l: axes=(X Y Z)
        BodyScale talus_l: axes=(X Y Z)
      Measurement foot: apply=true
        MarkerPair: markers=(R_Heel R_MTP1)
        MarkerPair: markers=(L_Heel L_MTP1)
        BodyScale calcn_r: axes=(X Y Z)
        BodyScale toes_r: axes=(X Y Z)
        BodyScale calcn_l: axes=(X Y Z)
        BodyScale toes_l: axes=(X Y Z)
      Measurement arm: apply=true
        MarkerPair: markers=(R_Acromium R_Elbow)
        MarkerPair: markers=(L_Acromium L_Elbow)
        BodyScale humerus_r: axes=(X Y Z)
        BodyScale humerus_l: axes=(X Y Z)
      Measurement forearm: apply=true
        MarkerPair: markers=(R_Elbow R_Forearm_Base)
        MarkerPair: markers=(L_Elbow L_Forearm_Base)
        BodyScale ulna_r: axes=(X Y Z)
        BodyScale radius_r: axes=(X Y Z)
        BodyScale ulna_l: axes=(X Y Z)
        BodyScale radius_l: axes=(X Y Z)
      Measurement hand: apply=true
        MarkerPair: markers=(R_Hand_Lower R_Hand_Lat)
        MarkerPair: markers=(L_Hand_Lower L_Hand_Lat)
        BodyScale hand_r: axes=(X Y Z)
        BodyScale hand_l: axes=(X Y Z)
    ScaleSet gait2354_Scale:
      Scale: scales=(1.14724 1.14724 1.14724) segment=femur_r apply=false
      Scale: scales=(0.988523 0.988523 0.988523) segment=tibia_r apply=false
      Scale: scales=(1.14724 1.14724 1.14724) segment=femur_l apply=false
      Scale: scales=(0.988523 0.988523 0.988523) segment=tibia_l apply=false
  MarkerPlacer:
    apply: true
    marker_file: D:\Dropbox\Ergonomics Data\10-03-21\Processed Data\Test Cal 01.trc
    time_range: 13.52 14.99
    max_marker_movement: -1
    IKTaskSet gait2354_Scale:
      IKMarkerTask R_Acromium: apply=true weight=10
      IKMarkerTask L_Acromium: apply=true weight=10
      IKMarkerTask R_Elbow: apply=true weight=5
      IKMarkerTask L_Elbow: apply=true weight=5
      IKMarkerTask R_Forearm_Base: apply=true weight=5
      IKMarkerTask L_Forearm_Base: apply=true weight=5
      IKMarkerTask R_Hand_Lower: apply=true weight=1
      IKMarkerTask R_Hand_Med: apply=true weight=5
      IKMarkerTask R_Hand_Lat: apply=true weight=5
      IKMarkerTask L_Hand_Lower: apply=true weight=1
      IKMarkerTask L_Hand_Med: apply=true weight=5
      IKMarkerTask L_Hand_Lat: apply=true weight=5
      IKMarkerTask R_ASIS: apply=true weight=10
      IKMarkerTask L_ASIS: apply=true weight=10
      IKMarkerTask V_Sacral: apply=true weight=5
      IKMarkerTask R_Knee_Med: apply=true weight=5
      IKMarkerTask R_Knee_Lat: apply=true weight=5
      IKMarkerTask L_Knee_Med: apply=true weight=5
      IKMarkerTask L_Knee_Lat: apply=true weight=5
      IKMarkerTask R_Thigh_Upper: apply=false weight=1
      IKMarkerTask R_Thigh_Front: apply=false weight=1
      IKMarkerTask R_Thigh_Rear: apply=false weight=1
      IKMarkerTask L_Thigh_Upper: apply=false weight=1
      IKMarkerTask L_Thigh_Front: apply=false weight=1
      IKMarkerTask L_Thigh_Rear: apply=false weight=1
      IKMarkerTask R_Ankle_Med: apply=true weight=10
      IKMarkerTask R_Ankle_Lat: apply=true weight=10
      IKMarkerTask L_Ankle_Lat: apply=true weight=10
      IKMarkerTask L_Ankle_Med: apply=true weight=10
      IKMarkerTask R_Shank_Upper: apply=false weight=1
      IKMarkerTask R_Shank_Front: apply=false weight=1
      IKMarkerTask R_Shank_Rear: apply=false weight=1
      IKMarkerTask L_Shank_Upper: apply=false weight=1
      IKMarkerTask L_Shank_Front: apply=false weight=1
      IKMarkerTask L_Shank_Rear: apply=false weight=1
      IKMarkerTask R_Heel: apply=true weight=5
      IKMarkerTask R_MTP1: apply=true weight=5
      IKMarkerTask R_MTP5: apply=true weight=5
      IKMarkerTask L_Heel: apply=true weight=5
      IKMarkerTask L_MTP1: apply=true weight=5
      IKMarkerTask L_MTP5: apply=true weight=5
      IKMarkerTask R_Pelvis: apply=true weight=5
      IKMarkerTask L_Pelvis: apply=true weight=5
      IKCoordinateTask [values shared by the 13 below unless stated]: apply=false value_type=default_value value=0
          weight=1000
      IKCoordinateTask pelvis_tilt: weight=1
      IKCoordinateTask pelvis_list: weight=1
      IKCoordinateTask pelvis_rotation: weight=1
      IKCoordinateTask hip_flexion_r
      IKCoordinateTask knee_angle_r
      IKCoordinateTask ankle_angle_r: value_type=manual_value
      IKCoordinateTask subtalar_angle_r
      IKCoordinateTask mtp_angle_r: apply=true
      IKCoordinateTask hip_flexion_l
      IKCoordinateTask knee_angle_l
      IKCoordinateTask ankle_angle_l: value_type=manual_value
      IKCoordinateTask subtalar_angle_l
      IKCoordinateTask mtp_angle_l: apply=true
