# OpenSim document version 40000
CMCTool CMC_180degpushreduced:
  model_file: ../Models/Adjusted/gait2392musc.osim
  replace_force_set: false
  force_set_files: C:/Users/danie/Documents/GitHub/ergonomics/Source/../Settings/CMC/gait2392/actuators_feet.xml
  results_directory: C:/Users/danie/Documents/GitHub/ergonomics/Source/../OpenSim/CMC
  output_precision: 20
  initial_time: 18.03
  final_time: 21.039
  solve_for_equilibrium_for_auxiliary_states: true
  maximum_number_of_integrator_steps: 30000
  maximum_integrator_step_size: 1
  minimum_integrator_step_size: 1e-8
  integrator_error_tolerance: 1e-6
  desired_kinematics_file: C:/Users/danie/Documents/GitHub/ergonomics/Source/../OpenSim/RRA/squat_gait2392/gait2392_states.sto
  task_set_file: C:/Users/danie/Documents/GitHub/ergonomics/Source/../Settings/CMC/gait2392/tasks.xml
  constraints_file: CMC_human_controls.xml
  lowpass_cutoff_frequency: -10
  cmc_time_window: 0.01
  use_fast_optimization_target: true
  optimizer_algorithm: ipopt
  optimizer_max_iterations: 2000
  optimizer_print_level: 0
  use_verbose_printing: false
  AnalysisSet Analyses:
    ProbeReporter MetabolicsReporter
