# OpenSim document version 40000
Model 2D_gait:
  SmoothSphereHalfSpaceForce [values shared by the 10 below unless stated]: stiffness=3067776 [N/m^2]
      dissipation=2 [s/m] static_friction=0.8 dynamic_friction=0.8 viscous_friction=0.5 transition_velocity=0.2 [m/s]
      hertz_smoothing=300 hunt_crossley_smoothing=50 socket_half_space=/contactgeometryset/floor
  SmoothSphereHalfSpaceForce chair_r: socket_sphere=/contactgeometryset/butt_r
      socket_half_space=/contactgeometryset/chair
  SmoothSphereHalfSpaceForce chair_l: socket_sphere=/contactgeometryset/butt_l
      socket_half_space=/contactgeometryset/chair
  SmoothSphereHalfSpaceForce contactHeel_r: socket_sphere=/contactgeometryset/heel_r
  SmoothSphereHalfSpaceForce contactHeel_l: socket_sphere=/contactgeometryset/heel_l
  SmoothSphereHalfSpaceForce contactFront_r: socket_sphere=/contactgeometryset/front_r
  SmoothSphereHalfSpaceForce contactFront_l: socket_sphere=/contactgeometryset/front_l
  SmoothSphereHalfSpaceForce contactMed_r: socket_sphere=/contactgeometryset/foot_med_r
  SmoothSphereHalfSpaceForce contactMed_l: socket_sphere=/contactgeometryset/foot_med_l
  SmoothSphereHalfSpaceForce contactLat_r: socket_sphere=/contactgeometryset/foot_lat_r
  SmoothSphereHalfSpaceForce contactLat_l: socket_sphere=/contactgeometryset/foot_lat_l
  ActivationCoordinateActuator lumbarAct: min_control=-1 max_control=1 coordinate=lumbar optimal_force=150
      activation_time_constant=0.01
  DeGrooteFregly2016Muscle [values shared by the 18 below unless stated]: min_control=0.01 max_control=1
      max_contraction_velocity=10 ignore_tendon_compliance=true activation_time_constant=0.015
      deactivation_time_constant=0.06 default_activation=0.01 active_force_width_scale=1 fiber_damping=0.01
      tendon_strain_at_one_norm_force=0.049 ignore_passive_fiber_force=false
  DeGrooteFregly2016Muscle hamstrings_r: max_isometric_force=2700 optimal_fiber_length=0.1090593
      tendon_slack_length=0.3261773 pennation_angle_at_optimal=0 [radians]
    PathPoint bifemlh_r-P1: pelvis (-0.121645 -0.0990559 0.0684676)
    PathPoint bifemlh_r-P2: tibia_r (-0.0290986 -0.0348024 0.0284509)
    PathPoint bifemlh_r-P3: tibia_r (-0.0226215 -0.054427 0.0331589)
  DeGrooteFregly2016Muscle bifemsh_r: max_isometric_force=804 optimal_fiber_length=0.1718723
      tendon_slack_length=0.08841986 pennation_angle_at_optimal=0.4014257
    PathPoint P1: femur_r (0.00501373 -0.211679 0.0234642)
    PathPoint P2: tibia_r (-0.0290986 -0.0348024 0.0284509)
    PathPoint P3: tibia_r (-0.0226215 -0.054427 0.0331589)
  DeGrooteFregly2016Muscle glut_max_r: max_isometric_force=1944 optimal_fiber_length=0.1547784
      tendon_slack_length=0.07230884 pennation_angle_at_optimal=0
    PathPoint P1: pelvis (-0.127188 0.00840194 0.045553)
    PathPoint P2: pelvis (-0.129795 -0.0588136 0.0801615)
    PathPoint P3: femur_r (-0.0451235 -0.0585603 0.0252692)
    PathPoint P4: femur_r (-0.0156428 -0.101879 0.042015)
  DeGrooteFregly2016Muscle iliopsoas_r: max_isometric_force=2342 optimal_fiber_length=0.09749959
      tendon_slack_length=0.1559993 pennation_angle_at_optimal=0.1396263
    PathPoint psoas_r-P1: pelvis (-0.0624834 0.0856611 0.0284953)
    PathPoint psoas_r-P2: pelvis (-0.0229846 -0.0550472 0.0748371)
    ConditionalPathPoint psoas_r-P3: pelvis (-0.0278133 -0.077742 0.0804573)
        socket_coordinate=/jointset/hip_r/hip_flexion_r range=(-1.5708 0.785398) [radians]
    PathPoint psoas_r-P4: femur_r (0.00160439 -0.0508392 0.00381043)
    PathPoint psoas_r-P5: femur_r (-0.0188516 -0.0598639 0.0104285)
  DeGrooteFregly2016Muscle rect_fem_r: max_isometric_force=1169 optimal_fiber_length=0.1141544
      tendon_slack_length=0.3104199 pennation_angle_at_optimal=0.08726646
    PathPoint P1: pelvis (-0.0284893 -0.0300345 0.0954444)
    ConditionalPathPoint P2: femur_r (0.0334917 -0.404106 0.00190522) socket_coordinate=/jointset/knee_r/knee_angle_r
        range=(-2.61799 -1.45997)
    MovingPathPoint P3: tibia_r socket_x_coordinate=/jointset/knee_r/knee_angle_r
        socket_y_coordinate=/jointset/knee_r/knee_angle_r socket_z_coordinate=/jointset/knee_r/knee_angle_r
      x_location: MultiplierFunction: scale=0.9667322
        SimmSpline: x=(-2.0944 -1.99997 -1.5708 -1.45752 -1.39626 -1.0472 -0.698132 -0.526391 -0.349066 -0.174533 0 0.00017453 0.00034907 0.0279253 0.0872665 0.174533 2.0944)
            y=(0.0155805 0.0179938 0.0275081 0.0296564 0.0307615 0.0365695 0.0422074 0.0450902 0.048391 0.0534299 0.0617576 0.0617669 0.0617762 0.0633083 0.066994 0.0733035 0.0573481)
      y_location: MultiplierFunction: scale=0.9667322
        SimmSpline: x=(-2.0944 -1.99997 -1.5708 -1.45752 -1.39626 -1.0472 -0.698132 -0.526391 -0.349066 -0.174533 0 0.00017453 0.00034907 0.0279253 0.0872665 0.174533 2.0944)
            y=(0.0234116 0.0237613 0.0251141 0.0252795 0.0253146 0.0249184 0.0242373 0.0238447 0.0234197 0.0227644 0.020984 0.0209814 0.0209788 0.0205225 0.0191754 0.0159554 -0.0673774)
      z_location: MultiplierFunction: scale=0.9667322
        SimmSpline: x=(-2.0944 0.1745) y=(0.0014 0.0014)
  DeGrooteFregly2016Muscle vasti_r: max_isometric_force=5000 optimal_fiber_length=0.1077088
      tendon_slack_length=0.1167684 pennation_angle_at_optimal=0.05235988
    PathPoint vas_int_r-P1: femur_r (0.0290796 -0.192928 0.0310851)
    PathPoint vas_int_r-P2: femur_r (0.033592 -0.208972 0.0285782)
    ConditionalPathPoint vas_int_r-P3: femur_r (0.0343942 -0.404106 0.0055151)
        socket_coordinate=/jointset/knee_r/knee_angle_r range=(-2.61799 -1.42)
    MovingPathPoint vas_int_r-P4: tibia_r socket_x_coordinate=/jointset/knee_r/knee_angle_r
        socket_y_coordinate=/jointset/knee_r/knee_angle_r socket_z_coordinate=/jointset/knee_r/knee_angle_r
      x_location: MultiplierFunction: scale=0.9667322
        SimmSpline: x=(-2.0944 -1.99997 -1.5708 -1.45752 -1.39626 -1.0472 -0.698132 -0.526391 -0.349066 -0.174533 0 0.00017453 0.00034907 0.0279253 0.0872665 0.174533 2.0944)
            y=(0.0082733 0.0106866 0.0202042 0.022353 0.0234583 0.0292715 0.0349465 0.037871 0.0412569 0.0465287 0.0554632 0.0554735 0.0554837 0.0571717 0.061272 0.0684368 0.0648818)
      y_location: MultiplierFunction: scale=0.9667322
        SimmSpline: x=(-2.0944 -1.99997 -1.5708 -1.45752 -1.39626 -1.0472 -0.698132 -0.526391 -0.349066 -0.174533 0 0.00017453 0.00034907 0.0279253 0.0872665 0.174533 2.0944)
            y=(0.025599 0.0259487 0.0273124 0.0274796 0.0275151 0.0271363 0.0265737 0.0263073 0.0261187 0.0260129 0.0252923 0.0252911 0.0252898 0.0250526 0.0242191 0.0218288 -0.0685706)
      z_location: MultiplierFunction: scale=0.9667322
        SimmSpline: x=(-2.0944 2.0944) y=(0.0018 0.0018)
  DeGrooteFregly2016Muscle gastroc_r: max_isometric_force=2500 optimal_fiber_length=0.08692608
      tendon_slack_length=0.3477043 pennation_angle_at_optimal=0.296706
    PathPoint med_gas_r-P1: femur_r (-0.0190522 -0.393979 -0.0235645)
    ConditionalPathPoint med_gas_r-P2: femur_r (-0.0300824 -0.403304 -0.0258708)
        socket_coordinate=/jointset/knee_r/knee_angle_r range=(-0.785398 0.174533)
    PathPoint med_gas_r-P3: calcn_r (0 0.0283317 -0.0048438)
  DeGrooteFregly2016Muscle soleus_r: max_isometric_force=5137 optimal_fiber_length=0.04817055
      tendon_slack_length=0.2408528 pennation_angle_at_optimal=0.4363323
    PathPoint P1: tibia_r (-0.00232016 -0.1482 0.0068638)
    PathPoint P2: calcn_r (0 0.0283317 -0.0048438)
  DeGrooteFregly2016Muscle tib_ant_r: max_isometric_force=3000 optimal_fiber_length=0.09378992
      tendon_slack_length=0.2134199 pennation_angle_at_optimal=0.08726646
    PathPoint P1: tibia_r (0.0173045 -0.156997 0.0111174)
    PathPoint P2: tibia_r (0.0318055 -0.381956 -0.0171112)
    PathPoint P3: calcn_r (0.106564 0.0162679 -0.0278747)
  DeGrooteFregly2016Muscle hamstrings_l: max_isometric_force=2700 optimal_fiber_length=0.1090593
      tendon_slack_length=0.3261773 pennation_angle_at_optimal=0
    PathPoint bifemlh_l-P1: pelvis (-0.121645 -0.0990559 -0.0684676)
    PathPoint bifemlh_l-P2: tibia_l (-0.0290986 -0.0348024 -0.0284509)
    PathPoint bifemlh_l-P3: tibia_l (-0.0226215 -0.054427 -0.0331589)
  DeGrooteFregly2016Muscle bifemsh_l: max_isometric_force=804 optimal_fiber_length=0.1718723
      tendon_slack_length=0.08841986 pennation_angle_at_optimal=0.4014257
    PathPoint P1: femur_l (0.00501373 -0.211679 -0.0234642)
    PathPoint P2: tibia_l (-0.0290986 -0.0348024 -0.0284509)
    PathPoint P3: tibia_l (-0.0226215 -0.054427 -0.0331589)
  DeGrooteFregly2016Muscle glut_max_l: max_isometric_force=1944 optimal_fiber_length=0.1547784
      tendon_slack_length=0.07230884 pennation_angle_at_optimal=0
    PathPoint P1: pelvis (-0.127188 0.00840194 -0.045553)
    PathPoint P2: pelvis (-0.129795 -0.0588136 -0.0801615)
    PathPoint P3: femur_l (-0.0451235 -0.0585603 -0.0252692)
    PathPoint P4: femur_l (-0.0156428 -0.101879 -0.042015)
  DeGrooteFregly2016Muscle iliopsoas_l: max_isometric_force=2342 optimal_fiber_length=0.09749959
      tendon_slack_length=0.1559993 pennation_angle_at_optimal=0.1396263
    PathPoint psoas_l-P1: pelvis (-0.0624834 0.0856611 -0.0284953)
    PathPoint psoas_l-P2: pelvis (-0.0229846 -0.0550472 -0.0748371)
    ConditionalPathPoint psoas_l-P3: pelvis (-0.0278133 -0.077742 -0.0804573)
        socket_coordinate=/jointset/hip_l/hip_flexion_l range=(-1.5708 0.785398)
    PathPoint psoas_l-P4: femur_l (0.00160439 -0.0508392 -0.00381043)
    PathPoint psoas_l-P5: femur_l (-0.0188516 -0.0598639 -0.0104285)
  DeGrooteFregly2016Muscle rect_fem_l: max_isometric_force=1169 optimal_fiber_length=0.1141544
      tendon_slack_length=0.3104199 pennation_angle_at_optimal=0.08726646
    PathPoint P1: pelvis (-0.0284893 -0.0300345 -0.0954444)
    ConditionalPathPoint P2: femur_l (0.0334917 -0.404106 -0.00190522) socket_coordinate=/jointset/knee_l/knee_angle_l
        range=(-2.61799 -1.45997)
    MovingPathPoint P3: tibia_l socket_x_coordinate=/jointset/knee_l/knee_angle_l
        socket_y_coordinate=/jointset/knee_l/knee_angle_l socket_z_coordinate=/jointset/knee_l/knee_angle_l
      x_location: MultiplierFunction: scale=0.9667322
        SimmSpline: x=(-2.0944 -1.99997 -1.5708 -1.45752 -1.39626 -1.0472 -0.698132 -0.526391 -0.349066 -0.174533 0 0.00017453 0.00034907 0.0279253 0.0872665 0.174533 2.0944)
            y=(0.0155805 0.0179938 0.0275081 0.0296564 0.0307615 0.0365695 0.0422074 0.0450902 0.048391 0.0534299 0.0617576 0.0617669 0.0617762 0.0633083 0.066994 0.0733035 0.0573481)
      y_location: MultiplierFunction: scale=0.9667322
        SimmSpline: x=(-2.0944 -1.99997 -1.5708 -1.45752 -1.39626 -1.0472 -0.698132 -0.526391 -0.349066 -0.174533 0 0.00017453 0.00034907 0.0279253 0.0872665 0.174533 2.0944)
            y=(0.0234116 0.0237613 0.0251141 0.0252795 0.0253146 0.0249184 0.0242373 0.0238447 0.0234197 0.0227644 0.020984 0.0209814 0.0209788 0.0205225 0.0191754 0.0159554 -0.0673774)
      z_location: MultiplierFunction: scale=0.9667322
        SimmSpline: x=(-2.0944 0.1745) y=(-0.0014 -0.0014)
  DeGrooteFregly2016Muscle vasti_l: max_isometric_force=5000 optimal_fiber_length=0.1077088
      tendon_slack_length=0.1167684 pennation_angle_at_optimal=0.05235988
    PathPoint vas_int_l-P1: femur_l (0.0290796 -0.192928 -0.0310851)
    PathPoint vas_int_l-P2: femur_l (0.033592 -0.208972 -0.0285782)
    ConditionalPathPoint vas_int_l-P3: femur_l (0.0343942 -0.404106 -0.0055151)
        socket_coordinate=/jointset/knee_l/knee_angle_l range=(-2.61799 -1.42)
    MovingPathPoint vas_int_l-P4: tibia_l socket_x_coordinate=/jointset/knee_l/knee_angle_l
        socket_y_coordinate=/jointset/knee_l/knee_angle_l socket_z_coordinate=/jointset/knee_l/knee_angle_l
      x_location: MultiplierFunction: scale=0.9667322
        SimmSpline: x=(-2.0944 -1.99997 -1.5708 -1.45752 -1.39626 -1.0472 -0.698132 -0.526391 -0.349066 -0.174533 0 0.00017453 0.00034907 0.0279253 0.0872665 0.174533 2.0944)
            y=(0.0082733 0.0106866 0.0202042 0.022353 0.0234583 0.0292715 0.0349465 0.037871 0.0412569 0.0465287 0.0554632 0.0554735 0.0554837 0.0571717 0.061272 0.0684368 0.0648818)
      y_location: MultiplierFunction: scale=0.9667322
        SimmSpline: x=(-2.0944 -1.99997 -1.5708 -1.45752 -1.39626 -1.0472 -0.698132 -0.526391 -0.349066 -0.174533 0 0.00017453 0.00034907 0.0279253 0.0872665 0.174533 2.0944)
            y=(0.025599 0.0259487 0.0273124 0.0274796 0.0275151 0.0271363 0.0265737 0.0263073 0.0261187 0.0260129 0.0252923 0.0252911 0.0252898 0.0250526 0.0242191 0.0218288 -0.0685706)
      z_location: MultiplierFunction: scale=0.9667322
        SimmSpline: x=(-2.0944 2.0944) y=(-0.0018 -0.0018)
  DeGrooteFregly2016Muscle gastroc_l: max_isometric_force=2500 optimal_fiber_length=0.08692608
      tendon_slack_length=0.3477043 pennation_angle_at_optimal=0.296706
    PathPoint med_gas_l-P1: femur_l (-0.0190522 -0.393979 0.0235645)
    ConditionalPathPoint med_gas_l-P2: femur_l (-0.0300824 -0.403304 0.0258708)
        socket_coordinate=/jointset/knee_l/knee_angle_l range=(-0.785398 0.174533)
    PathPoint med_gas_l-P3: calcn_l (0 0.0283317 0.0048438)
  DeGrooteFregly2016Muscle soleus_l: max_isometric_force=5137 optimal_fiber_length=0.04817055
      tendon_slack_length=0.2408528 pennation_angle_at_optimal=0.4363323
    PathPoint P1: tibia_l (-0.00232016 -0.1482 -0.0068638)
    PathPoint P2: calcn_l (0 0.0283317 0.0048438)
  DeGrooteFregly2016Muscle tib_ant_l: max_isometric_force=3000 optimal_fiber_length=0.09378992
      tendon_slack_length=0.2134199 pennation_angle_at_optimal=0.08726646
    PathPoint P1: tibia_l (0.0173045 -0.156997 -0.0111174)
    PathPoint P2: tibia_l (0.0318055 -0.381956 0.0171112)
    PathPoint P3: calcn_l (0.106564 0.0162679 0.0278747)
  Ground
  BodySet:
    Body pelvis: mass=9.714334 [kg] mass_center=(-0.0682778 0 0) inertia=(0.08149288 0.08149288 0.04454276 0 0 0)
        meshes=(r_pelvis.vtp l_pelvis.vtp sacrum.vtp)
    Body femur_l: mass=7.672319 mass_center=(0 -0.170467 0) inertia=(0.1110555 0.02911163 0.11711 0 0 0)
        meshes=femur_l.vtp
    Body femur_r: mass=7.672319 mass_center=(0 -0.170467 0) inertia=(0.1110555 0.02911163 0.11711 0 0 0)
        meshes=femur_r.vtp
    Body tibia_l: mass=3.058155 mass_center=(0 -0.180489 0) inertia=(0.0388527 0.003931523 0.03939232 0 0 0)
        meshes=(tibia_l.vtp l_fibula.vtp)
    Body tibia_r: mass=3.058155 mass_center=(0 -0.180489 0) inertia=(0.0388527 0.003931523 0.03939232 0 0 0)
        meshes=(tibia_r.vtp r_fibula.vtp)
    Body talus_l: mass=0.08248564 mass_center=(0 0 0) inertia=(0.0006889677 0.0006889677 0.0006889677 0 0 0)
        meshes=l_talus.vtp
    Body talus_r: mass=0.08248564 mass_center=(0 0 0) inertia=(0.0006889677 0.0006889677 0.0006889677 0 0 0)
        meshes=r_talus.vtp
    Body calcn_l: mass=1.03107 mass_center=(0.0913924 0.0274177 0) inertia=(0.0009645548 0.002686974 0.002824768 0 0 0)
        meshes=l_foot.vtp
    Body calcn_r: mass=1.03107 mass_center=(0.0913924 0.0274177 0) inertia=(0.0009645548 0.002686974 0.002824768 0 0 0)
        meshes=r_foot.vtp
    Body toes_l: mass=0.1786639 mass_center=(0.0316218 0.00548355 0.0159937)
        inertia=(6.889677e-5 0.0001377935 6.889677e-5 0 0 0) meshes=l_bofoot.vtp
    Body toes_r: mass=0.1786639 mass_center=(0.0316218 0.00548355 -0.0159937)
        inertia=(6.889677e-5 0.0001377935 6.889677e-5 0 0 0) meshes=r_bofoot.vtp
    Body torso: mass=28.24028 mass_center=(-0.0289722 0.309037 0) inertia=(1.140436 0.5934009 1.140436 0 0 0)
        meshes=(hat_spine.vtp hat_jaw.vtp hat_skull.vtp hat_ribs.vtp)
    Body chair: mass=1 mass_center=(0 0 0) inertia=(1 1 1 0 0 0)
    Body H3_back: mass=7.591 mass_center=(-0.138 0.113453 0.016507)
        inertia=(0.2811895 0.3402015 0.1684602 -0.02367961 0.01913874 -0.00451547) meshes=H3_back_rotated.stl
    Body hip_motor_r: mass=0.452 mass_center=(1e-6 -0.0012139 0.02295)
        inertia=(0.001679082 0.00019465 0.000792906 -3.3e-7 7.7e-8 -9.0023e-5) meshes=right_hip_motor_rotated.stl
    Body H3_thigh_r: mass=0.089 mass_center=(0 0.000355 -2.5e-5) inertia=(0.000507212 5.727e-6 0.000512583 0 0 1.3e-8)
        meshes=right_intermediate_bar_rotated.stl
    Body H3_sup_thigh_girth_r: mass=0.196 mass_center=(-0.0015487 -3e-6 -0.056891)
        inertia=(0.000567839 0.001293191 0.000836715 8.52e-7 2.081e-5 3.1e-7)
        meshes=right_upper_femur_girth_rotated.stl
    Body H3_knee_shell_r: mass=0.861 mass_center=(0.001923 0.007976 0.044924)
        inertia=(0.001444962 0.001125414 0.00107658 -1.2202e-5 -8.4016e-5 0.000218819)
        meshes=right_knee_shell_rotated.stl
    Body H3_inf_thigh_girth_r: mass=0.117 mass_center=(-0.004386 1.4e-5 -0.05633)
        inertia=(0.000275993 0.000684354 0.000433433 1.28e-7 2.4785e-5 -2.7e-8)
        meshes=right_lower_femur_girth_rotated.stl
    Body knee_motor_r: mass=0.452 mass_center=(-0.000133 -0.012133 0.022949)
        inertia=(0.000679804 0.000193975 0.000792959 5.331e-6 1.013e-6 -9.0039e-5) meshes=right_knee_motor_rotated.stl
    Body H3_shank_r: mass=0.089 mass_center=(0 0.000355 -2.5e-5) inertia=(0.000507212 5.727e-6 0.000512583 0 0 1.3e-8)
        meshes=right_intermediate_bar_rotated.stl
    Body H3_ankle_shell_r: mass=0.888 mass_center=(-0.000935 0.008498 0.043919)
        inertia=(0.001460316 0.001196549 0.001111441 7.156e-6 -4.484e-6 0.000232528)
        meshes=right_ankle_shell_rotated.stl
    Body ankle_motor_r: mass=0.442 mass_center=(-3e-6 -0.006802 0.023402)
        inertia=(0.000353793 0.00019344 0.000472784 -6.3e-8 2e-8 -4.8275e-5) meshes=right_ankle_motor_rotated.stl
    Body H3_sup_shank_girth_r: mass=0.159 mass_center=(-0.013439 -9e-5 -0.045658)
        inertia=(0.000315556 0.000674596 0.000451329 -8.7e-8 5.589e-6 7.1e-7)
        meshes=right_upper_tibia_girth_rotated.stl
    Body H3_inf_shank_girth_r: mass=0.059 mass_center=(-0.024453 0 -0.035172)
        inertia=(5.2886e-5 0.000105092 6.4004e-5 0 1.3263e-5 0) meshes=right_lower_tibia_girth_rotated.stl
    Body H3_foot_r: mass=0.467 mass_center=(0.059668 -0.018026 -0.038454)
        inertia=(0.000336359 0.00299182 0.00270637 -1.6126e-5 -6.6052e-5 -1.6107e-5) meshes=right_foot_rotated.stl
    Body hip_motor_l: mass=0.452 mass_center=(4e-6 -0.0012135 -0.022949)
        inertia=(0.000679872 0.0001939 0.000792952 6e-8 -1.9e-8 9.0036e-5) meshes=left_hip_motor_rotated.stl
    Body H3_thigh_l: mass=0.089 mass_center=(0 0.000355 2.5e-5) inertia=(0.000507209 5.727e-6 0.00051258 0 0 -1.3e-8)
        meshes=left_intermediate_bar_rotated.stl
    Body H3_sup_thigh_girth_l: mass=0.196 mass_center=(-0.00158 -3e-6 0.058595)
        inertia=(0.000582806 0.001297883 0.000826067 8.18e-7 5.674e-6 -3.77e-7)
        meshes=left_upper_femur_girth_rotated.stl
    Body H3_knee_shell_l: mass=0.861 mass_center=(-0.005388 0.007999 -0.045008)
        inertia=(0.001447807 0.001127238 0.00107658 -6.101e-6 8.9783e-5 -0.000216188)
        meshes=left_knee_shell_rotated.stl
    Body H3_inf_thigh_girth_l: mass=0.117 mass_center=(-0.005303 1.4e-5 0.059842)
        inertia=(0.000298667 0.000700937 0.000427342 1.23e-7 -2.996e-6 2.3e-8)
        meshes=left_lower_femur_girth_rotated.stl
    Body knee_motor_l: mass=0.452 mass_center=(-5e-6 -0.012136 -0.022953)
        inertia=(0.000679876 0.000193898 0.000792928 1.8e-8 2.8e-8 9.0049e-5) meshes=left_knee_motor_rotated.stl
    Body H3_shank_l: mass=0.089 mass_center=(0 0.000354 2.5e-5) inertia=(0.000507209 5.727e-6 0.00051258 0 0 -1.3e-8)
        meshes=left_intermediate_bar_rotated.stl
    Body H3_ankle_shell_l: mass=0.888 mass_center=(-0.000655 0.008497 -0.043919)
        inertia=(0.001460325 0.001196945 0.00111185 1.0302e-5 1.4461e-5 -0.000232504)
        meshes=left_ankle_shell_rotated.stl
    Body ankle_motor_l: mass=0.442 mass_center=(-5e-6 -0.006801 -0.023402)
        inertia=(0.00035382 0.000193421 0.000472792 5.8e-8 2.4e-8 4.8285e-5) meshes=left_ankle_motor_rotated.stl
    Body H3_sup_shank_girth_l: mass=0.159 mass_center=(-0.01383 -9.2e-5 0.045885)
        inertia=(0.000315684 0.000666949 0.000443554 -9.8e-8 -3.433e-6 -7.19e-7)
        meshes=left_upper_tibia_girth_rotated.stl
    Body H3_inf_shank_girth_l: mass=0.059 mass_center=(-0.024369 0 0.035204)
        inertia=(5.2998e-5 0.000105449 6.4248e-5 0 -1.3111e-5 0) meshes=left_lower_tibia_girth_rotated.stl
    Body H3_foot_l: mass=0.467 mass_center=(0.059668 -0.018026 0.037845)
        inertia=(0.000334268 0.002989772 0.002706414 -1.6126e-5 4.4642e-5 1.5623e-5) meshes=left_foot_rotated.stl
  JointSet:
    PinJoint hip_l: socket_parent_frame=pelvis_offset socket_child_frame=femur_l_offset
      Coordinate hip_flexion_l: default_value=1.570796 range=(-1.047198 2.094395)
      PhysicalOffsetFrame pelvis_offset: socket_parent=/bodyset/pelvis
          translation=(-0.0682778 -0.0638354 -0.08233069) [meters]
      PhysicalOffsetFrame femur_l_offset: socket_parent=/bodyset/femur_l translation=(0 0 0)
    PinJoint hip_r: socket_parent_frame=pelvis_offset socket_child_frame=femur_r_offset
      Coordinate hip_flexion_r: default_value=1.570796 range=(-1.047198 2.094395)
      PhysicalOffsetFrame pelvis_offset: socket_parent=/bodyset/pelvis translation=(-0.0682778 -0.0638354 0.08233069)
      PhysicalOffsetFrame femur_r_offset: socket_parent=/bodyset/femur_r translation=(0 0 0)
    PinJoint knee_l: socket_parent_frame=femur_l_offset socket_child_frame=tibia_l_offset
      Coordinate knee_angle_l: default_value=-1.570796 range=(-2.094395 0.1745329)
      PhysicalOffsetFrame femur_l_offset: socket_parent=/bodyset/femur_l translation=(-0.004512212 -0.3969072 0)
      PhysicalOffsetFrame tibia_l_offset: socket_parent=/bodyset/tibia_l translation=(0 0 0)
    PinJoint knee_r: socket_parent_frame=femur_r_offset socket_child_frame=tibia_r_offset
      Coordinate knee_angle_r: default_value=-1.570796 range=(-2.094395 0.1745329)
      PhysicalOffsetFrame femur_r_offset: socket_parent=/bodyset/femur_r translation=(-0.004512212 -0.3969072 0)
      PhysicalOffsetFrame tibia_r_offset: socket_parent=/bodyset/tibia_r translation=(0 0 0)
    PinJoint ankle_l: socket_parent_frame=tibia_l_offset socket_child_frame=talus_l_offset
      Coordinate ankle_angle_l: default_value=0.1745329 range=(-0.6981317 0.5235988)
      PhysicalOffsetFrame tibia_l_offset: socket_parent=/bodyset/tibia_l translation=(0 -0.4156948 0)
      PhysicalOffsetFrame talus_l_offset: socket_parent=/bodyset/talus_l translation=(0 0 0)
    PinJoint ankle_r: socket_parent_frame=tibia_r_offset socket_child_frame=talus_r_offset
      Coordinate ankle_angle_r: default_value=0.1745329 range=(-0.6981317 0.5235988)
      PhysicalOffsetFrame tibia_r_offset: socket_parent=/bodyset/tibia_r translation=(0 -0.4156948 0)
      PhysicalOffsetFrame talus_r_offset: socket_parent=/bodyset/talus_r translation=(0 0 0)
    WeldJoint subtalar_l: socket_parent_frame=talus_l_offset socket_child_frame=calcn_l_offset
      PhysicalOffsetFrame talus_l_offset: socket_parent=/bodyset/talus_l
          translation=(-0.04457209 -0.03833913 -0.007238281)
      PhysicalOffsetFrame calcn_l_offset: socket_parent=/bodyset/calcn_l translation=(0 0 0)
    WeldJoint subtalar_r: socket_parent_frame=talus_r_offset socket_child_frame=calcn_r_offset
      PhysicalOffsetFrame talus_r_offset: socket_parent=/bodyset/talus_r
          translation=(-0.04457209 -0.03833913 0.007238281)
      PhysicalOffsetFrame calcn_r_offset: socket_parent=/bodyset/calcn_r translation=(0 0 0)
    WeldJoint mtp_l: socket_parent_frame=calcn_l_offset socket_child_frame=toes_l_offset
      PhysicalOffsetFrame calcn_l_offset: socket_parent=/bodyset/calcn_l
          translation=(0.1634097 -0.001827849 -0.0009870383)
      PhysicalOffsetFrame toes_l_offset: socket_parent=/bodyset/toes_l translation=(0 0 0)
    WeldJoint mtp_r: socket_parent_frame=calcn_r_offset socket_child_frame=toes_r_offset
      PhysicalOffsetFrame calcn_r_offset: socket_parent=/bodyset/calcn_r
          translation=(0.1634097 -0.001827849 0.0009870383)
      PhysicalOffsetFrame toes_r_offset: socket_parent=/bodyset/toes_r translation=(0 0 0)
    PinJoint lumbar: socket_parent_frame=pelvis_offset socket_child_frame=torso_offset
      Coordinate lumbar: default_value=0 range=(-1.570796 1.570796) locked=true
      PhysicalOffsetFrame pelvis_offset: socket_parent=/bodyset/pelvis translation=(-0.09724999 0.07870779 0)
      PhysicalOffsetFrame torso_offset: socket_parent=/bodyset/torso translation=(0 0 0)
    WeldJoint ground_chair: socket_parent_frame=ground_offset socket_child_frame=chair_offset
      PhysicalOffsetFrame ground_offset: socket_parent=/ground translation=(0 0.45 0)
      PhysicalOffsetFrame chair_offset: socket_parent=/bodyset/chair translation=(0 0 0)
    CustomJoint ground_H3_back: socket_parent_frame=ground_offset socket_child_frame=H3_back_offset
      Coordinate H3_back_tilt: default_value=0 range=(-1.570796 1.570796) clamped=false
      Coordinate H3_back_list: default_value=0 range=(-1.570796 1.570796) clamped=false locked=true
      Coordinate H3_back_rotation: default_value=0 range=(-1.570796 1.570796) clamped=false locked=true
      Coordinate H3_back_tx: default_value=0.05 range=(-5 5) clamped=false
      Coordinate H3_back_ty: default_value=0.52 range=(-1 2) clamped=false
      Coordinate H3_back_tz: default_value=0 range=(-3 3) clamped=false locked=true
      PhysicalOffsetFrame ground_offset: socket_parent=/ground translation=(0 0 0)
      PhysicalOffsetFrame H3_back_offset: socket_parent=/bodyset/H3_back translation=(0 0 0)
      SpatialTransform:
        TransformAxis rotation1: coordinates=H3_back_tilt axis=(0 0 1) LinearFunction(coefficients=1 0)
        TransformAxis rotation2: coordinates=H3_back_list axis=(1 0 0) LinearFunction(coefficients=1 0)
        TransformAxis rotation3: coordinates=H3_back_rotation axis=(0 1 0) LinearFunction(coefficients=1 0)
        TransformAxis translation1: coordinates=H3_back_tx axis=(1 0 0) LinearFunction(coefficients=1 0)
        TransformAxis translation2: coordinates=H3_back_ty axis=(0 1 0) LinearFunction(coefficients=1 0)
        TransformAxis translation3: coordinates=H3_back_tz axis=(0 0 1) LinearFunction(coefficients=1 0)
    WeldJoint H3_back_pelvis: socket_parent_frame=H3_back_offset socket_child_frame=pelvis_offset
      PhysicalOffsetFrame H3_back_offset: socket_parent=/bodyset/H3_back translation=(0.09 0.0661 0)
      PhysicalOffsetFrame pelvis_offset: socket_parent=/bodyset/pelvis translation=(0 0 0)
    CustomJoint H3_back_hip_motor_r: socket_parent_frame=H3_back_offset socket_child_frame=hip_motor_r_offset
      Coordinate H3_hip_flexion_r: default_value=1.570796 range=(-0.5236 1.8326) clamped=false
      PhysicalOffsetFrame H3_back_offset: socket_parent=/bodyset/H3_back translation=(0 0 0.1825)
      PhysicalOffsetFrame hip_motor_r_offset: socket_parent=/bodyset/hip_motor_r translation=(0 0 0)
      SpatialTransform:
        TransformAxis rotation1: axis=(1 0 0)
        TransformAxis rotation2: axis=(0 1 0)
        TransformAxis rotation3: coordinates=H3_hip_flexion_r axis=(0 0 1) LinearFunction(coefficients=1 0)
        TransformAxis translation1: axis=(1 0 0)
        TransformAxis translation2: axis=(0 1 0)
        TransformAxis translation3: axis=(0 0 1)
    WeldJoint hip_motor_r_H3_thigh_r: socket_parent_frame=hip_motor_r_offset socket_child_frame=H3_thigh_r_offset
      PhysicalOffsetFrame hip_motor_r_offset: socket_parent=/bodyset/hip_motor_r translation=(0 -0.20775 0.01325)
      PhysicalOffsetFrame H3_thigh_r_offset: socket_parent=/bodyset/H3_thigh_r translation=(0 0 0)
    WeldJoint hip_motor_r_H3_sup_thigh_girth_r: socket_parent_frame=hip_motor_r_offset
        socket_child_frame=H3_sup_thigh_girth_r_offset
      PhysicalOffsetFrame hip_motor_r_offset: socket_parent=/bodyset/hip_motor_r translation=(0 -0.121711 0.0075)
      PhysicalOffsetFrame H3_sup_thigh_girth_r_offset: socket_parent=/bodyset/H3_sup_thigh_girth_r translation=(0 0 0)
    WeldJoint H3_thigh_r_H3_knee_shell_r: socket_parent_frame=H3_thigh_r_offset
        socket_child_frame=H3_knee_shell_r_offset
      PhysicalOffsetFrame H3_thigh_r_offset: socket_parent=/bodyset/H3_thigh_r translation=(0 -0.18375 -0.013)
      PhysicalOffsetFrame H3_knee_shell_r_offset: socket_parent=/bodyset/H3_knee_shell_r translation=(0 0 0)
    WeldJoint H3_knee_shell_r_H3_inf_thigh_girth_r: socket_parent_frame=H3_knee_shell_r_offset
        socket_child_frame=H3_inf_thigh_girth_r_offset
      PhysicalOffsetFrame H3_knee_shell_r_offset: socket_parent=/bodyset/H3_knee_shell_r translation=(0 0.0975 0.0075)
      PhysicalOffsetFrame H3_inf_thigh_girth_r_offset: socket_parent=/bodyset/H3_inf_thigh_girth_r translation=(0 0 0)
    CustomJoint H3_knee_shell_r_knee_motor_r: socket_parent_frame=H3_knee_shell_r_offset
        socket_child_frame=knee_motor_r_offset
      Coordinate H3_knee_angle_r: default_value=-1.570796 range=(-1.8326 0.08726646) clamped=false
      PhysicalOffsetFrame H3_knee_shell_r_offset: socket_parent=/bodyset/H3_knee_shell_r translation=(0 0 0)
      PhysicalOffsetFrame knee_motor_r_offset: socket_parent=/bodyset/knee_motor_r translation=(0 0 0)
      SpatialTransform:
        TransformAxis rotation1: axis=(1 0 0)
        TransformAxis rotation2: axis=(0 1 0)
        TransformAxis rotation3: coordinates=H3_knee_angle_r axis=(0 0 1) LinearFunction(coefficients=1 0)
        TransformAxis translation1: axis=(1 0 0)
        TransformAxis translation2: axis=(0 1 0)
        TransformAxis translation3: axis=(0 0 1)
    WeldJoint knee_motor_r_H3_shank_r: socket_parent_frame=knee_motor_r_offset socket_child_frame=H3_shank_r_offset
      PhysicalOffsetFrame knee_motor_r_offset: socket_parent=/bodyset/knee_motor_r translation=(0 -0.225 0.01325)
      PhysicalOffsetFrame H3_shank_r_offset: socket_parent=/bodyset/H3_shank_r translation=(0 0 0)
    WeldJoint H3_shank_r_H3_ankle_shell_r: socket_parent_frame=H3_shank_r_offset
        socket_child_frame=H3_ankle_shell_r_offset
      PhysicalOffsetFrame H3_shank_r_offset: socket_parent=/bodyset/H3_shank_r translation=(0 -0.2 -0.013)
      PhysicalOffsetFrame H3_ankle_shell_r_offset: socket_parent=/bodyset/H3_ankle_shell_r translation=(0 0 0)
    CustomJoint H3_ankle_shell_r_ankle_motor_r: socket_parent_frame=H3_ankle_shell_r_offset
        socket_child_frame=ankle_motor_r_offset
      Coordinate H3_ankle_angle_r: default_value=0 range=(-0.5235988 0.5235988) clamped=false
      PhysicalOffsetFrame H3_ankle_shell_r_offset: socket_parent=/bodyset/H3_ankle_shell_r translation=(0 0 0)
      PhysicalOffsetFrame ankle_motor_r_offset: socket_parent=/bodyset/ankle_motor_r translation=(0 0 0)
      SpatialTransform:
        TransformAxis rotation1: axis=(1 0 0)
        TransformAxis rotation2: axis=(0 1 0)
        TransformAxis rotation3: coordinates=H3_ankle_angle_r axis=(0 0 1) LinearFunction(coefficients=1 0)
        TransformAxis translation1: axis=(1 0 0)
        TransformAxis translation2: axis=(0 1 0)
        TransformAxis translation3: axis=(0 0 1)
    WeldJoint knee_motor_r_H3_sup_shank_girth_r: socket_parent_frame=knee_motor_r_offset
        socket_child_frame=H3_sup_shank_girth_r_offset
      PhysicalOffsetFrame knee_motor_r_offset: socket_parent=/bodyset/knee_motor_r translation=(0 -0.125 0.0075)
      PhysicalOffsetFrame H3_sup_shank_girth_r_offset: socket_parent=/bodyset/H3_sup_shank_girth_r translation=(0 0 0)
    WeldJoint H3_ankle_shell_r_H3_inf_shank_girth_r: socket_parent_frame=H3_ankle_shell_r_offset
        socket_child_frame=H3_inf_shank_girth_r_offset
      PhysicalOffsetFrame H3_ankle_shell_r_offset: socket_parent=/bodyset/H3_ankle_shell_r translation=(0 0.08 0.0075)
      PhysicalOffsetFrame H3_inf_shank_girth_r_offset: socket_parent=/bodyset/H3_inf_shank_girth_r translation=(0 0 0)
    WeldJoint ankle_motor_r_H3_foot_r: socket_parent_frame=ankle_motor_r_offset socket_child_frame=H3_foot_r_offset
      PhysicalOffsetFrame ankle_motor_r_offset: socket_parent=/bodyset/ankle_motor_r translation=(0 -0.061687 0.013)
      PhysicalOffsetFrame H3_foot_r_offset: socket_parent=/bodyset/H3_foot_r translation=(0 0 0)
    CustomJoint H3_back_hip_motor_l: socket_parent_frame=H3_back_offset socket_child_frame=hip_motor_l_offset
      Coordinate H3_hip_flexion_l: default_value=1.570796 range=(-0.5236 1.8326) clamped=false
      PhysicalOffsetFrame H3_back_offset: socket_parent=/bodyset/H3_back translation=(0 0 -0.1825)
      PhysicalOffsetFrame hip_motor_l_offset: socket_parent=/bodyset/hip_motor_l translation=(0 0 0)
      SpatialTransform:
        TransformAxis rotation1: axis=(1 0 0)
        TransformAxis rotation2: axis=(0 1 0)
        TransformAxis rotation3: coordinates=H3_hip_flexion_l axis=(0 0 1) LinearFunction(coefficients=1 0)
        TransformAxis translation1: axis=(1 0 0)
        TransformAxis translation2: axis=(0 1 0)
        TransformAxis translation3: axis=(0 0 1)
    WeldJoint hip_motor_l_H3_thigh_l: socket_parent_frame=hip_motor_l_offset socket_child_frame=H3_thigh_l_offset
      PhysicalOffsetFrame hip_motor_l_offset: socket_parent=/bodyset/hip_motor_l translation=(0 -0.20775 -0.01325)
      PhysicalOffsetFrame H3_thigh_l_offset: socket_parent=/bodyset/H3_thigh_l translation=(0 0 0)
    WeldJoint hip_motor_l_H3_sup_thigh_girth_l: socket_parent_frame=hip_motor_l_offset
        socket_child_frame=H3_sup_thigh_girth_l_offset
      PhysicalOffsetFrame hip_motor_l_offset: socket_parent=/bodyset/hip_motor_l translation=(0 -0.121711 -0.0075)
      PhysicalOffsetFrame H3_sup_thigh_girth_l_offset: socket_parent=/bodyset/H3_sup_thigh_girth_l translation=(0 0 0)
    WeldJoint H3_thigh_l_H3_knee_shell_l: socket_parent_frame=H3_thigh_l_offset
        socket_child_frame=H3_knee_shell_l_offset
      PhysicalOffsetFrame H3_thigh_l_offset: socket_parent=/bodyset/H3_thigh_l translation=(0 -0.18375 0.013)
      PhysicalOffsetFrame H3_knee_shell_l_offset: socket_parent=/bodyset/H3_knee_shell_l translation=(0 0 0)
    WeldJoint H3_knee_shell_l_H3_inf_thigh_girth_l: socket_parent_frame=H3_knee_shell_l_offset
        socket_child_frame=H3_inf_thigh_girth_l_offset
      PhysicalOffsetFrame H3_knee_shell_l_offset: socket_parent=/bodyset/H3_knee_shell_l translation=(0 0.0975 -0.0075)
      PhysicalOffsetFrame H3_inf_thigh_girth_l_offset: socket_parent=/bodyset/H3_inf_thigh_girth_l translation=(0 0 0)
    CustomJoint H3_knee_shell_l_knee_motor_l: socket_parent_frame=H3_knee_shell_l_offset
        socket_child_frame=knee_motor_l_offset
      Coordinate H3_knee_angle_l: default_value=-1.570796 range=(-1.8326 0.08726646) clamped=false
      PhysicalOffsetFrame H3_knee_shell_l_offset: socket_parent=/bodyset/H3_knee_shell_l translation=(0 0 0)
      PhysicalOffsetFrame knee_motor_l_offset: socket_parent=/bodyset/knee_motor_l translation=(0 0 0)
      SpatialTransform:
        TransformAxis rotation1: axis=(1 0 0)
        TransformAxis rotation2: axis=(0 1 0)
        TransformAxis rotation3: coordinates=H3_knee_angle_l axis=(0 0 1) LinearFunction(coefficients=1 0)
        TransformAxis translation1: axis=(1 0 0)
        TransformAxis translation2: axis=(0 1 0)
        TransformAxis translation3: axis=(0 0 1)
    WeldJoint knee_motor_l_H3_shank_l: socket_parent_frame=knee_motor_l_offset socket_child_frame=H3_shank_l_offset
      PhysicalOffsetFrame knee_motor_l_offset: socket_parent=/bodyset/knee_motor_l translation=(0 -0.225 -0.01325)
      PhysicalOffsetFrame H3_shank_l_offset: socket_parent=/bodyset/H3_shank_l translation=(0 0 0)
    WeldJoint H3_shank_l_H3_ankle_shell_l: socket_parent_frame=H3_shank_l_offset
        socket_child_frame=H3_ankle_shell_l_offset
      PhysicalOffsetFrame H3_shank_l_offset: socket_parent=/bodyset/H3_shank_l translation=(0 -0.2 0.013)
      PhysicalOffsetFrame H3_ankle_shell_l_offset: socket_parent=/bodyset/H3_ankle_shell_l translation=(0 0 0)
    CustomJoint H3_ankle_shell_l_ankle_motor_l: socket_parent_frame=H3_ankle_shell_l_offset
        socket_child_frame=ankle_motor_l_offset
      Coordinate H3_ankle_angle_l: default_value=0 range=(-0.5235988 0.5235988) clamped=false
      PhysicalOffsetFrame H3_ankle_shell_l_offset: socket_parent=/bodyset/H3_ankle_shell_l translation=(0 0 0)
      PhysicalOffsetFrame ankle_motor_l_offset: socket_parent=/bodyset/ankle_motor_l translation=(0 0 0)
      SpatialTransform:
        TransformAxis rotation1: axis=(1 0 0)
        TransformAxis rotation2: axis=(0 1 0)
        TransformAxis rotation3: coordinates=H3_ankle_angle_l axis=(0 0 1) LinearFunction(coefficients=1 0)
        TransformAxis translation1: axis=(1 0 0)
        TransformAxis translation2: axis=(0 1 0)
        TransformAxis translation3: axis=(0 0 1)
    WeldJoint knee_motor_l_H3_sup_shank_girth_l: socket_parent_frame=knee_motor_l_offset
        socket_child_frame=H3_sup_shank_girth_l_offset
      PhysicalOffsetFrame knee_motor_l_offset: socket_parent=/bodyset/knee_motor_l translation=(0 -0.125 -0.0075)
      PhysicalOffsetFrame H3_sup_shank_girth_l_offset: socket_parent=/bodyset/H3_sup_shank_girth_l translation=(0 0 0)
    WeldJoint H3_ankle_shell_l_H3_inf_shank_girth_l: socket_parent_frame=H3_ankle_shell_l_offset
        socket_child_frame=H3_inf_shank_girth_l_offset
      PhysicalOffsetFrame H3_ankle_shell_l_offset: socket_parent=/bodyset/H3_ankle_shell_l translation=(0 0.08 -0.0075)
      PhysicalOffsetFrame H3_inf_shank_girth_l_offset: socket_parent=/bodyset/H3_inf_shank_girth_l translation=(0 0 0)
    WeldJoint ankle_motor_l_H3_foot_l: socket_parent_frame=ankle_motor_l_offset socket_child_frame=H3_foot_l_offset
      PhysicalOffsetFrame ankle_motor_l_offset: socket_parent=/bodyset/ankle_motor_l translation=(0 -0.061687 -0.013)
      PhysicalOffsetFrame H3_foot_l_offset: socket_parent=/bodyset/H3_foot_l translation=(0 0 0)
  ConstraintSet:
    CoordinateCouplerConstraint [values shared by the 6 below unless stated]: coupled_coordinates_function=LinearFunction(coefficients=1 0)
    CoordinateCouplerConstraint hip: independent_coordinate_names=hip_flexion_r dependent_coordinate_name=hip_flexion_l
    CoordinateCouplerConstraint knee: independent_coordinate_names=knee_angle_r dependent_coordinate_name=knee_angle_l
    CoordinateCouplerConstraint ankle: independent_coordinate_names=ankle_angle_r
        dependent_coordinate_name=ankle_angle_l
    CoordinateCouplerConstraint h3_hip: independent_coordinate_names=H3_hip_flexion_r
        dependent_coordinate_name=H3_hip_flexion_l
    CoordinateCouplerConstraint h3_knee: independent_coordinate_names=H3_knee_angle_r
        dependent_coordinate_name=H3_knee_angle_l
    CoordinateCouplerConstraint h3_ankle: independent_coordinate_names=H3_ankle_angle_r
        dependent_coordinate_name=H3_ankle_angle_l
  ForceSet:
    BushingForce [values shared by the 11 below unless stated]: rotational_stiffness=(100 100 100) [Nm/rad]
        translational_stiffness=(10000 10000 10000) [N/m] rotational_damping=(20 20 20) [Nm/(rad/s)]
        translational_damping=(200 200 200) [N/(m/s)]
    BushingForce torso_bushing: socket_frame1=H3_back socket_frame2=torso
      PhysicalOffsetFrame H3_back: socket_parent=/bodyset/H3_back translation=(0.0909522 0.4017509 0)
      PhysicalOffsetFrame torso: socket_parent=/bodyset/torso translation=(0.09499999 0.2700001 0)
    BushingForce sup_thigh_r_bushing: socket_frame1=H3_sup_thigh_girth_r_cuff socket_frame2=sup_femur_r_cuff
      PhysicalOffsetFrame H3_sup_thigh_girth_r_cuff: socket_parent=/bodyset/H3_sup_thigh_girth_r
          translation=(-0.0558624 0.00020901 -0.0802471)
      PhysicalOffsetFrame sup_femur_r_cuff: socket_parent=/bodyset/femur_r translation=(-0.05 -0.12 0.02)
    BushingForce inf_thigh_r_bushing: socket_frame1=H3_inf_thigh_girth_r_cuff socket_frame2=inf_femur_r_cuff
      PhysicalOffsetFrame H3_inf_thigh_girth_r_cuff: socket_parent=/bodyset/H3_inf_thigh_girth_r
          translation=(-0.0330622 0.00350986 -0.0716)
      PhysicalOffsetFrame inf_femur_r_cuff: socket_parent=/bodyset/femur_r translation=(-0.034 -0.29 0.02)
    BushingForce sup_shank_r_bushing: socket_frame1=H3_sup_shank_girth_r_cuff socket_frame2=sup_tibia_r_cuff
      PhysicalOffsetFrame H3_sup_shank_girth_r_cuff: socket_parent=/bodyset/H3_sup_shank_girth_r
          translation=(-0.0296336 0.00073351 -0.079754)
      PhysicalOffsetFrame sup_tibia_r_cuff: socket_parent=/bodyset/tibia_r translation=(-0.03 -0.12 0)
    BushingForce inf_shank_r_bushing: socket_frame1=H3_inf_shank_girth_r_cuff socket_frame2=inf_tibia_r_cuff
      PhysicalOffsetFrame H3_inf_shank_girth_r_cuff: socket_parent=/bodyset/H3_inf_shank_girth_r
          translation=(-0.0249014 0.00155243 -0.0585038)
      PhysicalOffsetFrame inf_tibia_r_cuff: socket_parent=/bodyset/tibia_r translation=(-0.025 -0.34 0.01)
    BushingForce foot_r_bushing: socket_frame1=H3_foot_r_cuff socket_frame2=calcn_r_cuff
      PhysicalOffsetFrame H3_foot_r_cuff: socket_parent=/bodyset/H3_foot_r
          translation=(0.0511553 0.00128208 -0.0586519)
      PhysicalOffsetFrame calcn_r_cuff: socket_parent=/bodyset/calcn_r translation=(0.1 -0.01 0)
    BushingForce sup_thigh_l_bushing: socket_frame1=H3_sup_thigh_girth_l_cuff socket_frame2=sup_femur_l_cuff
      PhysicalOffsetFrame H3_sup_thigh_girth_l_cuff: socket_parent=/bodyset/H3_sup_thigh_girth_l
          translation=(-0.0558624 0.00020901 0.0802471)
      PhysicalOffsetFrame sup_femur_l_cuff: socket_parent=/bodyset/femur_l translation=(-0.05 -0.12 -0.02)
    BushingForce inf_thigh_l_bushing: socket_frame1=H3_inf_thigh_girth_l_cuff socket_frame2=inf_femur_l_cuff
      PhysicalOffsetFrame H3_inf_thigh_girth_l_cuff: socket_parent=/bodyset/H3_inf_thigh_girth_l
          translation=(-0.0330622 0.00350986 0.0716)
      PhysicalOffsetFrame inf_femur_l_cuff: socket_parent=/bodyset/femur_l translation=(-0.034 -0.29 -0.02)
    BushingForce sup_shank_l_bushing: socket_frame1=H3_sup_shank_girth_l_cuff socket_frame2=sup_tibia_l_cuff
      PhysicalOffsetFrame H3_sup_shank_girth_l_cuff: socket_parent=/bodyset/H3_sup_shank_girth_l
          translation=(-0.0296336 0.00073351 0.079754)
      PhysicalOffsetFrame sup_tibia_l_cuff: socket_parent=/bodyset/tibia_l translation=(-0.03 -0.12 0)
    BushingForce inf_shank_l_bushing: socket_frame1=H3_inf_shank_girth_l_cuff socket_frame2=inf_tibia_l_cuff
      PhysicalOffsetFrame H3_inf_shank_girth_l_cuff: socket_parent=/bodyset/H3_inf_shank_girth_l
          translation=(-0.0249014 0.00155243 0.0585038)
      PhysicalOffsetFrame inf_tibia_l_cuff: socket_parent=/bodyset/tibia_l translation=(-0.025 -0.34 -0.01)
    BushingForce foot_l_bushing: socket_frame1=H3_foot_l_cuff socket_frame2=calcn_l_cuff
      PhysicalOffsetFrame H3_foot_l_cuff: socket_parent=/bodyset/H3_foot_l translation=(0.0511553 0.00128208 0.0586519)
      PhysicalOffsetFrame calcn_l_cuff: socket_parent=/bodyset/calcn_l translation=(0.1 -0.01 0)
  ContactGeometrySet:
    ContactSphere heel_r: socket_frame=/bodyset/H3_foot_r location=(-0.05 -0.02 -0.05) radius=0.01
    ContactSphere heel_l: socket_frame=/bodyset/H3_foot_l location=(-0.05 -0.02 0.05) radius=0.01
    ContactSphere front_r: socket_frame=/bodyset/H3_foot_r location=(0.2 -0.02 -0.05) radius=0.01
    ContactSphere front_l: socket_frame=/bodyset/H3_foot_l location=(0.2 -0.02 0.05) radius=0.01
    ContactSphere foot_med_r: socket_frame=/bodyset/H3_foot_r location=(0.1 -0.02 -0.08) radius=0.01
    ContactSphere foot_lat_r: socket_frame=/bodyset/H3_foot_r location=(0.1 -0.02 0) radius=0.01
    ContactSphere foot_med_l: socket_frame=/bodyset/H3_foot_l location=(0.1 -0.02 0.08) radius=0.01
    ContactSphere foot_lat_l: socket_frame=/bodyset/H3_foot_l location=(0.1 -0.02 0) radius=0.01
    ContactHalfSpace floor: socket_frame=/ground orientation=(0 0 -1.570796)
    ContactHalfSpace chair: socket_frame=/bodyset/chair orientation=(0 0 -1.570796)
    ContactSphere butt_r: socket_frame=/bodyset/pelvis location=(-0.125 -0.1 0.05) radius=0.035
    ContactSphere butt_l: socket_frame=/bodyset/pelvis location=(-0.125 -0.1 -0.05) radius=0.035
